# OpenSim document version 30000
MarkerSet:
  Marker MAN: thorax (0.0470191 -0.0134384 0.00284886)
  Marker XYP: thorax (0.117442 -0.173237 0.00602405)
  Marker C7: thorax (-0.107087 0.045035 0.000261868)
  Marker T8: thorax (-0.0955496 -0.223978 0.00234284)
  Marker PSRG: hand_l (0.00741379 -0.00407389 -0.0392574)
  Marker PSUG: hand_l (-0.0159452 0.00156716 0.0343654)
  Marker ELG: humerus_l (0.0104846 -0.302142 -0.0367197)
  Marker EMG: humerus_l (0.0193274 -0.299676 0.0518328)
  Marker CLAVG: clavicle_l (0.00728521 0.031314 -0.0686219)
  Marker CLAVD: clavicle_r (0.0136387 0.0272628 0.0567608)
  Marker SCAPGL: scapula_l (-0.0669796 0.0215546 0.060086)
  Marker SCAPGH: scapula_l (-0.0614712 0.0459306 0.102676)
  Marker SCAPDL: scapula_r (-0.0665243 0.0151807 -0.0154267)
  Marker SCAPDH: scapula_r (-0.0898573 0.0294753 -0.0565898)
  Marker ELD: humerus_r (0.00859734 -0.318353 0.0207851)
  Marker EMD: humerus_r (0.021471 -0.305341 -0.0627834)
  Marker PSRD: hand_r (0.0383207 0.00381317 0.0255025)
  Marker PSUD: hand_r (-0.0344537 -0.0122974 -0.00280575)
  Marker MC2G: hand_l (-0.0118595 -0.0888468 -0.0301752)
  Marker MC5G: hand_l (-0.0119636 -0.0785003 0.0439571)
  Marker MC5D: hand_r (-0.0273113 -0.0813794 -0.0364843)
  Marker MC2D: hand_r (0.0196167 -0.0984293 0.0198828)
  Marker ACG: scapula_l (-0.019654 0.0259889 -0.00594175)
  Marker ACD: scapula_r (-0.0162062 0.0251073 0.00636438)
  Marker MTRD: radius_r (0.0637108 -0.164561 0.0294479)
  Marker MTRG: radius_l (0.0629745 -0.195597 -0.0115408)
  Marker BHAG: humerus_l (0.0298473 -0.115172 -0.0538702)
  Marker BHPG: humerus_l (-0.0405551 -0.128528 -0.0247197)
  Marker BBAG: humerus_l (0.0432283 -0.206883 -0.0508732)
  Marker BBPG: humerus_l (0.00130146 -0.216633 -0.036371)
  Marker BHAD: humerus_r (0.0247423 -0.14721 0.0392712)
  Marker BHPD: humerus_r (-0.0489973 -0.154724 0.0221767)
  Marker BBAD: humerus_r (0.0584849 -0.234352 0.0437473)
  Marker BBPD: humerus_r (-0.0068544 -0.240991 0.030231)
  Marker COTG: thorax (0.123386 -0.2209 -0.0851801)
  Marker COTD: thorax (0.115973 -0.194342 0.0844045)
  Marker SCAPDB: scapula_r (-0.107344 0.00180424 -0.0361226)
  Marker SCAPGB: scapula_l (-0.0898176 0.0198032 0.100011)
  Marker T12: thorax (-0.0655598 -0.312023 0.00064928)
  Marker EASD: pelvis (0.0112346 0.023708 0.125408)
  Marker EASG: pelvis (0.00476762 0.013071 -0.125946)
  Marker EPSD: pelvis (-0.164603 0.0466343 0.0542658)
  Marker EPSG: pelvis (-0.16619 0.0553868 -0.0563469)
  Marker CMD: femur_r (-0.0261261 -0.477195 -0.0459559)
  Marker CLD: femur_r (-0.00641905 -0.469757 0.0493243)
  Marker CMG: femur_l (0.0213031 -0.484942 0.0422895)
  Marker CLG: femur_l (0.00113358 -0.465312 -0.0558687)
  Marker MMD: tibia_r (0.0113939 -0.485397 -0.0382174)
  Marker MMG: tibia_l (0.0291765 -0.498549 0.037914)
  Marker MLD: tibia_r (0.000135086 -0.492875 0.0498829)
  Marker MLG: tibia_l (0.00263567 -0.501092 -0.0478308)
  Marker CALG: talus_l (-0.0621503 -0.007436 -0.0155578)
  Marker CALD: talus_r (-0.0717424 -0.00637062 0.0113256)
  Marker MT1G: toes_l (0.0277415 0.0183906 0.0441805)
  Marker MT5D: toes_r (-0.0107938 0.000680065 0.0704155)
  Marker MT1D: toes_r (0.020045 0.0168278 -0.0387405)
  Marker FHAG: femur_l (0.0203797 -0.257094 -0.103258)
  Marker FHPG: femur_l (-0.0697805 -0.250183 -0.0685558)
  Marker FBAG: femur_l (0.0248817 -0.34816 -0.0907231)
  Marker FBPG: femur_l (-0.0374003 -0.344713 -0.0664596)
  Marker FHAD: femur_r (0.0598944 -0.224827 0.0889144)
  Marker FHPD: femur_r (-0.00599527 -0.210408 0.1217)
  Marker FBAD: femur_r (0.0454788 -0.307545 0.0770427)
  Marker FBPD: femur_r (-0.0231651 -0.301205 0.105742)
  Marker MT5G: toes_l (0.00581282 0.00346467 -0.0661354)
  Marker MTCALG: talus_l (-0.0550982 0.0156587 -0.0145779)
  Marker MTCALD: talus_r (-0.0614561 0.0201378 0.0117588)
  Marker MTBassin: pelvis (-0.0465436 0.0848703 0.16087)
  Marker L5: lumbar5 (-0.0696675 0.0508824 -0.00110289)
  Marker TFIBD: tibia_r (-0.0288295 -0.0793612 0.0719586)
  Marker TFIBG: tibia_l (0.0168297 -0.077357 -0.0546503)
  Marker MTPD: toes_r (-0.0448559 0.0358973 0.0536639)
  Marker MTPG: toes_l (-0.0173634 0.0341236 0.0403724)
  Marker PATG: patella_l (0.0259302 -0.00929829 -0.00602985)
  Marker PATD: patella_r (-0.0102087 0.00235636 -0.00749447)
  Marker THAD: tibia_r (0.000804322 -0.222022 0.0792823)
  Marker THPD: tibia_r (-0.0549793 -0.224242 0.103776)
  Marker TBPD: tibia_r (-0.0494314 -0.313257 0.0917667)
  Marker TBAD: tibia_r (0.0383444 -0.307373 0.0534728)
  Marker THAG: tibia_l (0.0584744 -0.290438 -0.0565902)
  Marker THPG: tibia_l (-0.035755 -0.295076 -0.083189)
  Marker TBPG: tibia_l (-0.0338781 -0.38419 -0.0716697)
  Marker TBAG: tibia_l (0.0285572 -0.381812 -0.0529834)
  Marker TMPD: skull (-0.099085 0.067023 0.0961462)
  Marker TMPG: skull (0.0358382 0.128811 -0.0572955)
  Marker OCCD: skull (0.0179 0.13175 0.100202)
  Marker OCCG: skull (-0.0708677 0.0770745 -0.0840457)
  Marker MTTETE: skull (-0.0430026 0.102839 0.114653)
