# OpenSim document version 30000
Model IBHGC_fullbody_golf_V5:
  length_units: meters
  force_units: N
  gravity: 0 -9.80665 0
  credits:
    Delp S.L., Loan J.P., Hoy M.G., Zajac F.E., Topp E.L., Rosen J.M., Thelen D.G., Anderson F.C., Seth A., Hamner S.R., Arnold E., Raabe M.E.
  publications:
    Notes: Raabe Full Body model combines Hamner Full Body Model 2010, Christophy 2012 Lumbar DOF thorax, and Arnold patella; 3D, 23 DOF gait model created by D.G. Thelen, Univ. of Wisconsin-Madison, and Samuel Hamner, Ajay Seth, Frank C. Anderson, and Scott L. Delp, Stanford University. Lower extremity joint defintions based on Delp et al. (1990). Low back joint and anthropometry based on Anderson and Pandy (1999, 2001). Planar knee model of Yamaguchi and Zajac (1989). Hamner added arms adapted from Holzbaur et al., 2005. Hamner, S.R., Seth, A, Delp, S.L.: Muscle contributions to propulsion and support during running. Journal of Biomechanics, 2010. Delp, S.L., Loan, J.P., Hoy, M.G., Zajac, F.E., Topp E.L., Rosen, J.M.: An interactive graphics-based model of the lower extremity to study orthopaedic surgical procedures, IEEE Transactions on Biomedical Engineering, vol. 37, pp. 757-767, 1990. Yamaguchi G.T., Zajac F.E.: A planar model of the knee joint to characterize the knee extensor mechanism." J . Biomech. vol. 21. pp. 1-10. 1989. Anderson F.C., Pandy M.G.: A dynamic optimization solution for vertical jumping in three dimensions. Computer Methods in Biomechanics and Biomedical Engineering 2:201-231, 1999. Anderson F.C., Pandy M.G.: Dynamic optimization of human walking. Journal of Biomechanical Engineering 123:381-390, 2001. Holzbaur, KR, WM Murray and SL Delp, 2005. A model of the upper extremity for simulating musculoskeletal surgery and analyzing neuromuscular control. Ann Biomed Eng 33(6): 829-840.
  BodySet:
    Body ground: mass=0 mass_center=(0 0 0) inertia_xx=0 inertia_yy=0 inertia_zz=0
    Body pelvis: mass=11.67424 mass_center=(-0.07083189 0 0) inertia_xx=0.09998382 inertia_yy=0.08568817
        inertia_zz=0.05696148 meshes=(r_pelvis.vtp l_pelvis.vtp)
      CustomJoint ground_pelvis: parent_body=ground location_in_parent=(0 0 0) location=(0 0 0)
        Coordinate pelvis_tilt: motion_type=rotational default_value=0 range=(-1.570796 1.570796) clamped=false
        Coordinate pelvis_list: motion_type=rotational default_value=0 range=(-1.570796 1.570796) clamped=false
        Coordinate pelvis_rotation: motion_type=rotational default_value=0 range=(-1.570796 1.570796) clamped=false
        Coordinate pelvis_tx: motion_type=translational default_value=0 range=(-5 5) clamped=false
        Coordinate pelvis_ty: motion_type=translational default_value=0 range=(-1 2) clamped=false
        Coordinate pelvis_tz: motion_type=translational default_value=0 range=(-3 3) clamped=false
        SpatialTransform:
          # 3 Axes for rotations are listed first.
          TransformAxis rotation1: coordinates=pelvis_tilt axis=(0 0 1) LinearFunction(coefficients=0.9905386 0)
          TransformAxis rotation2: coordinates=pelvis_list axis=(1 0 0) LinearFunction(coefficients=1.001866 0)
          TransformAxis rotation3: coordinates=pelvis_rotation axis=(0 1 0) LinearFunction(coefficients=0.9905386 0)
          TransformAxis translation1: coordinates=pelvis_tx axis=(1 0 0) LinearFunction(coefficients=1.001866 0)
          TransformAxis translation2: coordinates=pelvis_ty axis=(0 1 0) LinearFunction(coefficients=0.9905386 0)
          TransformAxis translation3: coordinates=pelvis_tz axis=(0 0 1) LinearFunction(coefficients=0.9905386 0)
    Body sacrum: mass=0 mass_center=(0 0 0) inertia_xx=0 inertia_yy=0 inertia_zz=0 meshes=sacrum.vtp
      WeldJoint sacrumjnt: parent_body=pelvis location_in_parent=(0.01001866 -0.01683916 0) location=(0 0 0)
    Body femur_r: mass=9.220238 mass_center=(0 -0.1897395 0) inertia_xx=0.1433499 inertia_yy=0.03181136
        inertia_zz=0.1511651 meshes=femur_r.vtp
      CustomJoint hip_r: parent_body=pelvis location_in_parent=(-0.07083189 -0.0654746 0.08270997) location=(0 0 0)
        Coordinate hip_flexion_r: motion_type=rotational default_value=0 range=(-2.094395 2.094395) clamped=false
        Coordinate hip_adduction_r: motion_type=rotational default_value=0 range=(-2.094395 2.094395) clamped=false
        Coordinate hip_rotation_r: motion_type=rotational default_value=0 range=(-2.094395 2.094395) clamped=false
        SpatialTransform: axes_held_at_zero=(translation1 translation2 translation3)
          # 3 Axes for rotations are listed first.
          TransformAxis rotation1: coordinates=hip_flexion_r axis=(0 0 1) LinearFunction(coefficients=0.9561821 0)
          TransformAxis rotation2: coordinates=hip_adduction_r axis=(1 0 0) LinearFunction(coefficients=0.9561821 0)
          TransformAxis rotation3: coordinates=hip_rotation_r axis=(0 1 0) LinearFunction(coefficients=1.116115 0)
    Body patella_r: mass=0.08544784 mass_center=(0.001721128 0.02946543 0) inertia_xx=3.072549e-6
        inertia_yy=1.188168e-5 inertia_zz=1.403523e-5 meshes=r_patella.vtp
      CustomJoint patellofemoral_r: parent_body=femur_r location_in_parent=(0 0 0) location=(0 0 0)
        Coordinate knee_angle_r_beta: motion_type=rotational default_value=0 range=(-99999.9 99999.9) clamped=false
        SpatialTransform: axes_held_at_zero=(rotation2 rotation3 translation3)
          # 3 Axes for rotations are listed first.
          TransformAxis rotation1: coordinates=knee_angle_r_beta axis=(0 0 1)
            SimmSpline f11: x=(0 0.174533 0.349066 0.523599 0.698132 0.872665 1.0472 1.22173 1.39626 1.5708 1.74533 1.91986 2.0944)
                y=(0.001087045 -0.006016413 -0.1009556 -0.2425671 -0.3960937 -0.5536744 -0.7145014 -0.8777656 -1.042659 -1.208413 -1.374636 -1.541232 -1.708066)
          TransformAxis translation1: coordinates=knee_angle_r_beta axis=(1 0 0)
            SimmSpline f9: x=(0 0.174533 0.349066 0.523599 0.698132 0.872665 1.0472 1.22173 1.39626 1.5708 1.74533 1.91986 2.0944)
                y=(0.04240668 0.03890896 0.03402192 0.02774076 0.0205321 0.01293045 0.005242747 -0.002306311 -0.009522618 -0.01616235 -0.02192143 -0.02652354 -0.02946475)
          TransformAxis translation2: coordinates=knee_angle_r_beta axis=(0 1 0)
            SimmSpline f10: x=(0 0.174533 0.349066 0.523599 0.698132 0.872665 1.0472 1.22173 1.39626 1.5708 1.74533 1.91986 2.0944)
                y=(-0.4673307 -0.476542 -0.4846394 -0.4912602 -0.4962437 -0.4994559 -0.5008276 -0.5003956 -0.4981813 -0.4942447 -0.4888974 -0.4826617 -0.4761704)
    Body tibia_r: mass=3.675149 mass_center=(0 -0.2329865 0) inertia_xx=0.06410872 inertia_yy=0.005101444
        inertia_zz=0.06499912 meshes=(tibia_r.vtp fibula_r.vtp)
      CustomJoint knee_r: parent_body=femur_r location_in_parent=(0 0 0) location=(0 0 0)
        Coordinate knee_angle_r: motion_type=rotational default_value=0 range=(-2.094395 0.1745329) clamped=false
        SpatialTransform: axes_held_at_zero=(rotation2 rotation3 translation3)
          # 3 Axes for rotations are listed first.
          TransformAxis rotation1: coordinates=knee_angle_r axis=(0 0 1) LinearFunction(coefficients=1.004534 0)
          TransformAxis translation1: coordinates=knee_angle_r axis=(1 0 0)
            SimmSpline: x=(-2.0944 -1.74533 -1.39626 -1.0472 -0.698132 -0.349066 -0.174533 0.197344 0.337395 0.490178 1.52146 2.0944)
                y=(-0.003059783 0.001711566 0.003929909 0.003920347 0.002027106 -0.0009561821 -0.002964165 -0.004997964 -0.00519685 -0.005329759 -0.00519685 -0.005019956)
          TransformAxis translation2: coordinates=knee_angle_r axis=(0 1 0)
            SimmSpline: x=(-2.0944 -1.22173 -0.523599 -0.349066 -0.174533 0.159149 2.0944)
                y=(-0.4716702 -0.4555981 -0.4453299 -0.4437673 -0.4426512 -0.4411601 -0.4419815)
    Body talus_r: mass=0.09912742 mass_center=(0 0 0) inertia_xx=0.001361536 inertia_yy=0.001361536
        inertia_zz=0.001063498 meshes=talus_rv.vtp
      CustomJoint ankle_r: parent_body=tibia_r location_in_parent=(0 -0.5366053 0) location=(0 0 0)
        Coordinate ankle_flex_r: motion_type=rotational default_value=0 range=(-1.570796 1.570796) clamped=false
        Coordinate ankle_abd_r: motion_type=rotational default_value=0 range=(-1.570796 1.570796) clamped=false
        SpatialTransform: axes_held_at_zero=(rotation3 translation1 translation2 translation3)
          # 3 Axes for rotations are listed first.
          TransformAxis rotation1: coordinates=ankle_flex_r axis=(0 0 1) LinearFunction(coefficients=1.293903 0)
          TransformAxis rotation2: coordinates=ankle_abd_r axis=(0 1 0) LinearFunction(coefficients=1.035789 0)
    Body calcn_r: mass=1.239093 mass_center=(0.1035789 0.03107367 0) inertia_xx=0.001906151 inertia_yy=0.005309992
        inertia_zz=0.00436034 meshes=foot.vtp
      CustomJoint subtalar_r: parent_body=talus_r location_in_parent=(-0.05051543 -0.04345135 0.01024771)
          location=(0 0 0)
        Coordinate subtalar_angle_r: motion_type=rotational default_value=0 range=(-1.570796 1.570796) clamped=false
            locked=true
        SpatialTransform: axes_held_at_zero=(rotation2 rotation3 translation1 translation2 translation3)
          # 3 Axes for rotations are listed first.
          TransformAxis rotation1: coordinates=subtalar_angle_r axis=(0.7871796 0.6047475 -0.1209495)
              LinearFunction(coefficients=1.59824 0)
    Body toes_r: mass=0.21471 mass_center=(0.0358383 0.006214734 -0.02264329) inertia_xx=0.0001361536
        inertia_yy=0.0002723073 inertia_zz=0.001063498 meshes=bofoot.vtp
      CustomJoint mtp_r: parent_body=calcn_r location_in_parent=(0.1851991 -0.002071578 0.001397415) location=(0 0 0)
        Coordinate mtp_angle_r: motion_type=rotational default_value=0 range=(-1.570796 1.570796) clamped=false
            locked=true
        SpatialTransform: axes_held_at_zero=(rotation2 rotation3 translation1 translation2 translation3)
          # 3 Axes for rotations are listed first.
          TransformAxis rotation1: coordinates=mtp_angle_r axis=(-0.5809544 0 0.8139361)
              LinearFunction(coefficients=1.6549 0)
    Body femur_l: mass=9.220238 mass_center=(0 -0.1852627 0) inertia_xx=0.134511 inertia_yy=0.02919857
        inertia_zz=0.1418443 meshes=femur_l.vtp
      CustomJoint hip_l: parent_body=pelvis location_in_parent=(-0.07083189 -0.0654746 -0.08270997) location=(0 0 0)
        Coordinate hip_flexion_l: motion_type=rotational default_value=0 range=(-2.094395 2.094395) clamped=false
        Coordinate hip_adduction_l: motion_type=rotational default_value=0 range=(-2.094395 2.094395) clamped=false
        Coordinate hip_rotation_l: motion_type=rotational default_value=0 range=(-2.094395 2.094395) clamped=false
        SpatialTransform: axes_held_at_zero=(translation1 translation2 translation3)
          # 3 Axes for rotations are listed first.
          TransformAxis rotation1: coordinates=hip_flexion_l axis=(0 0 1) LinearFunction(coefficients=0.9160735 0)
          TransformAxis rotation2: coordinates=hip_adduction_l axis=(-1 0 0) LinearFunction(coefficients=0.9160735 0)
          TransformAxis rotation3: coordinates=hip_rotation_l axis=(0 -1 0) LinearFunction(coefficients=1.08978 0)
    Body patella_l: mass=0.08544784 mass_center=(0.001648932 0.0287702 0) inertia_xx=2.883097e-6 inertia_yy=1.090579e-5
        inertia_zz=1.316982e-5 meshes=l_patella.vtp
      CustomJoint patellofemoral_l: parent_body=femur_l location_in_parent=(0 0 0) location=(0 0 0)
        Coordinate knee_angle_l_beta: motion_type=rotational default_value=0 range=(-99999.9 99999.9) clamped=false
        SpatialTransform: axes_held_at_zero=(rotation2 rotation3 translation3)
          # 3 Axes for rotations are listed first.
          TransformAxis rotation1: coordinates=knee_angle_l_beta axis=(0 0 1)
            SimmSpline f25: x=(0 0.174533 0.349066 0.523599 0.698132 0.872665 1.0472 1.22173 1.39626 1.5708 1.74533 1.91986 2.0944)
                y=(0.001041447 -0.005764044 -0.09672087 -0.2323923 -0.3794789 -0.5304496 -0.6845304 -0.8409463 -0.9989232 -1.157725 -1.316975 -1.476582 -1.636419)
          TransformAxis translation1: coordinates=knee_angle_l_beta axis=(1 0 0)
            SimmSpline f23: x=(0 0.174533 0.349066 0.523599 0.698132 0.872665 1.0472 1.22173 1.39626 1.5708 1.74533 1.91986 2.0944)
                y=(0.04062786 0.03727686 0.03259481 0.02657712 0.01967085 0.01238806 0.005022831 -0.002209569 -0.009123176 -0.01548439 -0.0210019 -0.02541096 -0.0282288)
          TransformAxis translation2: coordinates=knee_angle_l_beta axis=(0 1 0)
            SimmSpline f24: x=(0 0.174533 0.349066 0.523599 0.698132 0.872665 1.0472 1.22173 1.39626 1.5708 1.74533 1.91986 2.0944)
                y=(-0.4563042 -0.4652981 -0.4732045 -0.479669 -0.4845349 -0.4876713 -0.4890106 -0.4885889 -0.4864268 -0.4825831 -0.477362 -0.4712734 -0.4649352)
    Body tibia_l: mass=3.675149 mass_center=(0 -0.2397485 0) inertia_xx=0.06677651 inertia_yy=0.005177731
        inertia_zz=0.06770397 meshes=(tibia_l.vtp fibula_l.vtp)
      CustomJoint knee_l: parent_body=femur_l location_in_parent=(0 0 0) location=(0 0 0)
        Coordinate knee_angle_l: motion_type=rotational default_value=0 range=(-2.094395 0.1745329) clamped=false
        SpatialTransform: axes_held_at_zero=(rotation2 rotation3 translation3)
          # 3 Axes for rotations are listed first.
          TransformAxis rotation1: coordinates=knee_angle_l axis=(0 0 1) LinearFunction(coefficients=1.012017 0)
          TransformAxis translation1: coordinates=knee_angle_l axis=(1 0 0)
            SimmSpline: x=(-2.0944 -1.74533 -1.39626 -1.0472 -0.698132 -0.349066 -0.174533 0.197344 0.337395 0.490178 1.52146 2.0944)
                y=(-0.002931435 0.001639772 0.003765062 0.003755901 0.001942076 -0.0009160735 -0.002839828 -0.004788316 -0.004978859 -0.005106194 -0.004978859 -0.004809386)
          TransformAxis translation2: coordinates=knee_angle_l axis=(0 1 0)
            SimmSpline: x=(-2.0944 -1.22173 -0.523599 -0.349066 -0.174533 0.159149 2.0944)
                y=(-0.4605412 -0.4448484 -0.4348224 -0.4332967 -0.4322069 -0.430751 -0.4315531)
    Body talus_l: mass=0.09912742 mass_center=(0 0 0) inertia_xx=0.00134319 inertia_yy=0.00134319
        inertia_zz=0.001026804 meshes=talus_lv.vtp
      CustomJoint ankle_l: parent_body=tibia_l location_in_parent=(0 -0.5521791 0) location=(0 0 0)
        Coordinate ankle_flex_l: motion_type=rotational default_value=0 range=(-1.047198 1.047198) clamped=false
        Coordinate ankle_abd_l: motion_type=rotational default_value=0 range=(-1.047198 1.047198) clamped=false
        SpatialTransform: axes_held_at_zero=(rotation3 translation1 translation2 translation3)
          # 3 Axes for rotations are listed first.
          TransformAxis rotation1: coordinates=ankle_flex_l axis=(0 0 1) LinearFunction(coefficients=1.293903 0)
          TransformAxis rotation2: coordinates=ankle_abd_l axis=(0 1 0) LinearFunction(coefficients=1.017764 0)
    Body calcn_l: mass=1.239093 mass_center=(0.1017764 0.03053291 0) inertia_xx=0.001880466 inertia_yy=0.00523844
        inertia_zz=0.004209897 meshes=l_foot.vtp
      CustomJoint subtalar_l: parent_body=talus_l location_in_parent=(-0.04963633 -0.04269518 -0.01024771)
          location=(0 0 0)
        Coordinate subtalar_angle_l: motion_type=rotational default_value=0 range=(-1.570796 1.570796) clamped=false
            locked=true
        SpatialTransform: axes_held_at_zero=(rotation2 rotation3 translation1 translation2 translation3)
          # 3 Axes for rotations are listed first.
          TransformAxis rotation1: coordinates=subtalar_angle_l axis=(-0.7871796 -0.6047475 -0.1209495)
              LinearFunction(coefficients=1.573149 0)
    Body toes_l: mass=0.21471 mass_center=(0.03521462 0.006106581 0.02264329) inertia_xx=0.000134319
        inertia_yy=0.0002686379 inertia_zz=0.001026804 meshes=l_bofoot.vtp
      CustomJoint mtp_l: parent_body=calcn_l location_in_parent=(0.1819761 -0.002035527 -0.001397415) location=(0 0 0)
        Coordinate mtp_angle_l: motion_type=rotational default_value=0 range=(-1.047198 1.047198) clamped=false
            locked=true
        SpatialTransform: axes_held_at_zero=(rotation2 rotation3 translation1 translation2 translation3)
          # 3 Axes for rotations are listed first.
          TransformAxis rotation1: coordinates=mtp_angle_l axis=(0.5809544 0 0.8139361)
              LinearFunction(coefficients=1.644428 0)
    Body lumbar5: mass=1.808084 mass_center=(0.01792388 0.01515427 0) inertia_xx=0.2711582 inertia_yy=0.03726011
        inertia_zz=0.1497322 meshes=lumbar5.vtp
      CustomJoint L5_S1_IVDjnt: parent_body=sacrum location_in_parent=(-0.09818282 0.07032824 0) location=(0 0 0)
        Coordinate flex_extension: motion_type=rotational default_value=0 range=(-1.22173 0.4537856) clamped=false
        Coordinate lat_bending: motion_type=rotational default_value=0 range=(-1.6 1.6) clamped=false
        Coordinate axial_rotation: motion_type=rotational default_value=0 range=(-3.14 3.14) clamped=false
        SpatialTransform: axes_held_at_zero=(translation1 translation2 translation3)
          # 3 Axes for rotations are listed first.
          TransformAxis rotation1: coordinates=flex_extension axis=(0 0 1) LinearFunction(coefficients=0.1373075 0)
          TransformAxis rotation2: coordinates=lat_bending axis=(1 0 0)
              PiecewiseLinearFunction(x=-1.01875 1.01875, y=-0.138056 0.138056)
          TransformAxis rotation3: coordinates=axial_rotation axis=(0 1 0)
            SimmSpline: x=(-0.97913 0 0.97913) y=(-0.02457029 0 0.023125)
    Body lumbar4: mass=1.783302 mass_center=(0.01929306 0.01804874 0) inertia_xx=0.2604957 inertia_yy=0.03546256
        inertia_zz=0.1442246 meshes=lumbar4.vtp
      CustomJoint L4_L5_IVDjnt: parent_body=lumbar5 location_in_parent=(0.01037262 0.02451182 0)
          location=(0.001037262 -0.002070255 0)
        Coordinate L4_L5_IVDjnt_r3: motion_type=rotational default_value=0 range=(-99999.9 99999.9) clamped=false
        Coordinate L4_L5_IVD_bendjnt_r1: motion_type=rotational default_value=0 range=(-99999.9 99999.9) clamped=false
        Coordinate L4_L5_IVD_rotjnt_r2: motion_type=rotational default_value=0 range=(-99999.9 99999.9) clamped=false
        SpatialTransform: axes_held_at_zero=(translation1 translation2 translation3)
          # 3 Axes for rotations are listed first.
          TransformAxis rotation1: coordinates=L4_L5_IVDjnt_r3 axis=(0 0 1) LinearFunction(coefficients=1.544042 0)
          TransformAxis rotation2: coordinates=L4_L5_IVD_bendjnt_r1 axis=(1 0 0)
              LinearFunction(coefficients=1.037262 0)
          TransformAxis rotation3: coordinates=L4_L5_IVD_rotjnt_r2 axis=(0 1 0)
              LinearFunction(coefficients=0.8281022 0)
    Body lumbar3: mass=1.655428 mass_center=(0.01856065 0.01927317 0) inertia_xx=0.2399392 inertia_yy=0.0341447
        inertia_zz=0.1331089 meshes=lumbar3.vtp
      CustomJoint L3_L4_IVDjnt: parent_body=lumbar4 location_in_parent=(0 0.02649927 0)
          location=(-0.0006223569 -0.0009937226 0)
        Coordinate L3_L4_IVDjnt_r3: motion_type=rotational default_value=0 range=(-99999.9 99999.9) clamped=false
        Coordinate L3_L4_IVD_bendjnt_r1: motion_type=rotational default_value=0 range=(-99999.9 99999.9) clamped=false
        Coordinate L3_L4_IVD_rotjnt_r2: motion_type=rotational default_value=0 range=(-99999.9 99999.9) clamped=false
        SpatialTransform: axes_held_at_zero=(translation1 translation2 translation3)
          # 3 Axes for rotations are listed first.
          TransformAxis rotation1: coordinates=L3_L4_IVDjnt_r3 axis=(0 0 1) LinearFunction(coefficients=1.544042 0)
          TransformAxis rotation2: coordinates=L3_L4_IVD_bendjnt_r1 axis=(1 0 0)
              LinearFunction(coefficients=1.037262 0)
          TransformAxis rotation3: coordinates=L3_L4_IVD_rotjnt_r2 axis=(0 1 0)
              LinearFunction(coefficients=0.8281022 0)
    Body lumbar2: mass=1.674262 mass_center=(0.02618691 0.01673793 0) inertia_xx=0.247558 inertia_yy=0.0376849
        inertia_zz=0.1376994 meshes=lumbar2.vtp
      CustomJoint L2_L3_IVD_jnt: parent_body=lumbar3 location_in_parent=(-0.008298092 0.02583679 0)
          location=(-0.00134844 -0.003229599 0)
        Coordinate L2_L3_IVDjnt_r3: motion_type=rotational default_value=0 range=(-99999.9 99999.9) clamped=false
        Coordinate L2_L3_IVD_bendjnt_r1: motion_type=rotational default_value=0 range=(-99999.9 99999.9) clamped=false
        Coordinate L2_L3_IVD_rotjnt_r2: motion_type=rotational default_value=0 range=(-99999.9 99999.9) clamped=false
        SpatialTransform: axes_held_at_zero=(translation1 translation2 translation3)
          # 3 Axes for rotations are listed first.
          TransformAxis rotation1: coordinates=L2_L3_IVDjnt_r3 axis=(0 0 1) LinearFunction(coefficients=1.544042 0)
          TransformAxis rotation2: coordinates=L2_L3_IVD_bendjnt_r1 axis=(1 0 0)
              LinearFunction(coefficients=1.037262 0)
          TransformAxis rotation3: coordinates=L2_L3_IVD_rotjnt_r2 axis=(0 1 0)
              LinearFunction(coefficients=0.8281022 0)
    Body lumbar1: mass=1.662367 mass_center=(0.03395994 0.01607123 0.002051893) inertia_xx=0.2474852
        inertia_yy=0.04138241 inertia_zz=0.1378934 meshes=lumbar1.vtp
      CustomJoint L1_L2_IVD_jnt: parent_body=lumbar2 location_in_parent=(-0.01037262 0.02070255 0)
          location=(0.001452166 -0.003146788 0)
        Coordinate L1_L2_IVDjnt_r3: motion_type=rotational default_value=0 range=(-99999.9 99999.9) clamped=false
        Coordinate L1_L2_IVD_bendjnt_r1: motion_type=rotational default_value=0 range=(-99999.9 99999.9) clamped=false
        Coordinate L1_L2_IVD_rotjnt_r2: motion_type=rotational default_value=0 range=(-99999.9 99999.9) clamped=false
        SpatialTransform: axes_held_at_zero=(translation1 translation2 translation3)
          # 3 Axes for rotations are listed first.
          TransformAxis rotation1: coordinates=L1_L2_IVDjnt_r3 axis=(0 0 1) LinearFunction(coefficients=1.312436 0)
          TransformAxis rotation2: coordinates=L1_L2_IVD_bendjnt_r1 axis=(1 0 0)
              LinearFunction(coefficients=1.037262 0)
          TransformAxis rotation3: coordinates=L1_L2_IVD_rotjnt_r2 axis=(0 1 0)
              LinearFunction(coefficients=0.8281022 0)
    Body thorax: mass=19.82548 mass_center=(-0.06130215 -0.1628733 0) inertia_xx=2.307346 inertia_yy=0.9473927
        inertia_zz=1.465496
        meshes=(thorax.vtp thoracic12_s.vtp thoracic11_s.vtp thoracic10_s.vtp thoracic9_s.vtp thoracic8_s.vtp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)
      CustomJoint lumbar1_thorax: parent_body=lumbar1 location_in_parent=(-0.01763345 0.02898358 0)
          location=(-0.03538286 -0.2726386 0)
        Coordinate lumbar1_thorax_rot_x: motion_type=rotational default_value=0 range=(-1.570796 1.570796)
            clamped=false
        Coordinate lumbar1_thorax_rot_y: motion_type=rotational default_value=0 range=(-1.570796 1.570796)
            clamped=false
        Coordinate lumbar1_thorax_rot_z: motion_type=rotational default_value=0 range=(-1.570796 1.570796)
            clamped=false
        Coordinate lumbar1_thorax_tx: motion_type=translational default_value=0 range=(-1 1) clamped=false locked=true
        Coordinate lumbar1_thorax_ty: motion_type=translational default_value=0 range=(-1 1) clamped=false locked=true
        Coordinate lumbar1_thorax_tz: motion_type=translational default_value=0 range=(-1 1) clamped=false locked=true
        SpatialTransform:
          # 3 Axes for rotations are listed first.
          TransformAxis rotation1: coordinates=lumbar1_thorax_rot_x axis=(1 0 0)
              LinearFunction(coefficients=1.037262 0)
          TransformAxis rotation2: coordinates=lumbar1_thorax_rot_y axis=(0 1 0)
              LinearFunction(coefficients=1.096052 0)
          TransformAxis rotation3: coordinates=lumbar1_thorax_rot_z axis=(0 0 1)
              LinearFunction(coefficients=1.544042 0)
          TransformAxis translation1: coordinates=lumbar1_thorax_tx axis=(1 0 0)
              LinearFunction(coefficients=1.037262 0)
          TransformAxis translation2: coordinates=lumbar1_thorax_ty axis=(0 1 0)
              LinearFunction(coefficients=1.096052 0)
          TransformAxis translation3: coordinates=lumbar1_thorax_tz axis=(0 0 1)
              LinearFunction(coefficients=1.544042 0)
      WrapEllipsoid ScapulothoracicEllipsoid_r: translation=(-0.02 -0.0173 0.0609) quadrant=all
          dimensions=(0.07 0.15 0.07)
      WrapEllipsoid ScapulothoracicEllipsoid_l: translation=(-0.02 -0.0173 -0.0609) quadrant=all
          dimensions=(0.07 0.15 0.07)
    Body auxt1: mass=0 mass_center=(0 0 0) inertia_xx=0 inertia_yy=0 inertia_zz=0
      CustomJoint auxt1jnt: parent_body=thorax location_in_parent=(-0.0429 0.0297 0) location=(0 0 0)
        Coordinate T1_C1_rot_z: motion_type=rotational default_value=0 range=(-0.57596 0.83776) clamped=false
        Coordinate T1_C1_rot_x: motion_type=rotational default_value=0 range=(-0.57596 0.57596) clamped=false
        Coordinate T1_C1_rot_y: motion_type=rotational default_value=0 range=(-0.47124 0.47124) clamped=false
        SpatialTransform: axes_held_at_zero=(translation1 translation2 translation3)
          # 3 Axes for rotations are listed first.
          TransformAxis rotation1: coordinates=T1_C1_rot_z axis=(0 0 1)
            SimmSpline: x=(-1.7453 1.7453) y=(-0.17279 0.17279)
          TransformAxis rotation2: coordinates=T1_C1_rot_x axis=(1 0 0)
            SimmSpline: x=(-1.7453 1.7453) y=(-0.13614 0.13614)
          TransformAxis rotation3: coordinates=T1_C1_rot_y axis=(0 1 0)
            SimmSpline: x=(-1.7453 1.7453) y=(-0.10996 0.10996)
    Body cerv7: mass=0 mass_center=(0 0 0) inertia_xx=0 inertia_yy=0 inertia_zz=0 meshes=C7.vtp
      WeldJoint cerv7jnt: parent_body=auxt1 location_in_parent=(-0.00684 0.005655 0) location=(0 0 0)
    Body aux7: mass=0 mass_center=(0 0 0) inertia_xx=0 inertia_yy=0 inertia_zz=0
      CustomJoint aux7jnt: parent_body=cerv7 location_in_parent=(0.013256 0.01238 0) location=(0 0 0)
        Coordinate C7_C6_rot_z: motion_type=rotational default_value=0 range=(-99999.9 99999.9) clamped=false
        Coordinate C7_C6_rot_y: motion_type=rotational default_value=0 range=(-99999.9 99999.9) clamped=false
        Coordinate C7_C6_rot_x: motion_type=rotational default_value=0 range=(-99999.9 99999.9) clamped=false
        SpatialTransform: axes_held_at_zero=(translation1 translation2 translation3)
          # 3 Axes for rotations are listed first.
          TransformAxis rotation1: coordinates=C7_C6_rot_z axis=(0 0 1) LinearFunction(coefficients=1 0)
          TransformAxis rotation2: coordinates=C7_C6_rot_y axis=(1 0 0) LinearFunction(coefficients=1 0)
          TransformAxis rotation3: coordinates=C7_C6_rot_x axis=(0 1 0) LinearFunction(coefficients=1 0)
    Body cerv6: mass=0 mass_center=(0 0 0) inertia_xx=0 inertia_yy=0 inertia_zz=0 meshes=C6.vtp
      WeldJoint cerv6jnt: parent_body=aux7 location_in_parent=(-0.009419 0.004065 0) location=(0 0 0)
    Body aux6: mass=0 mass_center=(0 0 0) inertia_xx=0 inertia_yy=0 inertia_zz=0
      CustomJoint aux6jnt: parent_body=cerv6 location_in_parent=(0.00985 0.00975 0) location=(0 0 0)
        Coordinate C6_C5_rot_z: motion_type=rotational default_value=0 range=(-99999.9 99999.9) clamped=false
        Coordinate C6_C5_rot_y: motion_type=rotational default_value=0 range=(-99999.9 99999.9) clamped=false
        Coordinate C6_C5_rot_x: motion_type=rotational default_value=0 range=(-99999.9 99999.9) clamped=false
        SpatialTransform: axes_held_at_zero=(translation1 translation2 translation3)
          # 3 Axes for rotations are listed first.
          TransformAxis rotation1: coordinates=C6_C5_rot_z axis=(0 0 1) LinearFunction(coefficients=1 0)
          TransformAxis rotation2: coordinates=C6_C5_rot_y axis=(1 0 0) LinearFunction(coefficients=1 0)
          TransformAxis rotation3: coordinates=C6_C5_rot_x axis=(0 1 0) LinearFunction(coefficients=1 0)
    Body cerv5: mass=0 mass_center=(0 0 0) inertia_xx=0 inertia_yy=0 inertia_zz=0 meshes=C5.vtp
      WeldJoint cerv5jnt: parent_body=aux6 location_in_parent=(-0.00567 0.00815 0) location=(0 0 0)
    Body aux5: mass=0 mass_center=(0 0 0) inertia_xx=0 inertia_yy=0 inertia_zz=0
      CustomJoint aux5jnt: parent_body=cerv5 location_in_parent=(0.00843 0.00745 0) location=(0 0 0)
        Coordinate C5_C4_rot_z: motion_type=rotational default_value=0 range=(-99999.9 99999.9) clamped=false
        Coordinate C5_C4_rot_y: motion_type=rotational default_value=0 range=(-99999.9 99999.9) clamped=false
        Coordinate C5_C4_rot_x: motion_type=rotational default_value=0 range=(-99999.9 99999.9) clamped=false
        SpatialTransform: axes_held_at_zero=(translation1 translation2 translation3)
          # 3 Axes for rotations are listed first.
          TransformAxis rotation1: coordinates=C5_C4_rot_z axis=(0 0 1) LinearFunction(coefficients=1 0)
          TransformAxis rotation2: coordinates=C5_C4_rot_y axis=(1 0 0) LinearFunction(coefficients=1 0)
          TransformAxis rotation3: coordinates=C5_C4_rot_x axis=(0 1 0) LinearFunction(coefficients=1 0)
    Body cerv4: mass=0 mass_center=(0 0 0) inertia_xx=0 inertia_yy=0 inertia_zz=0 meshes=C4.vtp
      WeldJoint cerv4jnt: parent_body=aux5 location_in_parent=(-0.00502 0.01172 0) location=(0 0 0)
    Body aux4: mass=0 mass_center=(0 0 0) inertia_xx=0 inertia_yy=0 inertia_zz=0
      CustomJoint aux4jnt: parent_body=cerv4 location_in_parent=(0.00732 0.00638 0) location=(0 0 0)
        Coordinate C4_C3_rot_z: motion_type=rotational default_value=0 range=(-99999.9 99999.9) clamped=false
        Coordinate C4_C3_rot_y: motion_type=rotational default_value=0 range=(-99999.9 99999.9) clamped=false
        Coordinate C4_C3_rot_x: motion_type=rotational default_value=0 range=(-99999.9 99999.9) clamped=false
        SpatialTransform: axes_held_at_zero=(translation1 translation2 translation3)
          # 3 Axes for rotations are listed first.
          TransformAxis rotation1: coordinates=C4_C3_rot_z axis=(0 0 1) LinearFunction(coefficients=1 0)
          TransformAxis rotation2: coordinates=C4_C3_rot_y axis=(1 0 0) LinearFunction(coefficients=1 0)
          TransformAxis rotation3: coordinates=C4_C3_rot_x axis=(0 1 0) LinearFunction(coefficients=1 0)
    Body cerv3: mass=0 mass_center=(0 0 0) inertia_xx=0 inertia_yy=0 inertia_zz=0 meshes=C3.vtp
      WeldJoint cerv3jnt: parent_body=aux4 location_in_parent=(-0.00471 0.00902 0) location=(0 0 0)
    Body aux3: mass=0 mass_center=(0 0 0) inertia_xx=0 inertia_yy=0 inertia_zz=0
      CustomJoint aux3jnt: parent_body=cerv3 location_in_parent=(0.00525 0.00506 0) location=(0 0 0)
        Coordinate C3_C2_rot_z: motion_type=rotational default_value=0 range=(-99999.9 99999.9) clamped=false
        Coordinate C3_C2_rot_y: motion_type=rotational default_value=0 range=(-99999.9 99999.9) clamped=false
        Coordinate C3_C2_rot_x: motion_type=rotational default_value=0 range=(-99999.9 99999.9) clamped=false
        SpatialTransform: axes_held_at_zero=(translation1 translation2 translation3)
          # 3 Axes for rotations are listed first.
          TransformAxis rotation1: coordinates=C3_C2_rot_z axis=(0 0 1) LinearFunction(coefficients=1 0)
          TransformAxis rotation2: coordinates=C3_C2_rot_y axis=(1 0 0) LinearFunction(coefficients=1 0)
          TransformAxis rotation3: coordinates=C3_C2_rot_x axis=(0 1 0) LinearFunction(coefficients=1 0)
    Body cerv2: mass=0 mass_center=(0 0 0) inertia_xx=0 inertia_yy=0 inertia_zz=0 meshes=C2.vtp
      WeldJoint cerv2jnt: parent_body=aux3 location_in_parent=(-0.00543 0.01123 0) location=(0 0 0)
    Body aux2: mass=0 mass_center=(0 0 0) inertia_xx=0 inertia_yy=0 inertia_zz=0
      CustomJoint aux2jnt: parent_body=cerv2 location_in_parent=(0.00689 0.02128 0) location=(0 0 0)
        Coordinate C2_C1_rot_z: motion_type=rotational default_value=0 range=(-0.27925 0.41888) clamped=false
        Coordinate C2_C1_rot_x: motion_type=rotational default_value=0 range=(-0.10472 0.10472) clamped=false
        Coordinate C2_C1_rot_y: motion_type=rotational default_value=0 range=(-0.66323 0.66323) clamped=false
        SpatialTransform: axes_held_at_zero=(translation1 translation2 translation3)
          # 3 Axes for rotations are listed first.
          TransformAxis rotation1: coordinates=C2_C1_rot_z axis=(0 0 1)
            SimmSpline: x=(-1.7453 1.7453) y=(-0.77493 0.77493)
          TransformAxis rotation2: coordinates=C2_C1_rot_x axis=(1 0 0)
            SimmSpline: x=(-1.7453 1.7453) y=(-0.87266 0.87266)
          TransformAxis rotation3: coordinates=C2_C1_rot_y axis=(0 1 0)
            SimmSpline: x=(-1.7453 1.7453) y=(-1.5516 1.5516)
    Body cerv1: mass=0 mass_center=(0 0 0) inertia_xx=0 inertia_yy=0 inertia_zz=0 meshes=C1.vtp
      WeldJoint cerv1jnt: parent_body=aux2 location_in_parent=(-0.04245 -0.00352 0) location=(0 0 0)
    Body aux1: mass=0 mass_center=(0 0 0) inertia_xx=0 inertia_yy=0 inertia_zz=0
      CustomJoint aux1jnt: parent_body=cerv1 location_in_parent=(0.04335 0.01492 0) location=(0 0 0)
        Coordinate C1_Skull_rot_z: motion_type=rotational default_value=0 range=(-99999.9 99999.9) clamped=false
        Coordinate C1_Skull_rot_y: motion_type=rotational default_value=0 range=(-99999.9 99999.9) clamped=false
        Coordinate C1_Skull_rot_x: motion_type=rotational default_value=0 range=(-99999.9 99999.9) clamped=false
        SpatialTransform: axes_held_at_zero=(translation1 translation2 translation3)
          # 3 Axes for rotations are listed first.
          TransformAxis rotation1: coordinates=C1_Skull_rot_z axis=(0 0 1) LinearFunction(coefficients=1 0)
          TransformAxis rotation2: coordinates=C1_Skull_rot_y axis=(1 0 0) LinearFunction(coefficients=1 0)
          TransformAxis rotation3: coordinates=C1_Skull_rot_x axis=(0 1 0) LinearFunction(coefficients=1 0)
    Body skull: mass=0 mass_center=(0 0 0) inertia_xx=0 inertia_yy=0 inertia_zz=0 meshes=skull.vtp
      WeldJoint skulljnt: parent_body=aux1 location_in_parent=(0 0 0) location=(0 0 0)
    Body jaw: mass=0 mass_center=(0 0 0) inertia_xx=0 inertia_yy=0 inertia_zz=0 meshes=jaw.vtp
      WeldJoint jawjnt: parent_body=skull location_in_parent=(0 0 0) location=(0 0 0)
    Body clavicle_r: mass=0.1546388 mass_center=(-0.00835231 0.01727849 0.09442141) inertia_xx=1.137315e-5
        inertia_yy=4.510169e-5 inertia_zz=2.742706e-5 inertia_xy=-1.169617e-5 inertia_xz=-1.345428e-5
        inertia_yz=4.034623e-6 meshes=clavicle_r.vtp
      CustomJoint sternoclavicular_r: parent_body=thorax location_in_parent=(0.006560679 0.00759564 0.03931903)
          location=(0 0 0)
        Coordinate clav_prot_r: motion_type=rotational default_value=0 range=(-0.7853982 0.7853982) clamped=false
        Coordinate clav_elev_r: motion_type=rotational default_value=0 range=(-0.7853982 0.7853982) clamped=false
        SpatialTransform: axes_held_at_zero=(rotation3 translation1 translation2 translation3)
          # 3 Axes for rotations are listed first.
          TransformAxis rotation1: coordinates=clav_prot_r axis=(0.0153 0.9892987 -0.1451)
              LinearFunction(coefficients=1.324233 0)
          TransformAxis rotation2: coordinates=clav_elev_r axis=(-0.9944725 0 -0.104997)
              LinearFunction(coefficients=1.193648 0)
    Body scapula_r: mass=0.6992449 mass_center=(-0.0478385 -0.03496406 -0.07048552) inertia_xx=0.001777055
        inertia_yy=0.001714893 inertia_zz=0.001128685 meshes=scapula_r.vtp
      ScapulothoracicJoint scapulothoracic_r: parent_body=thorax location_in_parent=(-0.02074523 -0.0189617 0.1080829)
          orientation_in_parent=(0 -0.87 0) location=(-0.06204898 -0.04278987 -0.08646635)
          orientation=(-0.5181 -1.1416 -0.2854) thoracic_ellipsoid_radii_x_y_z=(0.07 0.15 0.07)
        Coordinate scapula_abduction_r: motion_type=rotational default_value=0 range=(-0.7853982 0.7853982)
            clamped=false
        Coordinate scapula_elevation_r: motion_type=rotational default_value=0 range=(-0.7853982 0.7853982)
            clamped=false
        Coordinate scapula_upward_rot_r: motion_type=rotational default_value=0 range=(-0.7853982 0.7853982)
            clamped=false
        Coordinate scapula_winging_r: motion_type=rotational default_value=0 range=(-0.7853982 0.7853982) clamped=false
    Body humerus_r: mass=2.033996 mass_center=(0.006723893 -0.1240442 -0.003268037) inertia_xx=0.01787845
        inertia_yy=0.003089607 inertia_zz=0.01787845 meshes=humerus_r.vtp
      CustomJoint glenohumeral_r: parent_body=scapula_r location_in_parent=(-0.009905847 -0.03726577 0.01389638)
          location=(0 0 0)
        Coordinate shoulder_elv_r: motion_type=rotational default_value=0.1745329 range=(-1.570796 2.53) clamped=false
        Coordinate plane_of_elev_r: motion_type=rotational default_value=0 range=(-1.570796 3.141593) clamped=false
        Coordinate axial_rot_r: motion_type=rotational default_value=0 range=(-3.141593 3.141593) clamped=false
        SpatialTransform: axes_held_at_zero=(translation1 translation2 translation3)
          # 3 Axes for rotations are listed first.
          TransformAxis rotation1: coordinates=shoulder_elv_r axis=(-0.993 -0.0793 0.0879)
              LinearFunction(coefficients=1.439007 0)
          TransformAxis rotation2: coordinates=plane_of_elev_r axis=(0.0828 0.0654 0.9944)
              LinearFunction(coefficients=1.419372 0)
          TransformAxis rotation3: coordinates=axial_rot_r axis=(-0.0846 0.9947 -0.0584)
              LinearFunction(coefficients=1.252635 0)
    Body ulna_r: mass=0.5416322 mass_center=(-0.01408577 -0.1208451 0.03971992) inertia_xx=0.005499486
        inertia_yy=0.00103607 inertia_zz=0.005499486 meshes=ulna_r.vtp
      CustomJoint elbow_r: parent_body=humerus_r location_in_parent=(0.007637942 -0.3134293 -0.0154011)
          location=(0 0 0)
        Coordinate elbow_flexion_r: motion_type=rotational default_value=0 range=(0 3.141593) clamped=false
        SpatialTransform: axes_held_at_zero=(rotation1 rotation2 translation1 translation2 translation3)
          # 3 Axes for rotations are listed first.
          TransformAxis rotation3: coordinates=elbow_flexion_r axis=(0.04940001 0.03660001 0.9981083)
              LinearFunction(coefficients=1.632772 0)
    Body radius_r: mass=0.5416322 mass_center=(0.02352141 -0.1200265 0.02104071) inertia_xx=0.005499486
        inertia_yy=0.00103607 inertia_zz=0.005499486 meshes=radius.vtp
      CustomJoint radioulna_r: parent_body=ulna_r location_in_parent=(0.0006074195 -0.01322527 0.03036946)
          location=(0 0 0)
        Coordinate pro_sup_r: motion_type=rotational default_value=-1.570796 range=(-1.570796 1.570796) clamped=false
        SpatialTransform: axes_held_at_zero=(rotation1 rotation3 translation1 translation2 translation3)
          # 3 Axes for rotations are listed first.
          TransformAxis rotation2: coordinates=pro_sup_r axis=(-0.01716099 0.9926656 -0.119668)
              LinearFunction(coefficients=1.349072 0)
    Body hand_r: mass=0.453508 mass_center=(0 -0.07980355 0) inertia_xx=0.001626713 inertia_yy=0.00125037
        inertia_zz=0.002443716
        meshes=(pisiform_rvs.vtp lunate_rvs.vtp scaphoid_rvs.vtp triquetrum_rvs.vtp hamate_rvs.vtp capitate_rvs.vtp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)
      CustomJoint radius_hand_r: parent_body=radius_r location_in_parent=(0.03037098 -0.2724844 0.02733388)
          location=(0 0 0)
        Coordinate wrist_flex_r: motion_type=rotational default_value=0 range=(-1.22173 1.22173) clamped=false
        Coordinate wrist_dev_r: motion_type=rotational default_value=0 range=(-0.6108652 0.6108652) clamped=false
        SpatialTransform: axes_held_at_zero=(rotation3 translation1 translation2 translation3)
          # 3 Axes for rotations are listed first.
          TransformAxis rotation1: coordinates=wrist_flex_r axis=(0 0 1) LinearFunction(coefficients=1.518549 0)
          TransformAxis rotation2: coordinates=wrist_dev_r axis=(1 0 0) LinearFunction(coefficients=1.518549 0)
    Body clavicle_l: mass=0.1546388 mass_center=(-0.00835231 0.01727849 -0.09442141) inertia_xx=1.137315e-5
        inertia_yy=4.510169e-5 inertia_zz=2.742706e-5 inertia_xy=-1.169617e-5 inertia_xz=-1.345428e-5
        inertia_yz=4.034623e-6 meshes=clavicle_left_source.vtp
      CustomJoint sternoclavicular_l: parent_body=thorax location_in_parent=(0.006560679 0.00759564 -0.03931903)
          location=(0 0 0)
        Coordinate clav_prot_l: motion_type=rotational default_value=0 range=(-0.7853982 0.7853982) clamped=false
        Coordinate clav_elev_l: motion_type=rotational default_value=0 range=(-0.7853982 0.7853982) clamped=false
        SpatialTransform: axes_held_at_zero=(rotation3 translation1 translation2 translation3)
          # 3 Axes for rotations are listed first.
          TransformAxis rotation1: coordinates=clav_prot_l axis=(-0.0153 -0.9892987 -0.1451)
              LinearFunction(coefficients=1.324233 0)
          TransformAxis rotation2: coordinates=clav_elev_l axis=(0.9944725 0 -0.104997)
              LinearFunction(coefficients=1.193648 0)
    Body scapula_l: mass=0.6992449 mass_center=(-0.0478385 -0.03496406 0.07048552) inertia_xx=0.001777055
        inertia_yy=0.001714893 inertia_zz=0.001128685 meshes=scapula_l_source.vtp
      ScapulothoracicJoint scapulothoracic_l: parent_body=thorax location_in_parent=(-0.02074523 -0.0189617 -0.1080829)
          orientation_in_parent=(0 0.87 0) location=(-0.06204898 -0.04278987 0.08646635)
          orientation=(0.5181 1.1416 -0.2854) thoracic_ellipsoid_radii_x_y_z=(-0.07 -0.15 -0.07)
        Coordinate scapula_abduction_l: motion_type=rotational default_value=0 range=(-0.7853982 0.7853982)
            clamped=false
        Coordinate scapula_elevation_l: motion_type=rotational default_value=0 range=(-0.7853982 0.7853982)
            clamped=false
        Coordinate scapula_upward_rot_l: motion_type=rotational default_value=0 range=(-0.7853982 0.7853982)
            clamped=false
        Coordinate scapula_winging_l: motion_type=rotational default_value=0 range=(-0.7853982 0.7853982) clamped=false
    Body humerus_l: mass=2.033996 mass_center=(0.00665346 -0.1205155 -0.003233804) inertia_xx=0.01723725
        inertia_yy=0.003025218 inertia_zz=0.01723725 meshes=humerus_left_source.vtp
      CustomJoint glenohumeral_l: parent_body=scapula_l location_in_parent=(-0.009905847 -0.03726577 -0.01389638)
          location=(0 0 0)
        Coordinate shoulder_elv_l: motion_type=rotational default_value=0.1745329 range=(-1.570796 2.53) clamped=false
        Coordinate plane_of_elev_l: motion_type=rotational default_value=0 range=(-1.570796 3.141593) clamped=false
        Coordinate axial_rot_l: motion_type=rotational default_value=0 range=(-3.141593 3.141593) clamped=false
        SpatialTransform: axes_held_at_zero=(translation1 translation2 translation3)
          # 3 Axes for rotations are listed first.
          TransformAxis rotation1: coordinates=shoulder_elv_l axis=(0.993 -0.0793 0.0879)
              LinearFunction(coefficients=1.422395 0)
          TransformAxis rotation2: coordinates=plane_of_elev_l axis=(0.0828 0.0654 0.9944)
              LinearFunction(coefficients=1.403235 0)
          TransformAxis rotation3: coordinates=axial_rot_l axis=(-0.0846 0.9947 -0.0584)
              LinearFunction(coefficients=1.220219 0)
    Body ulna_l: mass=0.5416322 mass_center=(-0.0121812 -0.1204341 0.0343493) inertia_xx=0.004604475
        inertia_yy=0.0007748332 inertia_zz=0.004604475 meshes=ulna_left_source.vtp
      CustomJoint elbow_l: parent_body=humerus_l location_in_parent=(0.007557934 -0.3045132 0.01523977)
          location=(0 0 0)
        Coordinate elbow_flexion_l: motion_type=rotational default_value=0 range=(0 3.141593) clamped=false
        SpatialTransform: axes_held_at_zero=(rotation1 rotation2 translation1 translation2 translation3)
          # 3 Axes for rotations are listed first.
          TransformAxis rotation3: coordinates=elbow_flexion_l axis=(0.04940001 0.03660001 0.9981083)
              LinearFunction(coefficients=1.417548 0)
    Body radius_l: mass=0.5416322 mass_center=(0.02034103 -0.1196183 0.01819575) inertia_xx=0.004604475
        inertia_yy=0.0007748332 inertia_zz=0.004604475 meshes=radius_left_source.vtp
      CustomJoint radioulna_l: parent_body=ulna_l location_in_parent=(0.000525289 -0.01318029 -0.02626313)
          location=(0 0 0)
        Coordinate pro_sup_l: motion_type=rotational default_value=-1.570796 range=(-1.570796 1.570796) clamped=false
        SpatialTransform: axes_held_at_zero=(rotation1 rotation3 translation1 translation2 translation3)
          # 3 Axes for rotations are listed first.
          TransformAxis rotation2: coordinates=pro_sup_l axis=(0.01716099 -0.9926656 -0.119668)
              LinearFunction(coefficients=1.317096 0)
    Body hand_l: mass=0.453508 mass_center=(0 -0.06897821 0) inertia_xx=0.00121609 inertia_yy=0.0009350993
        inertia_zz=0.001826862
        meshes=(pisiform_lvs.vtp lunate_lvs.vtp scaphoid_lvs.vtp triquetrum_lvs.vtp hamate_lvs.vtp capitate_lvs.vtp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)
      CustomJoint radius_hand_l: parent_body=radius_l location_in_parent=(0.02626445 -0.2715577 -0.023638)
          orientation_in_parent=(0 -1.56 0) location=(0 0 0)
        Coordinate wrist_flex_l: motion_type=rotational default_value=0 range=(-1.22173 1.22173) clamped=false
        Coordinate wrist_dev_l: motion_type=rotational default_value=0 range=(-0.6108652 0.6108652) clamped=false
        SpatialTransform: axes_held_at_zero=(rotation3 translation1 translation2 translation3)
          # 3 Axes for rotations are listed first.
          TransformAxis rotation1: coordinates=wrist_flex_l axis=(0 0 1) LinearFunction(coefficients=1.313222 0)
          TransformAxis rotation2: coordinates=wrist_dev_l axis=(-1 0 0) LinearFunction(coefficients=1.313222 0)
  ConstraintSet:
    PointConstraint AC_r: body_1=clavicle_r body_2=scapula_r location_body_1=(-0.03032953 0.02218409 0.1853622)
        location_body_2=(-0.01407564 0.0001205657 -0.02351576)
      # Flag indicating whether the constraint is disabled or not. Disabled means that the constraint is not active in subsequent dynamics realization
    PointConstraint AC_l: body_1=clavicle_l body_2=scapula_l location_body_1=(-0.02815615 0.01917938 -0.1812721)
        location_body_2=(-0.01228014 -0.0005067827 0.02862963)
      # Flag indicating whether the constraint is disabled or not. Disabled means that the constraint is not active in subsequent dynamics realization
    CoordinateCouplerConstraint C7_C6_rot_y_con: independent_coordinate_names=T1_C1_rot_x
        dependent_coordinate_name=C7_C6_rot_y scale_factor=1
      # Flag indicating whether the constraint is disabled or not. Disabled means that the constraint is not active in subsequent dynamics realization
      # Constraint function of generalized coordinates (to be specified) used to evaluate the constraint errors and their derivatives, and must valid to at least 2nd order. Constraint function must evaluate to zero when coordinates satisfy constraint
      coupled_coordinates_function: SimmSpline: x=(-1.7453 1.7453) y=(-0.23911 0.23911)
    CoordinateCouplerConstraint C7_C6_rot_x_con: independent_coordinate_names=T1_C1_rot_y
        dependent_coordinate_name=C7_C6_rot_x scale_factor=1
      # Flag indicating whether the constraint is disabled or not. Disabled means that the constraint is not active in subsequent dynamics realization
      # Constraint function of generalized coordinates (to be specified) used to evaluate the constraint errors and their derivatives, and must valid to at least 2nd order. Constraint function must evaluate to zero when coordinates satisfy constraint
      coupled_coordinates_function: SimmSpline: x=(-1.7453 1.7453) y=(-0.32812 0.32812)
    CoordinateCouplerConstraint C7_C6_rot_z_con: independent_coordinate_names=T1_C1_rot_z
        dependent_coordinate_name=C7_C6_rot_z scale_factor=1
      # Flag indicating whether the constraint is disabled or not. Disabled means that the constraint is not active in subsequent dynamics realization
      # Constraint function of generalized coordinates (to be specified) used to evaluate the constraint errors and their derivatives, and must valid to at least 2nd order. Constraint function must evaluate to zero when coordinates satisfy constraint
      coupled_coordinates_function: SimmSpline: x=(-1.7453 1.7453) y=(-0.32638 0.32638)
    CoordinateCouplerConstraint C6_C5_rot_y_con: independent_coordinate_names=T1_C1_rot_x
        dependent_coordinate_name=C6_C5_rot_y scale_factor=1
      # Flag indicating whether the constraint is disabled or not. Disabled means that the constraint is not active in subsequent dynamics realization
      # Constraint function of generalized coordinates (to be specified) used to evaluate the constraint errors and their derivatives, and must valid to at least 2nd order. Constraint function must evaluate to zero when coordinates satisfy constraint
      coupled_coordinates_function: SimmSpline: x=(-1.7453 1.7453) y=(-0.27402 0.27402)
    CoordinateCouplerConstraint C6_C5_rot_x_con: independent_coordinate_names=T1_C1_rot_y
        dependent_coordinate_name=C6_C5_rot_x scale_factor=1
      # Flag indicating whether the constraint is disabled or not. Disabled means that the constraint is not active in subsequent dynamics realization
      # Constraint function of generalized coordinates (to be specified) used to evaluate the constraint errors and their derivatives, and must valid to at least 2nd order. Constraint function must evaluate to zero when coordinates satisfy constraint
      coupled_coordinates_function: SimmSpline: x=(-1.7453 1.7453) y=(-0.38223 0.38223)
    CoordinateCouplerConstraint C6_C5_rot_z_con: independent_coordinate_names=T1_C1_rot_z
        dependent_coordinate_name=C6_C5_rot_z scale_factor=1
      # Flag indicating whether the constraint is disabled or not. Disabled means that the constraint is not active in subsequent dynamics realization
      # Constraint function of generalized coordinates (to be specified) used to evaluate the constraint errors and their derivatives, and must valid to at least 2nd order. Constraint function must evaluate to zero when coordinates satisfy constraint
      coupled_coordinates_function: SimmSpline: x=(-1.7453 1.7453) y=(-0.38397 0.38397)
    CoordinateCouplerConstraint C5_C4_rot_y_con: independent_coordinate_names=T1_C1_rot_x
        dependent_coordinate_name=C5_C4_rot_y scale_factor=1
      # Flag indicating whether the constraint is disabled or not. Disabled means that the constraint is not active in subsequent dynamics realization
      # Constraint function of generalized coordinates (to be specified) used to evaluate the constraint errors and their derivatives, and must valid to at least 2nd order. Constraint function must evaluate to zero when coordinates satisfy constraint
      coupled_coordinates_function: SimmSpline: x=(-1.7453 1.7453) y=(-0.37699 0.37699)
    CoordinateCouplerConstraint C5_C4_rot_x_con: independent_coordinate_names=T1_C1_rot_y
        dependent_coordinate_name=C5_C4_rot_x scale_factor=1
      # Flag indicating whether the constraint is disabled or not. Disabled means that the constraint is not active in subsequent dynamics realization
      # Constraint function of generalized coordinates (to be specified) used to evaluate the constraint errors and their derivatives, and must valid to at least 2nd order. Constraint function must evaluate to zero when coordinates satisfy constraint
      coupled_coordinates_function: SimmSpline: x=(-1.7453 1.7453) y=(-0.38223 0.38223)
    CoordinateCouplerConstraint C5_C4_rot_z_con: independent_coordinate_names=T1_C1_rot_z
        dependent_coordinate_name=C5_C4_rot_z scale_factor=1
      # Flag indicating whether the constraint is disabled or not. Disabled means that the constraint is not active in subsequent dynamics realization
      # Constraint function of generalized coordinates (to be specified) used to evaluate the constraint errors and their derivatives, and must valid to at least 2nd order. Constraint function must evaluate to zero when coordinates satisfy constraint
      coupled_coordinates_function: SimmSpline: x=(-1.7453 1.7453) y=(-0.38397 0.38397)
    CoordinateCouplerConstraint C4_C3_rot_y_con: independent_coordinate_names=T1_C1_rot_x
        dependent_coordinate_name=C4_C3_rot_y scale_factor=1
      # Flag indicating whether the constraint is disabled or not. Disabled means that the constraint is not active in subsequent dynamics realization
      # Constraint function of generalized coordinates (to be specified) used to evaluate the constraint errors and their derivatives, and must valid to at least 2nd order. Constraint function must evaluate to zero when coordinates satisfy constraint
      coupled_coordinates_function: SimmSpline: x=(-1.7453 1.7453) y=(-0.37699 0.37699)
    CoordinateCouplerConstraint C4_C3_rot_x_con: independent_coordinate_names=T1_C1_rot_y
        dependent_coordinate_name=C4_C3_rot_x scale_factor=1
      # Flag indicating whether the constraint is disabled or not. Disabled means that the constraint is not active in subsequent dynamics realization
      # Constraint function of generalized coordinates (to be specified) used to evaluate the constraint errors and their derivatives, and must valid to at least 2nd order. Constraint function must evaluate to zero when coordinates satisfy constraint
      coupled_coordinates_function: SimmSpline: x=(-1.7453 1.7453) y=(-0.38223 0.38223)
    CoordinateCouplerConstraint C4_C3_rot_z_con: independent_coordinate_names=T1_C1_rot_z
        dependent_coordinate_name=C4_C3_rot_z scale_factor=1
      # Flag indicating whether the constraint is disabled or not. Disabled means that the constraint is not active in subsequent dynamics realization
      # Constraint function of generalized coordinates (to be specified) used to evaluate the constraint errors and their derivatives, and must valid to at least 2nd order. Constraint function must evaluate to zero when coordinates satisfy constraint
      coupled_coordinates_function: SimmSpline: x=(-1.7453 1.7453) y=(-0.28798 0.28798)
    CoordinateCouplerConstraint C3_C2_rot_y_con: independent_coordinate_names=T1_C1_rot_x
        dependent_coordinate_name=C3_C2_rot_y scale_factor=1
      # Flag indicating whether the constraint is disabled or not. Disabled means that the constraint is not active in subsequent dynamics realization
      # Constraint function of generalized coordinates (to be specified) used to evaluate the constraint errors and their derivatives, and must valid to at least 2nd order. Constraint function must evaluate to zero when coordinates satisfy constraint
      coupled_coordinates_function: SimmSpline: x=(-1.7453 1.7453) y=(-0.34208 0.34208)
    CoordinateCouplerConstraint C3_C2_rot_x_con: independent_coordinate_names=T1_C1_rot_y
        dependent_coordinate_name=C3_C2_rot_x scale_factor=1
      # Flag indicating whether the constraint is disabled or not. Disabled means that the constraint is not active in subsequent dynamics realization
      # Constraint function of generalized coordinates (to be specified) used to evaluate the constraint errors and their derivatives, and must valid to at least 2nd order. Constraint function must evaluate to zero when coordinates satisfy constraint
      coupled_coordinates_function: SimmSpline: x=(-1.7453 1.7453) y=(-0.16406 0.16406)
    CoordinateCouplerConstraint C3_C2_rot_z_con: independent_coordinate_names=T1_C1_rot_z
        dependent_coordinate_name=C3_C2_rot_z scale_factor=1
      # Flag indicating whether the constraint is disabled or not. Disabled means that the constraint is not active in subsequent dynamics realization
      # Constraint function of generalized coordinates (to be specified) used to evaluate the constraint errors and their derivatives, and must valid to at least 2nd order. Constraint function must evaluate to zero when coordinates satisfy constraint
      coupled_coordinates_function: SimmSpline: x=(-1.7453 1.7453) y=(-0.19199 0.19199)
    CoordinateCouplerConstraint C1_Skull_rot_y_con: independent_coordinate_names=C2_C1_rot_x
        dependent_coordinate_name=C1_Skull_rot_y scale_factor=1
      # Flag indicating whether the constraint is disabled or not. Disabled means that the constraint is not active in subsequent dynamics realization
      # Constraint function of generalized coordinates (to be specified) used to evaluate the constraint errors and their derivatives, and must valid to at least 2nd order. Constraint function must evaluate to zero when coordinates satisfy constraint
      coupled_coordinates_function: SimmSpline: x=(-1.7453 1.7453) y=(-0.87266 0.87266)
    CoordinateCouplerConstraint C1_Skull_rot_x_con: independent_coordinate_names=C2_C1_rot_y
        dependent_coordinate_name=C1_Skull_rot_x scale_factor=1
      # Flag indicating whether the constraint is disabled or not. Disabled means that the constraint is not active in subsequent dynamics realization
      # Constraint function of generalized coordinates (to be specified) used to evaluate the constraint errors and their derivatives, and must valid to at least 2nd order. Constraint function must evaluate to zero when coordinates satisfy constraint
      coupled_coordinates_function: SimmSpline: x=(-1.7453 1.7453) y=(-0.19373 0.19373)
    CoordinateCouplerConstraint C1_Skull_rot_z_con: independent_coordinate_names=C2_C1_rot_z
        dependent_coordinate_name=C1_Skull_rot_z scale_factor=1
      # Flag indicating whether the constraint is disabled or not. Disabled means that the constraint is not active in subsequent dynamics realization
      # Constraint function of generalized coordinates (to be specified) used to evaluate the constraint errors and their derivatives, and must valid to at least 2nd order. Constraint function must evaluate to zero when coordinates satisfy constraint
      coupled_coordinates_function: SimmSpline: x=(-1.7453 1.7453) y=(-0.9704 0.9704)
    CoordinateCouplerConstraint L4_L5_IVDjnt_r3_con: independent_coordinate_names=flex_extension
        dependent_coordinate_name=L4_L5_IVDjnt_r3 scale_factor=1
        coupled_coordinates_function=LinearFunction(coefficients=0.144 0)
      # Flag indicating whether the constraint is disabled or not. Disabled means that the constraint is not active in subsequent dynamics realization
      # Constraint function of generalized coordinates (to be specified) used to evaluate the constraint errors and their derivatives, and must valid to at least 2nd order. Constraint function must evaluate to zero when coordinates satisfy constraint
    CoordinateCouplerConstraint L4_L5_IVD_rotjnt_r2_con: independent_coordinate_names=axial_rotation
        dependent_coordinate_name=L4_L5_IVD_rotjnt_r2 scale_factor=1
      # Flag indicating whether the constraint is disabled or not. Disabled means that the constraint is not active in subsequent dynamics realization
      # Constraint function of generalized coordinates (to be specified) used to evaluate the constraint errors and their derivatives, and must valid to at least 2nd order. Constraint function must evaluate to zero when coordinates satisfy constraint
      coupled_coordinates_function: PiecewiseLinearFunction f452: x=(-0.785398 0 0.785398) y=(-0.0331613 0 0.0331613)
    CoordinateCouplerConstraint L4_L5_IVD_bendjnt_r1_con: independent_coordinate_names=lat_bending
        dependent_coordinate_name=L4_L5_IVD_bendjnt_r1 scale_factor=1
      # Flag indicating whether the constraint is disabled or not. Disabled means that the constraint is not active in subsequent dynamics realization
      # Constraint function of generalized coordinates (to be specified) used to evaluate the constraint errors and their derivatives, and must valid to at least 2nd order. Constraint function must evaluate to zero when coordinates satisfy constraint
      coupled_coordinates_function: PiecewiseLinearFunction f61: x=(-1.01875 1.01875) y=(-0.184481 0.184481)
    CoordinateCouplerConstraint L3_L4_IVDjnt_r3_con: independent_coordinate_names=flex_extension
        dependent_coordinate_name=L3_L4_IVDjnt_r3 scale_factor=1
        coupled_coordinates_function=LinearFunction(coefficients=0.204745 0)
      # Flag indicating whether the constraint is disabled or not. Disabled means that the constraint is not active in subsequent dynamics realization
      # Constraint function of generalized coordinates (to be specified) used to evaluate the constraint errors and their derivatives, and must valid to at least 2nd order. Constraint function must evaluate to zero when coordinates satisfy constraint
    CoordinateCouplerConstraint L3_L4_IVD_rotjnt_r2_con: independent_coordinate_names=axial_rotation
        dependent_coordinate_name=L3_L4_IVD_rotjnt_r2 scale_factor=1
      # Flag indicating whether the constraint is disabled or not. Disabled means that the constraint is not active in subsequent dynamics realization
      # Constraint function of generalized coordinates (to be specified) used to evaluate the constraint errors and their derivatives, and must valid to at least 2nd order. Constraint function must evaluate to zero when coordinates satisfy constraint
      coupled_coordinates_function: PiecewiseLinearFunction f232: x=(-0.785398 0 0.785398) y=(-0.0331613 0 0.0331613)
    CoordinateCouplerConstraint L3_L4_IVD_bendjnt_r1_con: independent_coordinate_names=lat_bending
        dependent_coordinate_name=L3_L4_IVD_bendjnt_r1 scale_factor=1
      # Flag indicating whether the constraint is disabled or not. Disabled means that the constraint is not active in subsequent dynamics realization
      # Constraint function of generalized coordinates (to be specified) used to evaluate the constraint errors and their derivatives, and must valid to at least 2nd order. Constraint function must evaluate to zero when coordinates satisfy constraint
      coupled_coordinates_function: PiecewiseLinearFunction f51: x=(-1.01875 1.01875) y=(-0.249931 0.249931)
    CoordinateCouplerConstraint L2_L3_IVDjnt_r3_con: independent_coordinate_names=flex_extension
        dependent_coordinate_name=L2_L3_IVDjnt_r3 scale_factor=1
        coupled_coordinates_function=LinearFunction(coefficients=0.246618 0)
      # Flag indicating whether the constraint is disabled or not. Disabled means that the constraint is not active in subsequent dynamics realization
      # Constraint function of generalized coordinates (to be specified) used to evaluate the constraint errors and their derivatives, and must valid to at least 2nd order. Constraint function must evaluate to zero when coordinates satisfy constraint
    CoordinateCouplerConstraint L2_L3_IVD_rotjnt_r2_con: independent_coordinate_names=axial_rotation
        dependent_coordinate_name=L2_L3_IVD_rotjnt_r2 scale_factor=1
      # Flag indicating whether the constraint is disabled or not. Disabled means that the constraint is not active in subsequent dynamics realization
      # Constraint function of generalized coordinates (to be specified) used to evaluate the constraint errors and their derivatives, and must valid to at least 2nd order. Constraint function must evaluate to zero when coordinates satisfy constraint
      coupled_coordinates_function: PiecewiseLinearFunction f232: x=(-0.785398 0 0.785398) y=(-0.0261799 0 0.0261799)
    CoordinateCouplerConstraint L2_L3_IVD_bendjnt_r1_con: independent_coordinate_names=lat_bending
        dependent_coordinate_name=L2_L3_IVD_bendjnt_r1 scale_factor=1
      # Flag indicating whether the constraint is disabled or not. Disabled means that the constraint is not active in subsequent dynamics realization
      # Constraint function of generalized coordinates (to be specified) used to evaluate the constraint errors and their derivatives, and must valid to at least 2nd order. Constraint function must evaluate to zero when coordinates satisfy constraint
      coupled_coordinates_function: PiecewiseLinearFunction f41: x=(-1.01875 1.01875) y=(-0.254818 0.254818)
    CoordinateCouplerConstraint L1_L2_IVDjnt_r3_con: independent_coordinate_names=flex_extension
        dependent_coordinate_name=L1_L2_IVDjnt_r3 scale_factor=1
        coupled_coordinates_function=LinearFunction(coefficients=0.294182 0)
      # Flag indicating whether the constraint is disabled or not. Disabled means that the constraint is not active in subsequent dynamics realization
      # Constraint function of generalized coordinates (to be specified) used to evaluate the constraint errors and their derivatives, and must valid to at least 2nd order. Constraint function must evaluate to zero when coordinates satisfy constraint
    CoordinateCouplerConstraint L1_L2_IVD_rotjnt_r2_con: independent_coordinate_names=axial_rotation
        dependent_coordinate_name=L1_L2_IVD_rotjnt_r2 scale_factor=1
      # Flag indicating whether the constraint is disabled or not. Disabled means that the constraint is not active in subsequent dynamics realization
      # Constraint function of generalized coordinates (to be specified) used to evaluate the constraint errors and their derivatives, and must valid to at least 2nd order. Constraint function must evaluate to zero when coordinates satisfy constraint
      coupled_coordinates_function: PiecewiseLinearFunction f32: x=(-0.785398 0 0.785398) y=(-0.0226893 0 0.0226893)
    CoordinateCouplerConstraint L1_L2_IVD_bendjnt_r1_con: independent_coordinate_names=lat_bending
        dependent_coordinate_name=L1_L2_IVD_bendjnt_r1 scale_factor=1
      # Flag indicating whether the constraint is disabled or not. Disabled means that the constraint is not active in subsequent dynamics realization
      # Constraint function of generalized coordinates (to be specified) used to evaluate the constraint errors and their derivatives, and must valid to at least 2nd order. Constraint function must evaluate to zero when coordinates satisfy constraint
      coupled_coordinates_function: PiecewiseLinearFunction f31: x=(-1.01875 1.01875) y=(-0.191463 0.191463)
    CoordinateCouplerConstraint patellofemoral_knee_angle_r_con: independent_coordinate_names=knee_angle_r
        dependent_coordinate_name=knee_angle_r_beta scale_factor=1
        coupled_coordinates_function=LinearFunction(coefficients=-1 0)
      # Flag indicating whether the constraint is disabled or not. Disabled means that the constraint is not active in subsequent dynamics realization
      # Constraint function of generalized coordinates (to be specified) used to evaluate the constraint errors and their derivatives, and must valid to at least 2nd order. Constraint function must evaluate to zero when coordinates satisfy constraint
    CoordinateCouplerConstraint patellofemoral_knee_angle_l_con: independent_coordinate_names=knee_angle_l
        dependent_coordinate_name=knee_angle_l_beta scale_factor=1
        coupled_coordinates_function=LinearFunction(coefficients=-1 0)
      # Flag indicating whether the constraint is disabled or not. Disabled means that the constraint is not active in subsequent dynamics realization
      # Constraint function of generalized coordinates (to be specified) used to evaluate the constraint errors and their derivatives, and must valid to at least 2nd order. Constraint function must evaluate to zero when coordinates satisfy constraint
    CoordinateCouplerConstraint thorax_rot_con: independent_coordinate_names=axial_rotation
        dependent_coordinate_name=lumbar1_thorax_rot_y scale_factor=1
      # Flag indicating whether the constraint is disabled or not. Disabled means that the constraint is not active in subsequent dynamics realization
      # Constraint function of generalized coordinates (to be specified) used to evaluate the constraint errors and their derivatives, and must valid to at least 2nd order. Constraint function must evaluate to zero when coordinates satisfy constraint
      coupled_coordinates_function: PiecewiseLinearFunction f40: x=(-0.11 0 0.11) y=(-0.0226209 0 0.0226209)
  MarkerSet:
    Marker MAN: thorax (0 0 0.005667345)
    Marker XYP: thorax (0.09276748 -0.1786258 -0.002653344)
    Marker C7: thorax (-0.0755087 0.0548026 0)
    Marker T8: thorax (-0.1261051 -0.1714434 0)
    Marker PSRG: hand_l (0.003553921 0.003550684 -0.04314894)
    Marker PSUG: hand_l (-0.01513187 0.004171736 0.03200678)
    Marker ELG: humerus_l (0.02078903 -0.2964851 -0.03970443)
    Marker EMG: humerus_l (0.01175246 -0.3035264 0.04847237)
    Marker CLAVG: clavicle_l (-0.00835231 0.02714296 -0.09442141)
    Marker CLAVD: clavicle_r (-0.008967758 0.02786361 0.09387822)
    Marker SCAPGL: scapula_l (-0.08680842 0.008858523 0.05389324)
    Marker SCAPGH: scapula_l (-0.09640101 0.008303109 0.1259331)
    Marker SCAPDL: scapula_r (-0.0870083 0.007005932 -0.0519794)
    Marker SCAPDH: scapula_r (-0.09676478 0.006979078 -0.1239738)
    Marker ELD: humerus_r (0.02150369 -0.3116894 0.02196196)
    Marker EMD: humerus_r (0.01520238 -0.3102292 -0.06334433)
    Marker PSRD: hand_r (0.03072373 0.003588025 0.03058858)
    Marker PSUD: hand_r (-0.04265209 0.007638077 -0.0001679606)
    Marker MC2G: hand_l (-0.01135715 -0.08196054 -0.02498314)
    Marker MC5G: hand_l (-0.01633688 -0.06950009 0.04952254)
    Marker MC5D: hand_r (-0.05684778 -0.07851312 0.0235899)
    Marker MC2D: hand_r (0.02827356 -0.100292 0.02230308)
    Marker ACG: scapula_l (-0.01507981 0.01019865 0.004042534)
    Marker ACD: scapula_r (-0.01517223 0.008337174 -0.002472181)
    Marker MTRD: radius_r (0.01311358 -0.1878418 0.03794869)
    Marker MTRG: radius_l (0.01111982 -0.1859769 -0.03172745)
    Marker BHAG: humerus_l (0.05474112 -0.05997588 -0.03034572)
    Marker BHPG: humerus_l (-0.05474112 -0.05997588 -0.03034572)
    Marker BBAG: humerus_l (0.05474112 -0.1438636 -0.03034572)
    Marker BBPG: humerus_l (-0.05474112 -0.1438636 -0.03034572)
    Marker BHAD: humerus_r (0.05325912 -0.06024318 0.02819916)
    Marker BHPD: humerus_r (-0.04672605 -0.05963154 0.02963071)
    Marker BBAD: humerus_r (0.05325912 -0.1465876 0.02819916)
    Marker BBPD: humerus_r (-0.04672605 -0.1459756 0.02963071)
    Marker COTG: thorax (0.09021872 -0.2330207 -0.1051417)
    Marker COTD: thorax (0.09021872 -0.2330207 0.1051417)
    Marker SCAPDB: scapula_r (-0.117779 -0.0219491 -0.1073813)
    Marker SCAPGB: scapula_l (-0.1076014 -0.02874999 0.122267)
    Marker T12: thorax (-0.09556529 -0.3040404 0)
    Marker EASD: pelvis (0.01169377 0.01264125 0.1304638)
    Marker EASG: pelvis (0.01018296 0.01312266 -0.1325638)
    Marker EPSD: pelvis (-0.1574983 0.05161469 0.05318647)
    Marker EPSG: pelvis (-0.1574983 0.05161469 -0.05318647)
    Marker CMD: femur_r (0.004380796 -0.4659099 -0.04541492)
    Marker CLD: femur_r (-0.003949797 -0.4668597 0.0518069)
    Marker CMG: femur_l (0.01608103 -0.4671093 0.04692815)
    Marker CLG: femur_l (0.00295278 -0.4667966 -0.05433965)
    Marker MMD: tibia_r (0 -0.4898957 -0.03716775)
    Marker MMG: tibia_l (0 -0.5041139 0.03744462)
    Marker MLD: tibia_r (0 -0.5116469 0.05022669)
    Marker MLG: tibia_l (0 -0.5264964 -0.05060084)
    Marker CALG: talus_l (-0.06437151 -0.01526645 0.004423077)
    Marker CALD: talus_r (-0.07388387 -0.01576989 0.006802693)
    Marker MT1G: toes_l (0.02966781 0.01766837 0.04360969)
    Marker MT5D: toes_r (-0.0166762 0.01438193 0.06728682)
    Marker MT1D: toes_r (0.01981465 0.01732979 -0.03776255)
    Marker FHAG: femur_l (0.04190303 -0.191845 -0.1086921)
    Marker FHPG: femur_l (-0.02478528 -0.2039088 -0.107831)
    Marker FBAG: femur_l (0.04667944 -0.2900451 -0.09380593)
    Marker FBPG: femur_l (-0.02206729 -0.2938157 -0.09341201)
    Marker FHAD: femur_r (0.04268971 -0.1795271 0.08712731)
    Marker FHPD: femur_r (-0.0483025 -0.1683771 0.09039268)
    Marker FBAD: femur_r (0.03761334 -0.2789283 0.07802637)
    Marker FBPD: femur_r (-0.009819034 -0.2544854 0.08109285)
    Marker MT5G: toes_l (-0.009312536 0.01924794 -0.06320973)
    Marker MTCALG: talus_l (-0.0493829 0.02006419 0.004550526)
    Marker MTCALD: talus_r (-0.05740861 0.02319753 0.00551733)
    Marker MTBassin: pelvis (-0.04504588 0.1126936 0.1564457)
    Marker L5: lumbar5 (-0.05724294 0.02132479 0.001057666)
    Marker TFIBD: tibia_r (-0.02430168 -0.0807566 0.0564337)
    Marker TFIBG: tibia_l (-0.0003246044 -0.08548246 -0.05654847)
    Marker MTPD: toes_r (-0.05066624 0.03275662 0.02710312)
    Marker MTPG: toes_l (-0.04978451 0.03218657 0.02710312)
    Marker PATG: patella_l (0.02093255 0.0275891 -0.001294064)
    Marker PATD: patella_r (0.02184905 0.02825579 -0.001350722)
    Marker THAD: tibia_r (0.04598344 -0.2484732 0.06441422)
    Marker THPD: tibia_r (-0.01600303 -0.2448318 0.07339908)
    Marker TBPD: tibia_r (-0.01744795 -0.3323845 0.07554215)
    Marker TBAD: tibia_r (0.04598344 -0.3323845 0.07554215)
    Marker THAG: tibia_l (0.04632598 -0.2556846 -0.06489406)
    Marker THPG: tibia_l (-0.01612224 -0.2519375 -0.07394585)
    Marker TBPG: tibia_l (-0.01757792 -0.3420313 -0.07610488)
    Marker TBAG: tibia_l (0.04632598 -0.3420313 -0.07610488)
    Marker TMPD: skull (0.0790568 0.0691384 0.0778537)
    Marker TMPG: skull (0.0790568 0.0691384 -0.0778537)
    Marker OCCD: skull (-0.0602817 0.0777622 0.0845366)
    Marker OCCG: skull (-0.0602817 0.0777622 -0.0845366)
    Marker MTTETE: skull (0.0153504 0.090931 -0.0991849)
