# OpenSim document version 30000
Model IBHGC_scaled_avec_V1:
  length_units: meters
  force_units: N
  gravity: 0 0 -9.80665
  credits:
    Model constructed by Ricardo Matias and Ajay Seth. Scapulothoracic joint developed by Seth et al. [1]; segment dimensions and joint locations were obtained from Holzbaur et al. [2], and segment inertial properties obtained from Breteler et al. [3]
  publications:
    [1] Seth A, Matias R, Veloso A, Delp SL. A biomechanical model of the scapulothoracic joint to accurately capture scapula_r kinematics during shoulder movements. PLoS One. 2015. [2] Holzbaur KRS, Murray WM, Delp SL. A Model of the Upper Extremity for Simulating Musculoskeletal Surgery and Analyzing Neuromuscular Control. Ann Biomed Eng 33:829–840. 2005. [3] Breteler KMD, Spoor CW, Van der Helm FC. Measuring muscle and joint geometry parameters of a shoulder for modeling purposes. J Biomech 32:1191–7. 1999.
  BodySet:
    Body ground: mass=0 mass_center=(0 0 0) inertia_xx=0 inertia_yy=0 inertia_zz=0
    Body pelvis: mass=9.132044 mass_center=(-0.0839317 0 0) inertia_xx=0.09286151 inertia_yy=0.09286151
        inertia_zz=0.05643592 meshes=(r_pelvis.vtp l_pelvis.vtp sacrum.vtp)
      CustomJoint ground_pelvis: parent_body=ground location_in_parent=(0 0 0) location=(0 0 0)
        Coordinate pelvis_tilt: motion_type=rotational default_value=0 range=(-1.570796 1.570796) clamped=true
        Coordinate pelvis_list: motion_type=rotational default_value=0 range=(-1.570796 1.570796) clamped=true
        Coordinate pelvis_rotation: motion_type=rotational default_value=0 range=(-1.570796 1.570796) clamped=true
        Coordinate pelvis_tx: motion_type=translational default_value=0 range=(-5 5) clamped=true
        Coordinate pelvis_ty: motion_type=translational default_value=0.93 range=(-1 2) clamped=true
        Coordinate pelvis_tz: motion_type=translational default_value=0 range=(-3 3) clamped=true
        SpatialTransform:
          TransformAxis rotation1: coordinates=pelvis_tilt axis=(0 0 1) LinearFunction(coefficients=1 0)
          TransformAxis rotation2: coordinates=pelvis_list axis=(1 0 0) LinearFunction(coefficients=1 0)
          TransformAxis rotation3: coordinates=pelvis_rotation axis=(0 1 0) LinearFunction(coefficients=1 0)
          TransformAxis translation1: coordinates=pelvis_tx axis=(1 0 0) LinearFunction(coefficients=1 0)
          TransformAxis translation2: coordinates=pelvis_ty axis=(0 1 0) LinearFunction(coefficients=1 0)
          TransformAxis translation3: coordinates=pelvis_tz axis=(0 0 1) LinearFunction(coefficients=1 0)
      WrapCylinder Gmax1_at_pelvis_r: xyz_body_rotation=(-0.6 0.45 0) translation=(-0.0914107 -0.104827 0.0648113)
          quadrant=-x radius=0.04449048 length=0.1629516
      WrapCylinder Gmax2_at_pelvis_r: xyz_body_rotation=(-0.75 0.39 0) translation=(-0.0949722 -0.0878851 0.0722486)
          quadrant=all radius=0.04460803 length=0.1080035
      WrapCylinder Gmax3_at_pelvis_r: xyz_body_rotation=(-0.1 0 0) translation=(-0.0985337 -0.0931793 0.0722486)
          quadrant=all radius=0.04492095 length=0.1062444
      WrapCylinder Gmax1_at_pelvis_l: xyz_body_rotation=(0.6 -0.45 0) translation=(-0.0914107 -0.104827 -0.0648113)
          quadrant=-x radius=0.04449048 length=0.1629516
      WrapCylinder Gmax2_at_pelvis_l: xyz_body_rotation=(0.75 -0.39 0) translation=(-0.0949722 -0.0878851 -0.0722486)
          quadrant=all radius=0.04460803 length=0.1080035
      WrapCylinder Gmax3_at_pelvis_l: xyz_body_rotation=(0.1 0 0) translation=(-0.0985337 -0.0931793 -0.0722486)
          quadrant=all radius=0.04492095 length=0.1062444
      WrapCylinder PS_at_brim_r: xyz_body_rotation=(-0.25 -0.27 0.1) translation=(-0.0878493 -0.0635314 0.0696987)
          quadrant=-y radius=0.05594899 length=0.1071682
      WrapCylinder PS_at_brim_l: xyz_body_rotation=(0.25 0.27 0.1) translation=(-0.0878493 -0.0635314 -0.0696987)
          quadrant=-y radius=0.05594899 length=0.1071682
      WrapCylinder IL_at_brim_r: xyz_body_rotation=(-0.32 -0.24 0.9) translation=(-0.0842878 -0.0688256 0.0803235)
          quadrant=-y radius=0.06156561 length=0.106962
      WrapCylinder IL_at_brim_l: xyz_body_rotation=(0.32 0.24 0.9) translation=(-0.0842878 -0.0688256 -0.0803235)
          quadrant=-y radius=0.06156561 length=0.106962
    Body femur_r: mass=7.21243 mass_center=(0 -0.174042 0) inertia_xx=0.1069614 inertia_yy=0.02480191
        inertia_zz=0.1069614 meshes=femur_r.vtp
      CustomJoint hip_r: parent_body=pelvis location_in_parent=(-0.08393168 -0.06999043 0.08871707) location=(0 0 0)
        Coordinate hip_flexion_r: motion_type=rotational default_value=0 range=(-2.094395 2.094395) clamped=true
        Coordinate hip_adduction_r: motion_type=rotational default_value=0 range=(-2.094395 2.094395) clamped=true
        Coordinate hip_rotation_r: motion_type=rotational default_value=0 range=(-2.094395 2.094395) clamped=true
        SpatialTransform: axes_held_at_zero=(translation1 translation2 translation3)
          TransformAxis rotation1: coordinates=hip_flexion_r axis=(0 0 1) LinearFunction(coefficients=1 0)
          TransformAxis rotation2: coordinates=hip_adduction_r axis=(1 0 0) LinearFunction(coefficients=1 0)
          TransformAxis rotation3: coordinates=hip_rotation_r axis=(0 1 0) LinearFunction(coefficients=1 0)
    Body patella_r: mass=0.06684064 mass_center=(0.00169004 0.0265834 0) inertia_xx=2.104007e-6 inertia_yy=9.032675e-6
        inertia_zz=9.032675e-6 meshes=r_patella.vtp
      CustomJoint patellofemoral_r: parent_body=femur_r location_in_parent=(0 0 0) location=(0 0 0)
        Coordinate knee_angle_beta: motion_type=rotational default_value=0 range=(-99999.9 99999.9) clamped=false
        SpatialTransform: axes_held_at_zero=(rotation2 rotation3 translation3)
          TransformAxis rotation1: coordinates=knee_angle_beta axis=(0 0 1)
            SimmSpline f11: x=(0 0.174533 0.349066 0.523599 0.698132 0.872665 1.0472 1.22173 1.39626 1.5708 1.74533 1.91986 2.0944)
                y=(0.00113686 -0.00629212 -0.105582 -0.253683 -0.414245 -0.579047 -0.747244 -0.91799 -1.09044 -1.26379 -1.43763 -1.61186 -1.78634)
          TransformAxis translation1: coordinates=knee_angle_beta axis=(1 0 0)
            MultiplierFunction: scale=0.954602
              SimmSpline f9: x=(0 0.174533 0.349066 0.523599 0.698132 0.872665 1.0472 1.22173 1.39626 1.5708 1.74533 1.91986 2.0944)
                  y=(0.04435 0.040692 0.035581 0.029012 0.021473 0.013523 0.005483 -0.002412 -0.009959 -0.016903 -0.022926 -0.027739 -0.030815)
          TransformAxis translation2: coordinates=knee_angle_beta axis=(0 1 0)
            MultiplierFunction: scale=1.023776
              SimmSpline f10: x=(0 0.174533 0.349066 0.523599 0.698132 0.872665 1.0472 1.22173 1.39626 1.5708 1.74533 1.91986 2.0944)
                  y=(-0.418712 -0.426965 -0.43422 -0.440152 -0.444617 -0.447495 -0.448724 -0.448337 -0.446353 -0.442826 -0.438035 -0.432448 -0.426632)
    Body tibia_r: mass=2.874845 mass_center=(0 -0.216261 0) inertia_xx=0.05157305 inertia_yy=0.003580308
        inertia_zz=0.05157305 meshes=(tibia_r.vtp fibula_r.vtp)
      CustomJoint knee_r: parent_body=femur_r location_in_parent=(0 0 0) location=(0 0 0)
        Coordinate knee_angle_r: motion_type=rotational default_value=0 range=(-2.094395 0.1745329) clamped=true
        SpatialTransform: axes_held_at_zero=(rotation2 rotation3 translation3)
          TransformAxis rotation1: coordinates=knee_angle_r axis=(0 0 1) LinearFunction(coefficients=1 0)
          TransformAxis translation1: coordinates=knee_angle_r axis=(1 0 0)
            MultiplierFunction: scale=0.954602
              SimmSpline: x=(-2.0944 -1.74533 -1.39626 -1.0472 -0.698132 -0.349066 -0.174533 0.197344 0.337395 0.490178 1.52146 2.0944)
                  y=(-0.0032 0.00179 0.00411 0.0041 0.00212 -0.001 -0.0031 -0.005227 -0.005435 -0.005574 -0.005435 -0.00525)
          TransformAxis translation2: coordinates=knee_angle_r axis=(0 1 0)
            MultiplierFunction: scale=1.023776
              SimmSpline: x=(-2.0944 -1.22173 -0.523599 -0.349066 -0.174533 0.159149 2.0944)
                  y=(-0.4226 -0.4082 -0.399 -0.3976 -0.3966 -0.395264 -0.396)
    Body talus_r: mass=0.07754134 mass_center=(0 0 0) inertia_xx=0.001073059 inertia_yy=0.0008722275
        inertia_zz=0.001073059 meshes=talus_rv.vtp
      CustomJoint ankle_r: parent_body=tibia_r location_in_parent=(0 -0.4980821 0) location=(0 0 0)
        Coordinate ankle_angle_r: motion_type=rotational default_value=0 range=(-1.570796 1.570796) clamped=true
        SpatialTransform: axes_held_at_zero=(rotation2 rotation3 translation1 translation2 translation3)
          TransformAxis rotation1: coordinates=ankle_angle_r axis=(-0.1050135 -0.1740224 0.9791263)
              LinearFunction(coefficients=1 0)
    Body calcn_r: mass=0.9692668 mass_center=(0.109302 0.0327905 0) inertia_xx=0.001356841 inertia_yy=0.003642828
        inertia_zz=0.003642828 meshes=foot.vtp
      CustomJoint subtalar_r: parent_body=talus_r location_in_parent=(-0.05330649 -0.0458521 0.009056605)
          location=(0 0 0)
        Coordinate subtalar_angle_r: motion_type=rotational default_value=0 range=(-1.570796 1.570796) clamped=true
            locked=true
        SpatialTransform: axes_held_at_zero=(rotation2 rotation3 translation1 translation2 translation3)
          TransformAxis rotation1: coordinates=subtalar_angle_r axis=(0.7871796 0.6047475 -0.1209495)
              LinearFunction(coefficients=1 0)
    Body toes_r: mass=0.1679545 mass_center=(0.0378184 0.0065581 -0.0200115) inertia_xx=9.691721e-5
        inertia_yy=0.0001874152 inertia_zz=0.0001874152 meshes=bofoot.vtp
      CustomJoint mtp_r: parent_body=calcn_r location_in_parent=(0.1954316 -0.002186036 0.001234992) location=(0 0 0)
        Coordinate mtp_angle_r: motion_type=rotational default_value=0 range=(-1.570796 1.570796) clamped=true
            locked=true
        SpatialTransform: axes_held_at_zero=(rotation2 rotation3 translation1 translation2 translation3)
          TransformAxis rotation1: coordinates=mtp_angle_r axis=(-0.5809544 0 0.8139361)
              LinearFunction(coefficients=1 0)
    Body femur_l: mass=7.21243 mass_center=(0 -0.180067 0) inertia_xx=0.1147971 inertia_yy=0.02715146
        inertia_zz=0.1147971 meshes=femur_l.vtp
      CustomJoint hip_l: parent_body=pelvis location_in_parent=(-0.08393168 -0.06999043 -0.08871707) location=(0 0 0)
        Coordinate hip_flexion_l: motion_type=rotational default_value=0 range=(-2.094395 2.094395) clamped=true
        Coordinate hip_adduction_l: motion_type=rotational default_value=0 range=(-2.094395 2.094395) clamped=true
        Coordinate hip_rotation_l: motion_type=rotational default_value=0 range=(-2.094395 2.094395) clamped=true
        SpatialTransform: axes_held_at_zero=(translation1 translation2 translation3)
          TransformAxis rotation1: coordinates=hip_flexion_l axis=(0 0 1) LinearFunction(coefficients=1 0)
          TransformAxis rotation2: coordinates=hip_adduction_l axis=(-1 0 0) LinearFunction(coefficients=1 0)
          TransformAxis rotation3: coordinates=hip_rotation_l axis=(0 -1 0) LinearFunction(coefficients=1 0)
    Body patella_l: mass=0.06684064 mass_center=(0.00179999 0.0279969 0) inertia_xx=2.360037e-6 inertia_yy=1.023284e-5
        inertia_zz=1.023284e-5 meshes=l_patella.vtp
      CustomJoint patellofemoral_l: parent_body=femur_l location_in_parent=(0 0 0) location=(0 0 0)
        Coordinate knee_angle_l_beta: motion_type=rotational default_value=0 range=(-99999.9 99999.9) clamped=false
        SpatialTransform: axes_held_at_zero=(rotation2 rotation3 translation3)
          TransformAxis rotation1: coordinates=knee_angle_l_beta axis=(0 0 1)
            SimmSpline f25: x=(0 0.174533 0.349066 0.523599 0.698132 0.872665 1.0472 1.22173 1.39626 1.5708 1.74533 1.91986 2.0944)
                y=(0.00113686 -0.00629212 -0.105582 -0.253683 -0.414245 -0.579047 -0.747244 -0.91799 -1.09044 -1.26379 -1.43763 -1.61186 -1.78634)
          TransformAxis translation1: coordinates=knee_angle_l_beta axis=(1 0 0)
            MultiplierFunction: scale=0.998795
              SimmSpline f23: x=(0 0.174533 0.349066 0.523599 0.698132 0.872665 1.0472 1.22173 1.39626 1.5708 1.74533 1.91986 2.0944)
                  y=(0.04435 0.040692 0.035581 0.029012 0.021473 0.013523 0.005483 -0.002412 -0.009959 -0.016903 -0.022926 -0.027739 -0.030815)
          TransformAxis translation2: coordinates=knee_angle_l_beta axis=(0 1 0)
            MultiplierFunction: scale=1.05922
              SimmSpline f24: x=(0 0.174533 0.349066 0.523599 0.698132 0.872665 1.0472 1.22173 1.39626 1.5708 1.74533 1.91986 2.0944)
                  y=(-0.418712 -0.426965 -0.43422 -0.440152 -0.444617 -0.447495 -0.448724 -0.448337 -0.446353 -0.442826 -0.438035 -0.432448 -0.426632)
    Body tibia_l: mass=2.874845 mass_center=(0 -0.210146 0) inertia_xx=0.04901758 inertia_yy=0.004020067
        inertia_zz=0.04901758 meshes=(tibia_l.vtp fibula_l.vtp)
      CustomJoint knee_l: parent_body=femur_l location_in_parent=(0 0 0) location=(0 0 0)
        Coordinate knee_angle_l: motion_type=rotational default_value=0 range=(-2.094395 0.1745329) clamped=true
        SpatialTransform: axes_held_at_zero=(rotation2 rotation3 translation3)
          TransformAxis rotation1: coordinates=knee_angle_l axis=(0 0 1) LinearFunction(coefficients=1 0)
          TransformAxis translation1: coordinates=knee_angle_l axis=(1 0 0)
            MultiplierFunction: scale=0.998795
              SimmSpline: x=(-2.0944 -1.74533 -1.39626 -1.0472 -0.698132 -0.349066 -0.174533 0.197344 0.337395 0.490178 1.52146 2.0944)
                  y=(-0.0032 0.00179 0.00411 0.0041 0.00212 -0.001 -0.0031 -0.005227 -0.005435 -0.005574 -0.005435 -0.00525)
          TransformAxis translation2: coordinates=knee_angle_l axis=(0 1 0)
            MultiplierFunction: scale=1.05922
              SimmSpline: x=(-2.0944 -1.22173 -0.523599 -0.349066 -0.174533 0.159149 2.0944)
                  y=(-0.4226 -0.4082 -0.399 -0.3976 -0.3966 -0.395264 -0.396)
    Body talus_l: mass=0.07754134 mass_center=(0 0 0) inertia_xx=0.0009774166 inertia_yy=0.0008214156
        inertia_zz=0.0009774166 meshes=talus_lv.vtp
      CustomJoint ankle_l: parent_body=tibia_l location_in_parent=(0 -0.4839992 0) location=(0 0 0)
        Coordinate ankle_angle_l: motion_type=rotational default_value=0 range=(-1.047198 1.047198) clamped=true
        SpatialTransform: axes_held_at_zero=(rotation2 rotation3 translation1 translation2 translation3)
          TransformAxis rotation1: coordinates=ankle_angle_l axis=(0.1050135 0.1740224 0.9791263)
              LinearFunction(coefficients=1 0)
    Body calcn_l: mass=0.9692668 mass_center=(0.106306 0.0318919 0) inertia_xx=0.001252436 inertia_yy=0.00343037
        inertia_zz=0.00343037 meshes=l_foot.vtp
      CustomJoint subtalar_l: parent_body=talus_l location_in_parent=(-0.05184559 -0.0445955 -0.008595284)
          location=(0 0 0)
        Coordinate subtalar_angle_l: motion_type=rotational default_value=0 range=(-1.570796 1.570796) clamped=true
            locked=true
        SpatialTransform: axes_held_at_zero=(rotation2 rotation3 translation1 translation2 translation3)
          TransformAxis rotation1: coordinates=subtalar_angle_l axis=(-0.7871796 -0.6047475 -0.1209495)
              LinearFunction(coefficients=1 0)
    Body toes_l: mass=0.1679545 mass_center=(0.036782 0.00637838 0.0189921) inertia_xx=8.94597e-5
        inertia_yy=0.0001761745 inertia_zz=0.0001761745 meshes=l_bofoot.vtp
      CustomJoint mtp_l: parent_body=calcn_l location_in_parent=(0.1900757 -0.002126126 -0.001172084) location=(0 0 0)
        Coordinate mtp_angle_l: motion_type=rotational default_value=0 range=(-1.047198 1.047198) clamped=true
            locked=true
        SpatialTransform: axes_held_at_zero=(rotation2 rotation3 translation1 translation2 translation3)
          TransformAxis rotation1: coordinates=mtp_angle_l axis=(0.5809544 0 0.8139361)
              LinearFunction(coefficients=1 0)
    Body lumbar5: mass=1.414354 mass_center=(0.0205023 0.0180476 0) inertia_xx=0.1386553 inertia_yy=0.02488839
        inertia_zz=0.1386553 meshes=lumbar5.vtp
      CustomJoint L5_S1_IVDjnt: parent_body=pelvis location_in_parent=(-0.1163409 0.07517883 0) location=(0 0 0)
        Coordinate L5_S1_flex_extension: motion_type=rotational default_value=0 range=(-0.1745 0.1745) clamped=true
        Coordinate L5_S1_lat_bending: motion_type=rotational default_value=0 range=(-0.1745 0.1745) clamped=true
        Coordinate L5_S1_axial_rotation: motion_type=rotational default_value=0 range=(-0.1745 0.1745) clamped=true
        SpatialTransform: axes_held_at_zero=(translation1 translation2 translation3)
          TransformAxis rotation1: coordinates=L5_S1_flex_extension axis=(0 0 1)
              LinearFunction(coefficients=0.0889273 0)
          TransformAxis rotation2: coordinates=L5_S1_lat_bending axis=(1 0 0)
              PiecewiseLinearFunction(x=-1.01875 1.01875, y=-0.138056 0.138056)
          TransformAxis rotation3: coordinates=L5_S1_axial_rotation axis=(0 1 0)
            SimmSpline: x=(-0.97913 0 0.97913) y=(-0.0296706 0 0.0279253)
    Body lumbar4: mass=1.394969 mass_center=(0.0220685 0.0214946 0) inertia_xx=0.1331652 inertia_yy=0.02368769
        inertia_zz=0.1331652 meshes=lumbar4.vtp
      CustomJoint L4_L5_IVDjnt: parent_body=lumbar5 location_in_parent=(0.01186477 0.02919163 0)
          location=(0.001186477 -0.002465509 0)
        Coordinate L4_L5_IVDjnt_r3: motion_type=rotational default_value=0 range=(-0.1745 0.1745) clamped=false
        Coordinate L4_L5_IVD_bendjnt_r1: motion_type=rotational default_value=0 range=(-0.1745 0.1745) clamped=false
        Coordinate L4_L5_IVD_rotjnt_r2: motion_type=rotational default_value=0 range=(-0.1745 0.1745) clamped=false
        SpatialTransform: axes_held_at_zero=(translation1 translation2 translation3)
          TransformAxis rotation1: coordinates=L4_L5_IVDjnt_r3 axis=(0 0 1) LinearFunction(coefficients=1 0)
          TransformAxis rotation2: coordinates=L4_L5_IVD_bendjnt_r1 axis=(1 0 0) LinearFunction(coefficients=1 0)
          TransformAxis rotation3: coordinates=L4_L5_IVD_rotjnt_r2 axis=(0 1 0) LinearFunction(coefficients=1 0)
    Body lumbar3: mass=1.29494 mass_center=(0.0212307 0.0229528 0) inertia_xx=0.1228256 inertia_yy=0.02280741
        inertia_zz=0.1228256 meshes=lumbar3.vtp
      CustomJoint L3_L4_IVDjnt: parent_body=lumbar4 location_in_parent=(0 0.03155852 0)
          location=(-0.0007118862 -0.001183444 0)
        Coordinate L3_L4_IVDjnt_r3: motion_type=rotational default_value=0 range=(-0.1745 0.1745) clamped=false
        Coordinate L3_L4_IVD_bendjnt_r1: motion_type=rotational default_value=0 range=(-0.1745 0.1745) clamped=false
        Coordinate L3_L4_IVD_rotjnt_r2: motion_type=rotational default_value=0 range=(-0.1745 0.1745) clamped=false
        SpatialTransform: axes_held_at_zero=(translation1 translation2 translation3)
          TransformAxis rotation1: coordinates=L3_L4_IVDjnt_r3 axis=(0 0 1) LinearFunction(coefficients=1 0)
          TransformAxis rotation2: coordinates=L3_L4_IVD_bendjnt_r1 axis=(1 0 0) LinearFunction(coefficients=1 0)
          TransformAxis rotation3: coordinates=L3_L4_IVD_rotjnt_r2 axis=(0 1 0) LinearFunction(coefficients=1 0)
    Body lumbar2: mass=1.309673 mass_center=(0.029954 0.0199335 0) inertia_xx=0.127006 inertia_yy=0.02517214
        inertia_zz=0.127006 meshes=lumbar2.vtp
      CustomJoint L2_L3_IVD_jnt: parent_body=lumbar3 location_in_parent=(-0.009491816 0.03076955 0)
          location=(-0.00154242 -0.003846194 0)
        Coordinate L2_L3_IVDjnt_r3: motion_type=rotational default_value=0 range=(-0.1745 0.1745) clamped=false
        Coordinate L2_L3_IVD_bendjnt_r1: motion_type=rotational default_value=0 range=(-0.1745 0.1745) clamped=false
        Coordinate L2_L3_IVD_rotjnt_r2: motion_type=rotational default_value=0 range=(-0.1745 0.1745) clamped=false
        SpatialTransform: axes_held_at_zero=(translation1 translation2 translation3)
          TransformAxis rotation1: coordinates=L2_L3_IVDjnt_r3 axis=(0 0 1) LinearFunction(coefficients=1 0)
          TransformAxis rotation2: coordinates=L2_L3_IVD_bendjnt_r1 axis=(1 0 0) LinearFunction(coefficients=1 0)
          TransformAxis rotation3: coordinates=L2_L3_IVD_rotjnt_r2 axis=(0 1 0) LinearFunction(coefficients=1 0)
    Body lumbar1: mass=1.300368 mass_center=(0.0388453 0.0191396 0.0016546) inertia_xx=0.1273918 inertia_yy=0.02764194
        inertia_zz=0.1273918 meshes=lumbar1.vtp
      CustomJoint L1_L2_IVD_jnt: parent_body=lumbar2 location_in_parent=(-0.01186477 0.02465509 0)
          location=(0.001661068 -0.003747574 0)
        Coordinate L1_L2_IVDjnt_r3: motion_type=rotational default_value=0 range=(-0.1745 0.1745) clamped=false
        Coordinate L1_L2_IVD_bendjnt_r1: motion_type=rotational default_value=0 range=(-0.1745 0.1745) clamped=false
        Coordinate L1_L2_IVD_rotjnt_r2: motion_type=rotational default_value=0 range=(-0.1745 0.1745) clamped=false
        SpatialTransform: axes_held_at_zero=(translation1 translation2 translation3)
          TransformAxis rotation1: coordinates=L1_L2_IVDjnt_r3 axis=(0 0 1) LinearFunction(coefficients=0.85 0)
          TransformAxis rotation2: coordinates=L1_L2_IVD_bendjnt_r1 axis=(1 0 0) LinearFunction(coefficients=1 0)
          TransformAxis rotation3: coordinates=L1_L2_IVD_rotjnt_r2 axis=(0 1 0) LinearFunction(coefficients=1 0)
    Body thorax: mass=15.50827 mass_center=(-0.0974513 -0.180569 0) inertia_xx=1.610376 inertia_yy=0.8800843
        inertia_zz=1.610376
        meshes=(thorax.vtp thoracic12_s.vtp thoracic11_s.vtp thoracic10_s.vtp thoracic9_s.vtp thoracic8_s.vtp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)
      CustomJoint lumb_thorax: parent_body=lumbar1 location_in_parent=(-0.01823259 0.03344414 0)
          location=(-0.06595691 -0.303783 0)
        Coordinate lumb_thorax_rot_x: motion_type=rotational default_value=0 range=(-1.570796 1.570796) clamped=true
        Coordinate lumb_thorax_rot_y: motion_type=rotational default_value=0 range=(-1.570796 1.570796) clamped=true
        Coordinate lumb_thorax_rot_z: motion_type=rotational default_value=0 range=(-1.570796 1.570796) clamped=true
        Coordinate lumb_thorax_tx: motion_type=translational default_value=0 range=(-1 1) clamped=false locked=true
        Coordinate lumb_thorax_ty: motion_type=translational default_value=0 range=(-1 1) clamped=false locked=true
        Coordinate lumb_thorax_tz: motion_type=translational default_value=0 range=(-1 1) clamped=false locked=true
        SpatialTransform:
          TransformAxis rotation1: coordinates=lumb_thorax_rot_x axis=(1 0 0) LinearFunction(coefficients=1 0)
          TransformAxis rotation2: coordinates=lumb_thorax_rot_y axis=(0 1 0) LinearFunction(coefficients=1 0)
          TransformAxis rotation3: coordinates=lumb_thorax_rot_z axis=(0 0 1) LinearFunction(coefficients=1 0)
          TransformAxis translation1: coordinates=lumb_thorax_tx axis=(1 0 0) LinearFunction(coefficients=1 0)
          TransformAxis translation2: coordinates=lumb_thorax_ty axis=(0 1 0) LinearFunction(coefficients=1 0)
          TransformAxis translation3: coordinates=lumb_thorax_tz axis=(0 0 1) LinearFunction(coefficients=1 0)
      WrapEllipsoid ScapulothoracicEllipsoid: translation=(-0.0329785 -0.0210218 0.0758778) quadrant=all
          dimensions=(0.115425 0.18227 0.0872159)
      WrapEllipsoid ScapulothoracicEllipsoid_l: translation=(-0.0329785 -0.0210218 -0.0758778) quadrant=all
          dimensions=(0.115425 0.18227 0.0872159)
    Body cerv_7: mass=0.4529071 mass_center=(0.0357957 0.00162623 0) inertia_xx=0.01488592 inertia_yy=0.07888986
        inertia_zz=0.07888986 meshes=cerv7.vtp
      CustomJoint C7_T1_joint: parent_body=thorax location_in_parent=(-0.07420152 0.04252962 0) location=(0 0 0)
        Coordinate C7_T1_flex_extension: motion_type=rotational default_value=0 range=(-0.5759587 0.837758)
            clamped=true
        Coordinate C7_T1_lat_bending: motion_type=rotational default_value=0 range=(-0.5759587 0.5759587) clamped=true
        Coordinate C7_T1_axial_rotation: motion_type=rotational default_value=0 range=(-0.4712389 0.4712389)
            clamped=true
        SpatialTransform: axes_held_at_zero=(translation1 translation2 translation3)
          TransformAxis rotation1: coordinates=C7_T1_flex_extension axis=(0 0 1)
            SimmSpline: x=(-1.74533 1.74533) y=(-0.172788 0.172788)
          TransformAxis rotation2: coordinates=C7_T1_lat_bending axis=(1 0 0)
            SimmSpline: x=(-1.74533 1.74533) y=(-0.136136 0.136136)
          TransformAxis rotation3: coordinates=C7_T1_axial_rotation axis=(0 1 0)
            SimmSpline: x=(-1.74533 1.74533) y=(-0.109956 0.109956)
    Body cerv_6: mass=0.3937153 mass_center=(0.0357957 0.00162623 0) inertia_xx=0.01488592 inertia_yy=0.07888986
        inertia_zz=0.07888986 meshes=cerv6.vtp
      CustomJoint C6_C7_joint: parent_body=cerv_7 location_in_parent=(0.01520857 0.0105962 0)
          location=(0.01080639 -0.003479287 0)
        Coordinate C6_C7_flex_extension: motion_type=rotational default_value=0 range=(-1.22173 0.4537856) clamped=true
        Coordinate C6_C7_lat_bending: motion_type=rotational default_value=0 range=(-0.4363323 0.4363323) clamped=true
        Coordinate C6_C7_axial_rotation: motion_type=rotational default_value=0 range=(-0.9791297 0.9791297)
            clamped=true
        SpatialTransform: axes_held_at_zero=(translation1 translation2 translation3)
          TransformAxis rotation1: coordinates=C6_C7_flex_extension axis=(0 0 1) LinearFunction(coefficients=1 0)
          TransformAxis rotation2: coordinates=C6_C7_lat_bending axis=(1 0 0) LinearFunction(coefficients=1 0)
          TransformAxis rotation3: coordinates=C6_C7_axial_rotation axis=(0 1 0) LinearFunction(coefficients=1 0)
    Body cerv_5: mass=0.3327299 mass_center=(0.0357957 0.00162623 0) inertia_xx=0.01488592 inertia_yy=0.07888986
        inertia_zz=0.07888986 meshes=cerv5.vtp
      CustomJoint C5_C6_joint: parent_body=cerv_6 location_in_parent=(0.01130088 0.008345153 0)
          location=(0.006505176 -0.006975692 0)
        Coordinate C5_C6_flex_extension: motion_type=rotational default_value=0 range=(-1.22173 0.4537856) clamped=true
        Coordinate C5_C6_lat_bending: motion_type=rotational default_value=0 range=(-0.4363323 0.4363323) clamped=true
        Coordinate C5_C6_axial_rotation: motion_type=rotational default_value=0 range=(-0.9791297 0.9791297)
            clamped=true
        SpatialTransform: axes_held_at_zero=(translation1 translation2 translation3)
          TransformAxis rotation1: coordinates=C5_C6_flex_extension axis=(0 0 1) LinearFunction(coefficients=1 0)
          TransformAxis rotation2: coordinates=C5_C6_lat_bending axis=(1 0 0) LinearFunction(coefficients=1 0)
          TransformAxis rotation3: coordinates=C5_C6_axial_rotation axis=(0 1 0) LinearFunction(coefficients=1 0)
    Body cerv_4: mass=0.3282455 mass_center=(0.0357957 0.00162623 0) inertia_xx=0.01488592 inertia_yy=0.07888986
        inertia_zz=0.07888986 meshes=cerv4.vtp
      CustomJoint C4_C5_joint: parent_body=cerv_5 location_in_parent=(0.009671717 0.006376553 0)
          location=(0.005759433 -0.0100313 0)
        Coordinate C4_C5_flex_extension: motion_type=rotational default_value=0 range=(-1.22173 0.4537856) clamped=true
        Coordinate C4_C5_lat_bending: motion_type=rotational default_value=0 range=(-0.4363323 0.4363323) clamped=true
        Coordinate C4_C5_axial_rotation: motion_type=rotational default_value=0 range=(-0.9791297 0.9791297)
            clamped=true
        SpatialTransform: axes_held_at_zero=(translation1 translation2 translation3)
          TransformAxis rotation1: coordinates=C4_C5_flex_extension axis=(0 0 1)
              LinearFunction(coefficients=0.0889273 0)
          TransformAxis rotation2: coordinates=C4_C5_lat_bending axis=(1 0 0)
              PiecewiseLinearFunction(x=-1.01875 1.01875, y=-0.138056 0.138056)
          TransformAxis rotation3: coordinates=C4_C5_axial_rotation axis=(0 1 0)
            SimmSpline: x=(-0.97913 0 0.97913) y=(-0.0296706 0 0.0279253)
    Body cerv_3: mass=0.325555 mass_center=(0.0357957 0.00162623 0) inertia_xx=0.01488592 inertia_yy=0.07888986
        inertia_zz=0.07888986 meshes=cerv3.vtp
      CustomJoint C3_C4_joint: parent_body=cerv_4 location_in_parent=(0.008398217 0.005460726 0)
          location=(0.005403771 -0.007720336 0)
        Coordinate C3_C4_flex_extension: motion_type=rotational default_value=0 range=(-1.22173 0.4537856) clamped=true
        Coordinate C3_C4_lat_bending: motion_type=rotational default_value=0 range=(-0.4363323 0.4363323) clamped=true
        Coordinate C3_C4_axial_rotation: motion_type=rotational default_value=0 range=(-0.9791297 0.9791297)
            clamped=true
        SpatialTransform: axes_held_at_zero=(translation1 translation2 translation3)
          TransformAxis rotation1: coordinates=C3_C4_flex_extension axis=(0 0 1) LinearFunction(coefficients=1 0)
          TransformAxis rotation2: coordinates=C3_C4_lat_bending axis=(1 0 0) LinearFunction(coefficients=1 0)
          TransformAxis rotation3: coordinates=C3_C4_axial_rotation axis=(0 1 0) LinearFunction(coefficients=1 0)
    Body cerv_2: mass=0.4555976 mass_center=(0.0357957 0.00162623 0) inertia_xx=0.01488592 inertia_yy=0.07888986
        inertia_zz=0.07888986 meshes=cerv2.vtp
      CustomJoint C2_C3_joint: parent_body=cerv_3 location_in_parent=(0.006023311 0.00433092 0)
          location=(0.006229825 -0.009611904 0)
        Coordinate C2_C3_flex_extension: motion_type=rotational default_value=0 range=(-1.22173 0.4537856) clamped=true
        Coordinate C2_C3_lat_bending: motion_type=rotational default_value=0 range=(-0.4363323 0.4363323) clamped=true
        Coordinate C2_C3_axial_rotation: motion_type=rotational default_value=0 range=(-0.9791297 0.9791297)
            clamped=true
        SpatialTransform: axes_held_at_zero=(translation1 translation2 translation3)
          TransformAxis rotation1: coordinates=C2_C3_flex_extension axis=(0 0 1) LinearFunction(coefficients=1 0)
          TransformAxis rotation2: coordinates=C2_C3_lat_bending axis=(1 0 0) LinearFunction(coefficients=1 0)
          TransformAxis rotation3: coordinates=C2_C3_axial_rotation axis=(0 1 0) LinearFunction(coefficients=1 0)
    Body cerv_1: mass=0.3623257 mass_center=(0.0357957 0.00162623 0) inertia_xx=0.01488592 inertia_yy=0.07888986
        inertia_zz=0.07888986 meshes=cerv1.vtp
      CustomJoint C1_C2_joint: parent_body=cerv_2 location_in_parent=(0.007904879 0.01821383 0)
          location=(0.04870277 0.003012814 0)
        Coordinate C1_C2_flex_extension: motion_type=rotational default_value=0 range=(-0.2792527 0.418879)
            clamped=true
        Coordinate C1_C2_lat_bending: motion_type=rotational default_value=0 range=(-0.1047198 0.1047198) clamped=true
        Coordinate C1_C2_axial_rotation: motion_type=rotational default_value=0 range=(-0.6632251 0.6632251)
            clamped=true
        SpatialTransform: axes_held_at_zero=(translation1 translation2 translation3)
          TransformAxis rotation1: coordinates=C1_C2_flex_extension axis=(0 0 1)
            SimmSpline: x=(-1.74533 1.74533) y=(-0.774926 0.774926)
          TransformAxis rotation2: coordinates=C1_C2_lat_bending axis=(1 0 0)
            SimmSpline: x=(-1.74533 1.74533) y=(-0.872665 0.872665)
          TransformAxis rotation3: coordinates=C1_C2_axial_rotation axis=(0 1 0)
            SimmSpline: x=(-1.74533 1.74533) y=(-1.5516 1.5516)
    Body clavicle_r: mass=0.1209645 mass_center=(-0.0257483 0.0119376 0.0794735) inertia_xx=6.974127e-6
        inertia_yy=2.86593e-5 inertia_zz=2.647989e-5 inertia_xy=-7.30104e-6 inertia_xz=-1.035222e-5
        inertia_yz=3.160151e-6 meshes=clavicle_r.vtp
      CustomJoint sternoclavicular: parent_body=thorax location_in_parent=(0.01042944 0.008420865 0.0317279)
          location=(0 0 0)
        Coordinate clav_prot_r: motion_type=rotational default_value=0 range=(-0.7853982 0.7853982) clamped=true
        Coordinate clav_elev_r: motion_type=rotational default_value=0 range=(-0.7853982 0.7853982) clamped=true
        SpatialTransform: axes_held_at_zero=(rotation3 translation1 translation2 translation3)
          TransformAxis rotation1: coordinates=clav_prot_r axis=(0.0153 0.9892987 -0.1451)
              LinearFunction(coefficients=1 0)
          TransformAxis rotation2: coordinates=clav_elev_r axis=(-0.9944725 0 -0.104997)
              LinearFunction(coefficients=1 0)
    Body scapula_r: mass=0.5469766 mass_center=(-0.0760483 -0.0387627 -0.04355) inertia_xx=0.0008988834
        inertia_yy=0.001503595 inertia_zz=0.001503595 meshes=scapula_r.vtp
      ScapulothoracicJoint scapulothoracic_r: parent_body=thorax
          location_in_parent=(-0.03297846 -0.02102178 0.08721591) orientation_in_parent=(0 -0.87 0)
          location=(-0.09863856 -0.04743875 -0.05342378) orientation=(-0.5181 -1.1416 -0.2854)
          thoracic_ellipsoid_radii_x_y_z=(0.115425 0.18227 0.0872159) scapula_winging_axis_origin=(0 0)
          scapula_winging_axis_direction=0 [radians]
        Coordinate scapula_abduction_r: motion_type=rotational default_value=0 range=(-0.7853982 0.7853982)
            clamped=true
        Coordinate scapula_elevation_r: motion_type=rotational default_value=0 range=(-0.7853982 0.7853982)
            clamped=true
        Coordinate scapula_upward_rot_r: motion_type=rotational default_value=0 range=(-0.7853982 0.7853982)
            clamped=true
        Coordinate scapula_winging_r: motion_type=rotational default_value=0 range=(-0.7853982 0.7853982) clamped=false
    Body humerus_r: mass=1.591071 mass_center=(0.00554712 -0.101403 -0.00269608) inertia_xx=0.00819029
        inertia_yy=0.001644884 inertia_zz=0.00819029 meshes=humerus_r.vtp
      CustomJoint glenohumeral: parent_body=scapula_r location_in_parent=(-0.01574721 -0.04131449 0.008585964)
          location=(0 0 0)
        Coordinate shoulder_elv_r: motion_type=rotational default_value=0.1745329 range=(-1.570796 2.53) clamped=false
        Coordinate plane_of_elev_r: motion_type=rotational default_value=0 range=(-1.570796 3.141593) clamped=true
        Coordinate axial_rot_r: motion_type=rotational default_value=0 range=(-3.141593 3.141593) clamped=true
        SpatialTransform: axes_held_at_zero=(translation1 translation2 translation3)
          TransformAxis rotation1: coordinates=shoulder_elv_r axis=(-0.993 -0.0793 0.0879)
              LinearFunction(coefficients=1 0)
          TransformAxis rotation2: coordinates=plane_of_elev_r axis=(0.0828 0.0654 0.9944)
              LinearFunction(coefficients=1 0)
          TransformAxis rotation3: coordinates=axial_rot_r axis=(-0.0846 0.9947 -0.0584)
              LinearFunction(coefficients=1 0)
    Body ulna_r: mass=0.4236859 mass_center=(-0.0112991 -0.11694 0.0318619) inertia_xx=0.00297885
        inertia_yy=0.0005215019 inertia_zz=0.00297885 meshes=ulna_r.vtp
      CustomJoint elbow_r: parent_body=humerus_r location_in_parent=(0.00630119 -0.2562204 -0.01270568)
          location=(0 0 0)
        Coordinate elbow_flexion_r: motion_type=rotational default_value=0 range=(0 3.141593) clamped=false
        SpatialTransform: axes_held_at_zero=(rotation1 rotation2 translation1 translation2 translation3)
          TransformAxis rotation3: coordinates=elbow_flexion_r axis=(0.04940001 0.03660001 0.9981083)
              LinearFunction(coefficients=1 0)
    Body radius_r: mass=0.4236859 mass_center=(0.0188681 -0.122874 0.0168781) inertia_xx=0.003302755
        inertia_yy=0.0005215019 inertia_zz=0.003302755 meshes=radius.vtp
      CustomJoint radioulna_rr: parent_body=ulna_r location_in_parent=(0.0004872506 -0.01279794 0.02436131)
          location=(0 0 0)
        Coordinate pro_sup: motion_type=rotational default_value=-1.570796 range=(-1.570796 1.570796) clamped=false
        SpatialTransform: axes_held_at_zero=(rotation1 rotation3 translation1 translation2 translation3)
          TransformAxis rotation2: coordinates=pro_sup axis=(-0.01716099 0.9926656 -0.119668)
              LinearFunction(coefficients=1 0)
    Body hand_r: mass=0.3547516 mass_center=(0 -0.0801478 0) inertia_xx=0.0009790782 inertia_yy=0.0006293691
        inertia_zz=0.0009790782
        meshes=(pisiform_rvs.vtp lunate_rvs.vtp scaphoid_rvs.vtp triquetrum_rvs.vtp hamate_rvs.vtp capitate_rvs.vtp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)
      CustomJoint radius_hand_r: parent_body=radius_r location_in_parent=(0.02436253 -0.2789488 0.02192628)
          location=(0 0 0)
        Coordinate wrist_flex_r: motion_type=rotational default_value=0 range=(-1.22173 1.22173) clamped=true
        Coordinate wrist_dev_r: motion_type=rotational default_value=0 range=(-0.4363323 0.6108652) clamped=true
        SpatialTransform: axes_held_at_zero=(rotation3 translation1 translation2 translation3)
          TransformAxis rotation1: coordinates=wrist_flex_r axis=(0 0 1) LinearFunction(coefficients=1 0)
          TransformAxis rotation2: coordinates=wrist_dev_r axis=(1 0 0) LinearFunction(coefficients=1 0)
    Body clavicle_l: mass=0.1209645 mass_center=(-0.0263528 0.0122178 0.0813393) inertia_xx=7.305436e-6
        inertia_yy=3.002078e-5 inertia_zz=2.773783e-5 inertia_xy=-7.647879e-6 inertia_xz=-1.084401e-5
        inertia_yz=3.310276e-6 meshes=clavicle_left_source.vtp
      CustomJoint sternoclavicular_l: parent_body=thorax location_in_parent=(0.01042944 0.008420865 -0.0317279)
          location=(0 0 0)
        Coordinate clav_prot_l: motion_type=rotational default_value=0 range=(-0.7853982 0.7853982) clamped=true
        Coordinate clav_elev_l: motion_type=rotational default_value=0 range=(-0.7853982 0.7853982) clamped=true
        SpatialTransform: axes_held_at_zero=(rotation3 translation1 translation2 translation3)
          TransformAxis rotation1: coordinates=clav_prot_l axis=(-0.0153 -0.9892987 -0.1451)
              LinearFunction(coefficients=1 0)
          TransformAxis rotation2: coordinates=clav_elev_l axis=(0.9944725 0 -0.104997)
              LinearFunction(coefficients=1 0)
    Body scapula_l: mass=0.5469766 mass_center=(-0.0760483 -0.0387627 -0.04355) inertia_xx=0.0008988834
        inertia_yy=0.001503595 inertia_zz=0.001503595 meshes=scapula_l_source.vtp
      ScapulothoracicJoint scapulothoracic_l: parent_body=thorax
          location_in_parent=(-0.03297846 -0.02102178 -0.08721591) orientation_in_parent=(0 0.87 0)
          location=(-0.09863856 -0.04743875 0.05342378) orientation=(0.5181 1.1416 -0.2854)
          thoracic_ellipsoid_radii_x_y_z=(-0.115425 -0.18227 -0.0872159) scapula_winging_axis_origin=(0 0)
          scapula_winging_axis_direction=0
        Coordinate scapula_abduction_l: motion_type=rotational default_value=0 range=(-0.7853982 0.7853982)
            clamped=true
        Coordinate scapula_elevation_l: motion_type=rotational default_value=0 range=(-0.7853982 0.7853982)
            clamped=true
        Coordinate scapula_upward_rot_l: motion_type=rotational default_value=0 range=(-0.7853982 0.7853982)
            clamped=true
        Coordinate scapula_winging_l: motion_type=rotational default_value=0 range=(-0.7853982 0.7853982) clamped=false
    Body humerus_l: mass=1.591071 mass_center=(0.00537647 -0.100322 -0.00261315) inertia_xx=0.007984247
        inertia_yy=0.001545239 inertia_zz=0.007984247 meshes=humerus_left_source.vtp
      CustomJoint glenohumeral_l: parent_body=scapula_l location_in_parent=(-0.01574721 -0.04131449 -0.008585964)
          location=(0 0 0)
        Coordinate shoulder_elv_l: motion_type=rotational default_value=0.1745329 range=(-1.570796 2.53) clamped=false
        Coordinate plane_of_elev_l: motion_type=rotational default_value=0 range=(-1.570796 3.141593) clamped=true
        Coordinate axial_rot_l: motion_type=rotational default_value=0 range=(-3.141593 3.141593) clamped=true
        SpatialTransform: axes_held_at_zero=(translation1 translation2 translation3)
          TransformAxis rotation1: coordinates=shoulder_elv_l axis=(0.993 -0.0793 0.0879)
              LinearFunction(coefficients=1 0)
          TransformAxis rotation2: coordinates=plane_of_elev_l axis=(0.0828 0.0654 0.9944)
              LinearFunction(coefficients=1 0)
          TransformAxis rotation3: coordinates=axial_rot_l axis=(-0.0846 0.9947 -0.0584)
              LinearFunction(coefficients=1 0)
    Body ulna_l: mass=0.4236859 mass_center=(-0.0118449 -0.1222 0.0334011) inertia_xx=0.003254682
        inertia_yy=0.0005731042 inertia_zz=0.003254682 meshes=ulna_left_source.vtp
      CustomJoint elbow_l: parent_body=humerus_l location_in_parent=(0.00610735 -0.2534895 0.01231482) location=(0 0 0)
        Coordinate elbow_flexion_l: motion_type=rotational default_value=0 range=(0 3.141593) clamped=false
        SpatialTransform: axes_held_at_zero=(rotation1 rotation2 translation1 translation2 translation3)
          TransformAxis rotation3: coordinates=elbow_flexion_l axis=(0.04940001 0.03660001 0.9981083)
              LinearFunction(coefficients=1 0)
    Body radius_l: mass=0.4236859 mass_center=(0.0197795 -0.127082 0.0176935) inertia_xx=0.003540448
        inertia_yy=0.0005731042 inertia_zz=0.003540448 meshes=radius_left_source.vtp
      CustomJoint radioulna_rr_l: parent_body=ulna_l location_in_parent=(0.0005107887 -0.01337362 -0.02553816)
          location=(0 0 0)
        Coordinate pro_sup_l: motion_type=rotational default_value=-1.570796 range=(-1.570796 1.570796) clamped=false
        SpatialTransform: axes_held_at_zero=(rotation1 rotation3 translation1 translation2 translation3)
          TransformAxis rotation2: coordinates=pro_sup_l axis=(-0.01716099 -0.9926656 -0.119668)
              LinearFunction(coefficients=1 0)
    Body hand_l: mass=0.3547516 mass_center=(0 -0.0828921 0) inertia_xx=0.001056495 inertia_yy=0.0006916448
        inertia_zz=0.001056495
        meshes=(pisiform_lvs.vtp lunate_lvs.vtp scaphoid_lvs.vtp triquetrum_lvs.vtp hamate_lvs.vtp capitate_lvs.vtp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)
      CustomJoint radius_hand_l: parent_body=radius_l location_in_parent=(0.02553943 -0.2885005 -0.02298549)
          orientation_in_parent=(0 -1.56 0) location=(0 0 0)
        Coordinate wrist_flex_l: motion_type=rotational default_value=0 range=(-1.22173 1.22173) clamped=true
            locked=true
        Coordinate wrist_dev_l: motion_type=rotational default_value=0 range=(-0.4363323 0.6108652) clamped=true
            locked=true
        SpatialTransform: axes_held_at_zero=(rotation3 translation1 translation2 translation3)
          TransformAxis rotation1: coordinates=wrist_flex_l axis=(0 0 1) LinearFunction(coefficients=1 0)
          TransformAxis rotation2: coordinates=wrist_dev_l axis=(-1 0 0) LinearFunction(coefficients=1 0)
  ConstraintSet:
    PointConstraint AC: body_1=clavicle_r body_2=scapula_r location_body_1=(-0.02924 0.02024 0.12005)
        location_body_2=(-0.01357 0.00011 -0.01523)
    PointConstraint AC_l: body_1=clavicle_l body_2=scapula_l location_body_1=(-0.0271447 0.0174986 -0.117401)
        location_body_2=(-0.011839 -0.000462371 0.018542)
    CoordinateCouplerConstraint L4_L5_IVDjnt_r3_con: independent_coordinate_names=lumb_thorax_rot_z
        dependent_coordinate_name=L4_L5_IVDjnt_r3 scale_factor=1
        coupled_coordinates_function=LinearFunction(coefficients=0.144 0)
    CoordinateCouplerConstraint L4_L5_IVD_rotjnt_r2_con: independent_coordinate_names=lumb_thorax_rot_y
        dependent_coordinate_name=L4_L5_IVD_rotjnt_r2 scale_factor=1
      coupled_coordinates_function: PiecewiseLinearFunction f452: x=(-0.785398 0 0.785398) y=(-0.0331613 0 0.0331613)
    CoordinateCouplerConstraint L4_L5_IVD_bendjnt_r1_con: independent_coordinate_names=lumb_thorax_rot_x
        dependent_coordinate_name=L4_L5_IVD_bendjnt_r1 scale_factor=1
      coupled_coordinates_function: PiecewiseLinearFunction f61: x=(-1.01875 1.01875) y=(-0.184481 0.184481)
    CoordinateCouplerConstraint L3_L4_IVDjnt_r3_con: independent_coordinate_names=lumb_thorax_rot_z
        dependent_coordinate_name=L3_L4_IVDjnt_r3 scale_factor=1
        coupled_coordinates_function=LinearFunction(coefficients=0.204745 0)
    CoordinateCouplerConstraint L3_L4_IVD_rotjnt_r2_con: independent_coordinate_names=lumb_thorax_rot_y
        dependent_coordinate_name=L3_L4_IVD_rotjnt_r2 scale_factor=1
      coupled_coordinates_function: PiecewiseLinearFunction f232: x=(-0.785398 0 0.785398) y=(-0.0331613 0 0.0331613)
    CoordinateCouplerConstraint L3_L4_IVD_bendjnt_r1_con: independent_coordinate_names=lumb_thorax_rot_x
        dependent_coordinate_name=L3_L4_IVD_bendjnt_r1 scale_factor=1
      coupled_coordinates_function: PiecewiseLinearFunction f51: x=(-1.01875 1.01875) y=(-0.249931 0.249931)
    CoordinateCouplerConstraint L2_L3_IVDjnt_r3_con: independent_coordinate_names=lumb_thorax_rot_z
        dependent_coordinate_name=L2_L3_IVDjnt_r3 scale_factor=1
        coupled_coordinates_function=LinearFunction(coefficients=0.246618 0)
    CoordinateCouplerConstraint L2_L3_IVD_rotjnt_r2_con: independent_coordinate_names=lumb_thorax_rot_y
        dependent_coordinate_name=L2_L3_IVD_rotjnt_r2 scale_factor=1
      coupled_coordinates_function: PiecewiseLinearFunction f232: x=(-0.785398 0 0.785398) y=(-0.0261799 0 0.0261799)
    CoordinateCouplerConstraint L2_L3_IVD_bendjnt_r1_con: independent_coordinate_names=lumb_thorax_rot_x
        dependent_coordinate_name=L2_L3_IVD_bendjnt_r1 scale_factor=1
      coupled_coordinates_function: PiecewiseLinearFunction f41: x=(-1.01875 1.01875) y=(-0.254818 0.254818)
    CoordinateCouplerConstraint L1_L2_IVDjnt_r3_con: independent_coordinate_names=lumb_thorax_rot_z
        dependent_coordinate_name=L1_L2_IVDjnt_r3 scale_factor=1
        coupled_coordinates_function=LinearFunction(coefficients=0.294182 0)
    CoordinateCouplerConstraint L1_L2_IVD_rotjnt_r2_con: independent_coordinate_names=lumb_thorax_rot_y
        dependent_coordinate_name=L1_L2_IVD_rotjnt_r2 scale_factor=1
      coupled_coordinates_function: PiecewiseLinearFunction f32: x=(-0.785398 0 0.785398) y=(-0.0226893 0 0.0226893)
    CoordinateCouplerConstraint L1_L2_IVD_bendjnt_r1_con: independent_coordinate_names=lumb_thorax_rot_x
        dependent_coordinate_name=L1_L2_IVD_bendjnt_r1 scale_factor=1
      coupled_coordinates_function: PiecewiseLinearFunction f31: x=(-1.01875 1.01875) y=(-0.191463 0.191463)
    CoordinateCouplerConstraint C6_C7_flex_extension_con: independent_coordinate_names=C7_T1_flex_extension
        dependent_coordinate_name=C6_C7_flex_extension scale_factor=1
      coupled_coordinates_function: SimmSpline: x=(-1.74533 1.74533) y=(-0.23911 0.23911)
    CoordinateCouplerConstraint C6_C7_lat_bending_con: independent_coordinate_names=C7_T1_lat_bending
        dependent_coordinate_name=C6_C7_lat_bending scale_factor=1
      coupled_coordinates_function: SimmSpline: x=(-1.74533 1.74533) y=(-0.328122 0.328122)
    CoordinateCouplerConstraint C6_C7_axial_rotation_con: independent_coordinate_names=C7_T1_axial_rotation
        dependent_coordinate_name=C6_C7_axial_rotation scale_factor=1
      coupled_coordinates_function: SimmSpline: x=(-1.74533 1.74533) y=(-0.326377 0.326377)
    CoordinateCouplerConstraint C5_C6_flex_extension_con: independent_coordinate_names=C7_T1_flex_extension
        dependent_coordinate_name=C5_C6_flex_extension scale_factor=1
      coupled_coordinates_function: SimmSpline: x=(-1.74533 1.74533) y=(-0.274017 0.274017)
    CoordinateCouplerConstraint C5_C6_lat_bending_con: independent_coordinate_names=C7_T1_lat_bending
        dependent_coordinate_name=C5_C6_lat_bending scale_factor=1
      coupled_coordinates_function: SimmSpline: x=(-1.74533 1.74533) y=(-0.382227 0.382227)
    CoordinateCouplerConstraint C5_C6_axial_rotation_con: independent_coordinate_names=C7_T1_axial_rotation
        dependent_coordinate_name=C5_C6_axial_rotation scale_factor=1
      coupled_coordinates_function: SimmSpline: x=(-1.74533 1.74533) y=(-0.383972 0.383972)
    CoordinateCouplerConstraint C4_C5_flex_extension_con: independent_coordinate_names=C7_T1_flex_extension
        dependent_coordinate_name=C4_C5_flex_extension scale_factor=1
      coupled_coordinates_function: SimmSpline: x=(-1.74533 1.74533) y=(-0.376991 0.376991)
    CoordinateCouplerConstraint C4_C5_lat_bending_con: independent_coordinate_names=C7_T1_lat_bending
        dependent_coordinate_name=C4_C5_lat_bending scale_factor=1
      coupled_coordinates_function: SimmSpline: x=(-1.74533 1.74533) y=(-0.382227 0.382227)
    CoordinateCouplerConstraint C4_C5_axial_rotation_con: independent_coordinate_names=C7_T1_axial_rotation
        dependent_coordinate_name=C4_C5_axial_rotation scale_factor=1
      coupled_coordinates_function: PiecewiseLinearFunction f61: x=(-1.01875 1.01875) y=(-0.184481 0.184481)
    CoordinateCouplerConstraint C3_C4_flex_extension_con: independent_coordinate_names=C7_T1_flex_extension
        dependent_coordinate_name=C3_C4_flex_extension scale_factor=1
      coupled_coordinates_function: SimmSpline: x=(-1.74533 1.74533) y=(-0.383972 0.383972)
    CoordinateCouplerConstraint C3_C4_lat_bending_con: independent_coordinate_names=C7_T1_lat_bending
        dependent_coordinate_name=C3_C4_lat_bending scale_factor=1
      coupled_coordinates_function: SimmSpline: x=(-1.74533 1.74533) y=(-0.376991 0.376991)
    CoordinateCouplerConstraint C3_C4_axial_rotation_con: independent_coordinate_names=C7_T1_axial_rotation
        dependent_coordinate_name=C1_C2_axial_rotation scale_factor=1
      coupled_coordinates_function: SimmSpline: x=(-1.74533 1.74533) y=(-0.382227 0.382227)
    CoordinateCouplerConstraint C2_C3_flex_extension_con: independent_coordinate_names=C7_T1_flex_extension
        dependent_coordinate_name=C2_C3_flex_extension scale_factor=1
      coupled_coordinates_function: SimmSpline: x=(-1.74533 1.74533) y=(-0.287979 0.287979)
    CoordinateCouplerConstraint C2_C3_lat_bending_con: independent_coordinate_names=C7_T1_lat_bending
        dependent_coordinate_name=C2_C3_lat_bending scale_factor=1
      coupled_coordinates_function: SimmSpline: x=(-1.74533 1.74533) y=(-0.342085 0.342085)
    CoordinateCouplerConstraint C2_C3_axial_rotation_con: independent_coordinate_names=C7_T1_axial_rotation
        dependent_coordinate_name=C3_C4_axial_rotation scale_factor=1
      coupled_coordinates_function: SimmSpline: x=(-1.74533 1.74533) y=(-0.191986 0.191986)
    CoordinateCouplerConstraint C1_C2_flex_extension_con: independent_coordinate_names=C7_T1_flex_extension
        dependent_coordinate_name=C1_C2_flex_extension scale_factor=1
      coupled_coordinates_function: SimmSpline: x=(-1.74533 1.74533) y=(-0.872665 0.872665)
    CoordinateCouplerConstraint C1_C2_lat_bending_con: independent_coordinate_names=C7_T1_lat_bending
        dependent_coordinate_name=C1_C2_lat_bending scale_factor=1
      coupled_coordinates_function: SimmSpline: x=(-1.74533 1.74533) y=(-0.193732 0.193732)
    CoordinateCouplerConstraint C1_C2_axial_rotation_con: independent_coordinate_names=C7_T1_lat_bending
        dependent_coordinate_name=C1_C2_axial_rotation scale_factor=1
      coupled_coordinates_function: SimmSpline: x=(-1.74533 1.74533) y=(-0.970403 0.970403)
    CoordinateCouplerConstraint patellofemoral_knee_angle_con: independent_coordinate_names=knee_angle_r
        dependent_coordinate_name=knee_angle_beta scale_factor=1
        coupled_coordinates_function=LinearFunction(coefficients=-1 0)
    CoordinateCouplerConstraint patellofemoral_knee_angle_l_con: independent_coordinate_names=knee_angle_l
        dependent_coordinate_name=knee_angle_l_beta scale_factor=1
        coupled_coordinates_function=LinearFunction(coefficients=-1 0)
  ForceSet:
    CoordinateLimitForce [values shared by the 10 below unless stated]: upper_stiffness=20 [N*m/degree]
        lower_stiffness=20 [N*m/degree] damping=1 transition=10 [degrees]
    CoordinateLimitForce clavicle_ElevationLimits_r: coordinate=clav_elev_r upper_limit=25 [degrees]
        lower_limit=-20 [degrees]
    CoordinateLimitForce clavicle_rElevationLimits_l: coordinate=clav_elev_l upper_limit=25 lower_limit=-20
    CoordinateLimitForce clavicle_ProtractionLimits_r: coordinate=clav_prot_r upper_limit=25 lower_limit=-10
    CoordinateLimitForce clavicle_ProtractionLimits_l: coordinate=clav_prot_l upper_limit=25 lower_limit=-10
    CoordinateLimitForce scapula_RotationLimits_r: coordinate=scapula_upward_rot_r upper_limit=50 lower_limit=-20
    CoordinateLimitForce scapula_rRotationLimits_l: coordinate=scapula_upward_rot_l upper_limit=50 lower_limit=-20
    CoordinateLimitForce ShoulderRotationLimits_r: coordinate=shoulder_elv_r upper_limit=180 lower_limit=-85
    CoordinateLimitForce ShoulderRotationLimits_l: coordinate=shoulder_elv_l upper_limit=180 lower_limit=-85
    CoordinateLimitForce ElbowFlexLimit_r: coordinate=elbow_flexion_r upper_limit=140 lower_limit=0
    CoordinateLimitForce ElbowFlexLimit_l: coordinate=elbow_flexion_l upper_limit=140 lower_limit=0
  MarkerSet:
    Marker MAN: thorax (0.0525141 -0.0218319 -0.00095936)
    Marker XYP: thorax (0.105029 -0.196927 0.00387801)
    Marker C7: thorax (-0.144321 0.0564595 -0.00207124)
    Marker T8: thorax (-0.177043 -0.219757 0.0020634)
    Marker CLAVD: clavicle_r (0.0147438 0.0128003 0.0544239)
    Marker SCAPDL: scapula_r (-0.0860033 0.0298369 -0.00786593)
    Marker SCAPDH: scapula_r (-0.0956621 0.0398035 -0.0552027)
    Marker SCAPDB: scapula_r (-0.119492 0.0147336 -0.0385808)
    Marker ELD: humerus_r (-0.0204828 -0.296463 0.0578279)
    Marker EMD: humerus_r (0.0272599 -0.289855 -0.0123004)
    Marker ACD: clavicle_r (-0.046352 0.0628411 0.128726)
    Marker BHAD: humerus_r (0.0116668 -0.1252 0.0919982)
    Marker BHPD: humerus_r (-0.0467818 -0.13546 0.0681953)
    Marker BBAD: humerus_r (0.0435283 -0.212379 0.10521)
    Marker BBPD: humerus_r (-0.0263251 -0.225388 0.0744934)
    Marker T12: thorax (-0.141788 -0.32485 -0.00264193)
    Marker COTG: thorax (0.107514 -0.259377 -0.0863583)
    Marker EASD: pelvis (0.0114693 0.0130399 0.132753)
    Marker EASG: pelvis (0.0132302 0.0146477 -0.137337)
    Marker EPSD: pelvis (-0.191917 0.0548005 0.0441933)
    Marker EPSG: pelvis (-0.179355 0.0502688 -0.0470985)
    Marker CMD: femur_r (0.00761381 -0.422606 -0.0468932)
    Marker CLD: femur_r (-0.00258303 -0.424943 0.0442685)
    Marker CMG: femur_l (0.0106695 -0.427207 0.0522992)
    Marker CLG: femur_l (0.00246231 -0.428077 -0.0485339)
    Marker MMD: tibia_r (0.0303775 -0.445859 -0.0338619)
    Marker MMG: tibia_l (0.0252118 -0.433274 0.0342144)
    Marker MLD: tibia_r (0.00616482 -0.474718 0.0488061)
    Marker MLG: tibia_l (0.013045 -0.461614 -0.0576067)
    Marker CALG: talus_l (-0.0699684 -0.0329898 0.0190267)
    Marker CALD: talus_r (-0.0777949 -0.0324182 0.00359243)
    Marker MT1G: talus_l (0.180797 -0.032728 0.00951282)
    Marker MT5D: talus_r (0.107789 -0.0309593 0.0500963)
    Marker MT1D: talus_r (0.151941 -0.0261675 -0.0209043)
    Marker FHAG: femur_l (0.0457423 -0.176036 -0.118653)
    Marker FHPG: femur_l (-0.0270561 -0.187112 -0.11771)
    Marker FBAG: femur_l (0.0509557 -0.266151 -0.102403)
    Marker FBPG: femur_l (-0.0240894 -0.269606 -0.101969)
    Marker FHAD: femur_r (0.0446464 -0.16085 0.0911197)
    Marker FHPD: femur_r (-0.0505159 -0.150861 0.094535)
    Marker FBAD: femur_r (0.0393374 -0.249912 0.0816021)
    Marker FBPD: femur_r (-0.0102688 -0.228013 0.084809)
    Marker MT5G: talus_l (0.168812 -0.037072 -0.0733264)
    Marker MTCALG: talus_l (-0.0525346 0.000323125 0.0144176)
    Marker MTCALD: talus_r (-0.0612536 -5.4987e-5 0.00628009)
    Marker MTBassin: pelvis (-0.0449622 0.113768 0.157943)
    Marker CLAVG: clavicle_l (0.000348554 0.029455 -0.0824413)
    Marker ACG: clavicle_l (-0.0544303 0.0712817 -0.131017)
    Marker SCAPGL: scapula_l (-0.0904183 0.0353077 0.053012)
    Marker SCAPGH: scapula_l (-0.0954131 0.0391891 0.101689)
    Marker SCAPGB: scapula_l (-0.120452 0.0169122 0.082113)
    Marker BHAG: humerus_l (-0.0156326 -0.123878 -0.106543)
    Marker BHPG: humerus_l (-0.0632293 -0.134438 -0.0629158)
    Marker BBAG: humerus_l (0.0156081 -0.205784 -0.119326)
    Marker BHPG: humerus_l (-0.0632293 -0.134438 -0.0629158)
    Marker ELG: humerus_l (-0.0195946 -0.287572 -0.062873)
    Marker EMG: humerus_l (0.0281923 -0.284273 0.00371696)
    Marker PSRD: radius_r (0.0673134 -0.306579 0.0120596)
    Marker PSUD: radius_r (-0.0114663 -0.2988 0.0314881)
    Marker PSUG: radius_l (-0.0271547 -0.318348 -0.042429)
    Marker PSRG: radius_l (0.0568249 -0.317322 -0.0281607)
    Marker MC2D: hand_r (0.0211177 -0.105958 0.0264879)
    Marker MC5D: hand_r (-0.0579118 -0.10246 0.0222763)
    Marker COTD: thorax (0.0919354 -0.258213 0.111698)
    Marker MC2G: hand_l (-0.014732 -0.105242 -0.0240452)
    Marker MC5G: hand_l (-0.00822081 -0.0832569 0.0413655)
    Marker L5: pelvis (-0.170912 0.0928787 0.00197994)
    Marker TFIBD: tibia_r (0.00476158 -0.0859125 0.0498361)
    Marker TFIBG: tibia_l (0.0015902 -0.0772158 -0.0537922)
