# OpenSim document version 30000
ScaleTool SP02DB_scaled:
  mass: 2.93e1
  height: -1
  age: -1
  GenericModelMaker:
    model_file: bilateral_STJ_generique_v01_modif.osim
  ModelScaler:
    apply: true
    scaling_order: measurements
    marker_file: Static_B_ref.trc
    time_range: 0.01 3.47
    preserve_mass_distribution: true
    output_model_file: SP02DB_model_step1.osim
    output_scale_file: SP02DB_scale_output.xml
    MeasurementSet: file=scale_measure_set.xml
  MarkerPlacer:
    apply: true
    marker_file: Static_B_ref.trc
    time_range: 0.01 3.47
    output_motion_file: SP02DB_motion.mot
    output_model_file: SP02DB_model_final.osim
    output_marker_file: SP02DB_marqueurs_new_output.osim
    max_marker_movement: -1
    IKTaskSet: file=scale_task.xml
