# OpenSim document version 30000
ScaleTool SP04CD_scaled:
  mass: 41
  height: -1
  age: -1
  GenericModelMaker:
    model_file: bilateral_STJ_generique_v01_modif.osim
  ModelScaler:
    apply: true
    scaling_order: measurements
    marker_file: Static_B_ref.trc
    time_range: 0.01 2.28
    preserve_mass_distribution: true
    output_model_file: SP04CD_model_step1.osim
    output_scale_file: SP04CD_scale_output.xml
    MeasurementSet: file=scale_measure_set.xml
  MarkerPlacer:
    apply: true
    marker_file: Static_B_ref.trc
    time_range: 0.01 2.28
    output_motion_file: SP04CD_motion.mot
    output_model_file: SP04CD_model_final.osim
    output_marker_file: SP04CD_marqueurs_new_output.osim
    max_marker_movement: -1
    IKTaskSet: file=scale_task.xml
