# OpenSim document version 30000
InverseKinematicsTool:
  results_directory: ./
  constraint_weight: Inf
  accuracy: 1e-5
  marker_file: Static_B_ref.trc
  time_range: 0.01 2.4
  report_errors: true
  report_marker_locations: false
  IKTaskSet:
    IKMarkerTask MTACGL: apply=false weight=1
    IKMarkerTask MTACGM: apply=false weight=1
    IKMarkerTask MTACGB: apply=false weight=1
    IKMarkerTask MAN: apply=true weight=1
    IKMarkerTask XYP: apply=true weight=1
    IKMarkerTask C7: apply=true weight=1
    IKMarkerTask T8: apply=true weight=1
    IKMarkerTask PSRG: apply=true weight=1
    IKMarkerTask PSUG: apply=true weight=1
    IKMarkerTask ELG: apply=true weight=1
    IKMarkerTask EMG: apply=true weight=1
    IKMarkerTask CLAVG: apply=true weight=1
    IKMarkerTask CLAVD: apply=true weight=1
    IKMarkerTask ELD: apply=true weight=1
    IKMarkerTask EMD: apply=true weight=1
    IKMarkerTask PSRD: apply=true weight=1
    IKMarkerTask PSUD: apply=true weight=1
    IKMarkerTask MC2G: apply=true weight=1
    IKMarkerTask MC5G: apply=true weight=1
    IKMarkerTask MC5D: apply=true weight=1
    IKMarkerTask MC2D: apply=true weight=1
    IKMarkerTask ACG: apply=true weight=1
    IKMarkerTask ACD: apply=true weight=1
    IKMarkerTask MTABD: apply=false weight=1
    IKMarkerTask MTABG: apply=false weight=1
    IKMarkerTask MTBHAG: apply=false weight=1
    IKMarkerTask MTBHPG: apply=false weight=1
    IKMarkerTask MTBBAG: apply=false weight=1
    IKMarkerTask MTBBPG: apply=false weight=1
    IKMarkerTask MTBHAD: apply=false weight=1
    IKMarkerTask MTBHPD: apply=false weight=1
    IKMarkerTask MTBBAD: apply=false weight=1
    IKMarkerTask MTBBPD: apply=false weight=1
    IKMarkerTask COSTALD: apply=true weight=1
    IKMarkerTask COSTALG: apply=true weight=1
    IKMarkerTask AAG: apply=true weight=1
    IKMarkerTask TSG: apply=true weight=1
    IKMarkerTask AIG: apply=true weight=1
    IKMarkerTask AAD: apply=true weight=1
    IKMarkerTask TSD: apply=true weight=1
    IKMarkerTask AID: apply=true weight=1
    IKMarkerTask MTACDL: apply=false weight=1
    IKMarkerTask MTACDM: apply=false weight=1
    IKMarkerTask MTACDB: apply=false weight=1
    IKCoordinateTask [values shared by the 32 below unless stated]: apply=true weight=0 value_type=default_value
        value=0
    IKCoordinateTask ground_thorax_rot_x
    IKCoordinateTask ground_thorax_rot_y
    IKCoordinateTask ground_thorax_rot_z
    IKCoordinateTask ground_thorax_tx
    IKCoordinateTask ground_thorax_ty
    IKCoordinateTask ground_thorax_tz
    IKCoordinateTask clav_prot_r
    IKCoordinateTask clav_elev_r
    IKCoordinateTask scapula_abduction_r
    IKCoordinateTask scapula_elevation_r
    IKCoordinateTask scapula_upward_rot_r
    IKCoordinateTask scapula_winging_r
    IKCoordinateTask shoulder_elv_r
    IKCoordinateTask plane_of_elev_r
    IKCoordinateTask axial_rot_r
    IKCoordinateTask elbow_flexion_r
    IKCoordinateTask pro_sup_r
    IKCoordinateTask wrist_flex_r
    IKCoordinateTask wrist_dev_r
    IKCoordinateTask clav_prot_l
    IKCoordinateTask clav_elev_l
    IKCoordinateTask scapula_abduction_l
    IKCoordinateTask scapula_elevation_l
    IKCoordinateTask scapula_upward_rot_l
    IKCoordinateTask scapula_winging_l
    IKCoordinateTask shoulder_elv_l
    IKCoordinateTask plane_of_elev_l
    IKCoordinateTask axial_rot_l
    IKCoordinateTask elbow_flexion_l
    IKCoordinateTask pro_sup_l
    IKCoordinateTask wrist_flex_l
    IKCoordinateTask wrist_dev_l
