# OpenSim document version 30000
MarkerSet:
  Marker MTACGL: scapula_l (0.160736 -0.307137 -0.160131)
  Marker MTACGM: scapula_l (0.110099 -0.28292 -0.155539)
  Marker MTACGB: scapula_l (0.129156 -0.311864 -0.180306)
  Marker MAN: thorax (0.0325987 -0.0325987 0) fixed=true
  Marker XYP: thorax (0.0971821 -0.177089 -0.0018673) fixed=true
  Marker C7: thorax (-0.0993498 0.109392 0) fixed=true
  Marker T8: thorax (-0.141577 -0.149103 0) fixed=true
  Marker PSRG: radius_l (0.0605852 -0.230554 -0.0159302) fixed=true
  Marker PSUG: ulna_l (0.00361909 -0.240321 -0.0257359) fixed=true
  Marker ELG: humerus_l (0.01111 -0.272967 -0.0251663) fixed=true
  Marker EMG: humerus_l (0.00234484 -0.272551 0.0497074) fixed=true
  Marker CLAVG: clavicle_l (0.0108662 0.0108662 -0.0664492) fixed=true
  Marker CLAVD: clavicle_r (0.0108662 0.0108662 0.066067) fixed=true
  Marker ELD: humerus_r (0.0111378 -0.27365 0.0252292) fixed=true
  Marker EMD: humerus_r (0.0023507 -0.273232 -0.0498317) fixed=true
  Marker PSRD: radius_r (0.0556395 -0.241956 0.00960486) fixed=true
  Marker PSUD: ulna_r (0.00855297 -0.249623 0.0200787) fixed=true
  Marker MC2G: hand_l (-0.0096306 -0.0901011 -0.0211851) fixed=true
  Marker MC5G: hand_l (-0.0138533 -0.0764031 0.041994) fixed=true
  Marker MC5D: hand_r (-0.0504078 -0.0902087 0.0209175) fixed=true
  Marker MC2D: hand_r (0.0250706 -0.115232 0.0197765) fixed=true
  Marker ACG: scapula_l (-0.0182374 0.00948393 0.00199628) fixed=true
  Marker ACD: scapula_r (-0.0182374 0.00948393 -0.00199628) fixed=true
  Marker MTABD: radius_r (-0.36817 0.260994 0.320921)
  Marker MTABG: radius_l (0.240155 -0.170071 0.532938)
  Marker MTBHAG: humerus_l (0.233421 -0.323612 -0.156111)
  Marker MTBHPG: humerus_l (0.221569 -0.41586 -0.137808)
  Marker MTBBAG: humerus_l (0.308915 -0.38015 -0.182914)
  Marker MTBBPG: humerus_l (0.304244 -0.433648 -0.173329)
  Marker MTBHAD: humerus_r (0.0269781 -0.235665 -0.308731)
  Marker MTBHPD: humerus_r (0.0316472 -0.282845 -0.331222)
  Marker MTBBAD: humerus_r (-0.0670931 -0.201358 -0.311808)
  Marker MTBBPD: humerus_r (-0.0575531 -0.264973 -0.339866)
  Marker COSTALD: thorax (0.0498298 -0.515643 0.103568)
  Marker COSTALG: thorax (0.215811 -0.522642 0.116046)
  Marker AAG: scapula_l (-0.0448852 -0.00137437 -0.00111264) fixed=true
  Marker TSG: scapula_l (-0.0993414 -0.022938 0.11976) fixed=true
  Marker AIG: scapula_l (-0.128469 -0.123484 0.122892) fixed=true
  Marker AAD: scapula_r (-0.0448852 -0.00137437 0.00111264) fixed=true
  Marker TSD: scapula_r (-0.0993414 -0.022938 -0.11976) fixed=true
  Marker AID: scapula_r (-0.128469 -0.123484 -0.122892) fixed=true
  Marker MTACDL: scapula_r (0.0941374 -0.353176 -0.220575)
  Marker MTACDM: scapula_r (0.149773 -0.360399 -0.224989)
  Marker MTACDB: scapula_r (0.11614 -0.381057 -0.238655)
