# OpenSim document version 30000
ScaleTool AM02SH_scaled:
  mass: 3.31e1
  height: -1
  age: -1
  GenericModelMaker:
    model_file: ..\..\info_global\bilateral_STJ_generique_v02.osim
  ModelScaler:
    apply: true
    scaling_order: measurements
    marker_file: ..\Statique\Static_B_ref.trc
    time_range: 0.01 2.4
    preserve_mass_distribution: true
    output_model_file: AM02SH_model_scaling_1_step1.osim
    output_scale_file: AM02SH_scaling_1_output.xml
    MeasurementSet: file=scaling_1_measure_set.xml
  MarkerPlacer:
    apply: true
    marker_file: ..\Statique\Static_B_ref.trc
    time_range: 0.01 2.4
    output_motion_file: AM02SH_scaling_1_motion.mot
    output_model_file: AM02SH_model_scaling_1_final.osim
    output_marker_file: AM02SH_marqueurs_new_output.osim
    max_marker_movement: 0
    IKTaskSet: file=scaling_1_task.xml
