# OpenSim document version 30000
ScaleTool AM02SH_scaled-scaled:
  mass: 33.1 [kg]
  height: -1
  age: -1
  ModelScaler:
    apply: false
    time_range: -1 -1
    preserve_mass_distribution: false
  MarkerPlacer:
    apply: true
    marker_file: ../Statique/Static_B_ref.trc
    coordinate_file: AM02SH_scaling_1_motion.mot
    time_range: 0.01 2.4
    max_marker_movement: -1
    IKTaskSet:
      IKMarkerTask MTACGL: apply=true weight=1
      IKMarkerTask MTACGM: apply=true weight=1
      IKMarkerTask MTACGB: apply=true weight=1
      IKMarkerTask MAN: apply=false weight=1
      IKMarkerTask XYP: apply=false weight=1
      IKMarkerTask C7: apply=false weight=1
      IKMarkerTask T8: apply=false weight=1
      IKMarkerTask PSRG: apply=false weight=1
      IKMarkerTask PSUG: apply=false weight=1
      IKMarkerTask ELG: apply=false weight=1
      IKMarkerTask EMG: apply=false weight=1
      IKMarkerTask CLAVG: apply=true weight=1
      IKMarkerTask CLAVD: apply=true weight=1
      IKMarkerTask ELD: apply=false weight=1
      IKMarkerTask EMD: apply=false weight=1
      IKMarkerTask PSRD: apply=false weight=1
      IKMarkerTask PSUD: apply=false weight=1
      IKMarkerTask MC2G: apply=false weight=1
      IKMarkerTask MC5G: apply=false weight=1
      IKMarkerTask MC5D: apply=false weight=1
      IKMarkerTask MC2D: apply=false weight=1
      IKMarkerTask ACG: apply=false weight=1
      IKMarkerTask ACD: apply=false weight=1
      IKMarkerTask MTABD: apply=true weight=1
      IKMarkerTask MTABG: apply=true weight=1
      IKMarkerTask MTBHAG: apply=true weight=1
      IKMarkerTask MTBHPG: apply=true weight=1
      IKMarkerTask MTBBAG: apply=true weight=1
      IKMarkerTask MTBBPG: apply=true weight=1
      IKMarkerTask MTBHAD: apply=true weight=1
      IKMarkerTask MTBHPD: apply=true weight=1
      IKMarkerTask MTBBAD: apply=true weight=1
      IKMarkerTask MTBBPD: apply=true weight=1
      IKMarkerTask MTMG: apply=false weight=1
      IKMarkerTask MTMD: apply=false weight=1
      IKMarkerTask COSTALD: apply=true weight=1
      IKMarkerTask COSTALG: apply=true weight=1
      IKMarkerTask AAG: apply=false weight=1
      IKMarkerTask TSG: apply=false weight=1
      IKMarkerTask AIG: apply=false weight=1
      IKMarkerTask AAD: apply=false weight=1
      IKMarkerTask TSD: apply=false weight=1
      IKMarkerTask AID: apply=false weight=1
      IKMarkerTask MTACDL: apply=true weight=1
      IKMarkerTask MTACDM: apply=true weight=1
      IKMarkerTask MTACDB: apply=true weight=1
      IKCoordinateTask [values shared by the 32 below unless stated]: apply=true weight=0 value_type=from_file value=0
      IKCoordinateTask ground_thorax_rot_x
      IKCoordinateTask ground_thorax_rot_y
      IKCoordinateTask ground_thorax_rot_z
      IKCoordinateTask ground_thorax_tx
      IKCoordinateTask ground_thorax_ty
      IKCoordinateTask ground_thorax_tz
      IKCoordinateTask clav_prot_r
      IKCoordinateTask clav_elev_r
      IKCoordinateTask scapula_abduction_r
      IKCoordinateTask scapula_elevation_r
      IKCoordinateTask scapula_upward_rot_r
      IKCoordinateTask scapula_winging_r
      IKCoordinateTask shoulder_elv_r
      IKCoordinateTask plane_of_elev_r
      IKCoordinateTask axial_rot_r
      IKCoordinateTask elbow_flexion_r
      IKCoordinateTask pro_sup_r
      IKCoordinateTask wrist_flex_r
      IKCoordinateTask wrist_dev_r
      IKCoordinateTask clav_prot_l
      IKCoordinateTask clav_elev_l
      IKCoordinateTask scapula_abduction_l
      IKCoordinateTask scapula_elevation_l
      IKCoordinateTask scapula_upward_rot_l
      IKCoordinateTask scapula_winging_l
      IKCoordinateTask shoulder_elv_l
      IKCoordinateTask plane_of_elev_l
      IKCoordinateTask axial_rot_l
      IKCoordinateTask elbow_flexion_l
      IKCoordinateTask pro_sup_l
      IKCoordinateTask wrist_flex_l
      IKCoordinateTask wrist_dev_l
