# OpenSim document version 30000
MarkerSet:
  Marker MTACGL: scapula_l (0.110034 0.0621647 0.0346521)
  Marker MTACGM: scapula_l (0.0730287 0.0726065 0.0762468)
  Marker MTACGB: scapula_l (0.0705268 0.0623573 0.0346683)
  Marker MAN: thorax (0.0409803 -0.0409803 0) fixed=true
  Marker XYP: thorax (0.12217 -0.222622 -0.00234741) fixed=true
  Marker C7: thorax (-0.124894 0.13752 0) fixed=true
  Marker T8: thorax (-0.0340397 -0.115262 -0.108711)
  Marker PSRG: radius_l (0.0524405 -0.19956 -0.0137886) fixed=true
  Marker PSUG: ulna_l (0.00324994 -0.215809 -0.0231108) fixed=true
  Marker ELG: humerus_l (0.00864014 -0.293219 -0.0307597) fixed=true
  Marker EMG: humerus_l (0.00157697 -0.293644 0.0505146) fixed=true
  Marker CLAVG: clavicle_l (0.0690006 0.00285703 0.0656618)
  Marker CLAVD: clavicle_r (-0.0732046 0.0688094 0.0979159)
  Marker ELD: humerus_r (0.0121513 -0.298552 0.0275251) fixed=true
  Marker EMD: humerus_r (0.00256462 -0.298097 -0.0543664) fixed=true
  Marker PSRD: radius_r (0.0465048 -0.202233 0.00802798) fixed=true
  Marker PSUD: ulna_r (0.00740433 -0.216099 0.0173822) fixed=true
  Marker MC2G: hand_l (-0.0105969 -0.0991414 -0.0233107) fixed=true
  Marker MC5G: hand_l (-0.0152433 -0.0840689 0.0462074) fixed=true
  Marker MC5D: hand_r (-0.0459747 -0.0822753 0.0190779) fixed=true
  Marker MC2D: hand_r (0.0228658 -0.105097 0.0180372) fixed=true
  Marker ACG: scapula_l (-0.0145381 0.0093049 0.00261815) fixed=true
  Marker ACD: scapula_r (-0.0146272 0.00760655 -0.00160111) fixed=true
  Marker MTABD: radius_r (0.0453944 -0.192483 0.0449836)
  Marker MTABG: radius_l (0.0673933 -0.146173 0.00577013)
  Marker MTBHAG: humerus_l (0.183604 -0.193974 -0.0536999)
  Marker MTBHPG: humerus_l (0.137355 -0.175195 -0.0759286)
  Marker MTBBAG: humerus_l (0.140033 -0.273302 -0.040835)
  Marker MTBBPG: humerus_l (0.0625536 -0.237286 -0.0790121)
  Marker MTBHAD: humerus_r (-0.0854567 -0.235324 0.1175)
  Marker MTBHPD: humerus_r (-0.128267 -0.250874 0.0913313)
  Marker MTBBAD: humerus_r (-0.0134408 -0.305784 0.115409)
  Marker MTBBPD: humerus_r (-0.072986 -0.322533 0.0820131)
  Marker COSTALD: thorax (-0.0784992 -0.253533 0.149086)
  Marker COSTALG: thorax (0.0843577 -0.241119 0.132139)
  Marker MTACDL: scapula_r (-0.125537 0.1401 -0.120491)
  Marker MTACDM: scapula_r (-0.0980334 0.162551 -0.164383)
  Marker MTACDB: scapula_r (-0.135773 0.144488 -0.158363)
