# OpenSim document version 30000
ScaleTool SA19AF_scaled:
  mass: 37
  height: -1
  age: -1
  GenericModelMaker:
    model_file: bilateral_STJ_generique_v01_modif.osim
  ModelScaler:
    apply: true
    scaling_order: measurements
    marker_file: Statitc_B_ref.trc
    time_range: 0.01 2.93
    preserve_mass_distribution: true
    output_model_file: SA19AF_model_step1.osim
    output_scale_file: SA19AF_scale_output.xml
    MeasurementSet: file=scale_measure_set.xml
  MarkerPlacer:
    apply: true
    marker_file: Statitc_B_ref.trc
    time_range: 0.01 2.93
    output_motion_file: SA19AF_motion.mot
    output_model_file: SA19AF_model_final.osim
    output_marker_file: SA19AF_marqueurs_new_output.osim
    max_marker_movement: -1
    IKTaskSet: file=scale_task.xml
