# OpenSim document version 30000
MarkerSet:
  Marker MTACGL: scapula_l (-0.0707 0.0092 0.0518) fixed=true
  Marker MTACGM: scapula_l (-0.0904 0.04 0.0949) fixed=true
  Marker MTACGB: scapula_l (-0.105 0.0075 0.0709) fixed=true
  Marker MAN: thorax (0.0343317 -0.0343317 0) fixed=true
  Marker XYP: thorax (0.0864202 -0.187594 -0.000116133)
  Marker C7: thorax (-0.102001 0.0616892 -0.00202862)
  Marker T8: thorax (-0.150746 -0.129399 -0.00263715)
  Marker PSRG: radius_l (0.0476103 -0.198842 -0.0220722)
  Marker PSUG: ulna_l (-0.00317118 -0.20277 -0.0570181)
  Marker ELG: humerus_l (0.00723937 -0.245682 -0.0257728) fixed=true
  Marker EMG: humerus_l (0.00132131 -0.246037 0.042325) fixed=true
  Marker CLAVG: clavicle_l (0.0114756 0.000733613 -0.0340309)
  Marker CLAVD: clavicle_r (0.0104359 0.00265469 0.0421107)
  Marker ELD: humerus_r (0.0102932 -0.252898 0.023316) fixed=true
  Marker EMD: humerus_r (0.00217244 -0.252512 -0.0460528) fixed=true
  Marker PSRD: radius_r (0.055547 -0.202131 0.00718421)
  Marker PSUD: ulna_r (0.000948381 -0.204418 0.0429802)
  Marker MC2G: hand_l (-0.00912388 -0.0896426 -0.0277637)
  Marker MC5G: hand_l (-0.010143 -0.0633443 0.0393821)
  Marker MC5D: hand_r (-0.0435076 -0.0670158 0.00958618)
  Marker MC2D: hand_r (0.0234371 -0.0898864 0.0213124)
  Marker ACG: scapula_l (-0.0145381 0.0093049 0.00261815) fixed=true
  Marker ACD: scapula_r (-0.0146272 0.00760655 -0.00160111) fixed=true
  Marker MTABD: radius_r (0.0539494 -0.128773 0.0262836)
  Marker MTABG: radius_l (0.0455221 -0.103619 -0.0301091)
  Marker MTBHAG: humerus_l (0.0611434 -0.0915328 -0.0367264)
  Marker MTBHPG: humerus_l (0.018945 -0.0953492 -0.037103)
  Marker MTBBAG: humerus_l (0.0624181 -0.183602 -0.0316928)
  Marker MTBBPG: humerus_l (-0.0263088 -0.188607 -0.031307)
  Marker MTBHAD: humerus_r (0.0435779 -0.0699207 0.0355345)
  Marker MTBHPD: humerus_r (-0.0060317 -0.0670902 0.0555879)
  Marker MTBBAD: humerus_r (0.0709674 -0.159611 0.00872954)
  Marker MTBBPD: humerus_r (-0.0167762 -0.154542 0.0442163)
  Marker COSTALD: thorax (0.083824 -0.23258 0.0516482)
  Marker COSTALG: thorax (0.0869056 -0.221905 -0.0815676)
  Marker MTACDL: scapula_r (-0.0717956 -0.0525392 -0.000592686)
  Marker MTACDM: scapula_r (-0.116956 -0.0714909 -0.0278651)
  Marker MTACDB: scapula_r (-0.0996106 -0.0783838 0.00799206)
