# OpenSim document version 30000
Model bilateral_STJ:
  length_units: meters
  force_units: N
  gravity: 0 -9.80665 0
  credits:
    Model constructed by Ricardo Matias and Ajay Seth. Scapulothoracic joint developed by Seth et al. [1]; segment dimensions and joint locations were obtained from Holzbaur et al. [2], and segment inertial properties obtained from Breteler et al. [3] and the left side was developed by M. Bourgain and S. Hybois (IBHGC, Paris, France) during the OpenSim virtual workshop
  publications:
    [1] Seth A, Matias R, Veloso A, Delp SL. A biomechanical model of the scapulothoracic joint to accurately capture scapula_r kinematics during shoulder movements. PLoS One. 2015. [2] Holzbaur KRS, Murray WM, Delp SL. A Model of the Upper Extremity for Simulating Musculoskeletal Surgery and Analyzing Neuromuscular Control. Ann Biomed Eng 33:829–840. 2005. [3] Breteler KMD, Spoor CW, Van der Helm FC. Measuring muscle and joint geometry parameters of a shoulder for modeling purposes. J Biomech 32:1191–7. 1999.
  BodySet:
    Body ground: mass=0 mass_center=(0 0 0) inertia_xx=0 inertia_yy=0 inertia_zz=0
    Body thorax: mass=20 mass_center=(-0.0591 -0.1486 0) inertia_xx=1.29841 inertia_yy=0.55245 inertia_zz=1.29841
        meshes=(thorax.vtp thoracic12_s.vtp thoracic11_s.vtp thoracic10_s.vtp thoracic9_s.vtp thoracic8_s.vtp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)
      CustomJoint ground_thorax: parent_body=ground location_in_parent=(0 0 0) location=(0 0 0)
        Coordinate ground_thorax_rot_x: motion_type=rotational default_value=0 range=(-1.570796 1.570796) clamped=true
        Coordinate ground_thorax_rot_y: motion_type=rotational default_value=0 range=(-1.570796 1.570796) clamped=true
        Coordinate ground_thorax_rot_z: motion_type=rotational default_value=0 range=(-1.570796 1.570796) clamped=true
        Coordinate ground_thorax_tx: motion_type=translational default_value=0 range=(-1 1) clamped=false
        Coordinate ground_thorax_ty: motion_type=translational default_value=0 range=(-1 1) clamped=false
        Coordinate ground_thorax_tz: motion_type=translational default_value=0 range=(-1 1) clamped=false
        SpatialTransform:
          TransformAxis rotation1: coordinates=ground_thorax_rot_x axis=(1 0 0) LinearFunction(coefficients=1 0)
          TransformAxis rotation2: coordinates=ground_thorax_rot_y axis=(0 1 0) LinearFunction(coefficients=1 0)
          TransformAxis rotation3: coordinates=ground_thorax_rot_z axis=(0 0 1) LinearFunction(coefficients=1 0)
          TransformAxis translation1: coordinates=ground_thorax_tx axis=(1 0 0) LinearFunction(coefficients=1 0)
          TransformAxis translation2: coordinates=ground_thorax_ty axis=(0 1 0) LinearFunction(coefficients=1 0)
          TransformAxis translation3: coordinates=ground_thorax_tz axis=(0 0 1) LinearFunction(coefficients=1 0)
      WrapEllipsoid ScapulothoracicEllipsoid_r: translation=(-0.02 -0.0173 0.0609) quadrant=all
          dimensions=(0.07 0.15 0.07)
      WrapEllipsoid ScapulothoracicEllipsoid_l: translation=(-0.02 -0.0173 -0.0609) quadrant=all
          dimensions=(0.07 0.15 0.07)
    Body clavicle_r: mass=0.156 mass_center=(-0.02172 0.01007 0.06704) inertia_xx=6.4e-6 inertia_yy=2.63e-5
        inertia_zz=2.43e-5 inertia_xy=-6.7e-6 inertia_xz=-9.5e-6 inertia_yz=2.9e-6 meshes=clavicle_r.vtp
      CustomJoint sternoclavicular_r: parent_body=thorax location_in_parent=(0.006325 0.00693 0.025465)
          location=(0 0 0)
        Coordinate clav_prot_r: motion_type=rotational default_value=0 range=(-0.7853982 0.7853982) clamped=true
        Coordinate clav_elev_r: motion_type=rotational default_value=0 range=(-0.7853982 0.7853982) clamped=true
        SpatialTransform: axes_held_at_zero=(rotation3 translation1 translation2 translation3)
          TransformAxis rotation1: coordinates=clav_prot_r axis=(0.0153 0.9892987 -0.1451)
              LinearFunction(coefficients=1 0)
          TransformAxis rotation2: coordinates=clav_elev_r axis=(-0.9944725 0 -0.104997)
              LinearFunction(coefficients=1 0)
    Body scapula_r: mass=0.7054 mass_center=(-0.04612 -0.0319 -0.04565) inertia_xx=0.001 inertia_yy=0.001
        inertia_zz=0.001 meshes=scapula_r.vtp
      ScapulothoracicJoint scapulothoracic_r: parent_body=thorax location_in_parent=(-0.02 -0.0173 0.07)
          orientation_in_parent=(0 -0.87 0) location=(-0.05982 -0.03904 -0.056) orientation=(-0.5181 -1.1416 -0.2854)
          thoracic_ellipsoid_radii_x_y_z=(0.07 0.15 0.07)
        Coordinate scapula_abduction_r: motion_type=rotational default_value=0 range=(-0.7853982 0.7853982)
            clamped=true
        Coordinate scapula_elevation_r: motion_type=rotational default_value=0 range=(-0.7853982 0.7853982)
            clamped=true
        Coordinate scapula_upward_rot_r: motion_type=rotational default_value=0 range=(-0.7853982 0.7853982)
            clamped=true
        Coordinate scapula_winging_r: motion_type=rotational default_value=0 range=(-0.7853982 0.7853982) clamped=false
    Body scapula_cluster_r: mass=0 mass_center=(0 0 0) inertia_xx=0 inertia_yy=0 inertia_zz=0 meshes=
      CustomJoint scap2cluster_r: parent_body=scapula_r location_in_parent=(0 0 0) location=(0 0 0)
        Coordinate scap2cluster_r_rot_x: motion_type=rotational default_value=0 range=(-1.570796 1.570796) clamped=true
        Coordinate scap2cluster_r_rot_y: motion_type=rotational default_value=0 range=(-1.570796 1.570796) clamped=true
        Coordinate scap2cluster_r_rot_z: motion_type=rotational default_value=0 range=(-1.570796 1.570796) clamped=true
        Coordinate scap2cluster_r_tx: motion_type=translational default_value=0 range=(-0.7853982 0.7853982)
            clamped=true
        Coordinate scap2cluster_r_ty: motion_type=translational default_value=0 range=(-0.7853982 0.7853982)
            clamped=true
        Coordinate scap2cluster_r_tz: motion_type=translational default_value=0 range=(-0.7853982 0.7853982)
            clamped=true
        SpatialTransform:
          TransformAxis rotation1: coordinates=scap2cluster_r_rot_x axis=(1 0 0) LinearFunction(coefficients=1 0)
          TransformAxis rotation2: coordinates=scap2cluster_r_rot_y axis=(0 1 0) LinearFunction(coefficients=1 0)
          TransformAxis rotation3: coordinates=scap2cluster_r_rot_z axis=(0 0 1) LinearFunction(coefficients=1 0)
          TransformAxis translation1: coordinates=scap2cluster_r_tx axis=(1 0 0) LinearFunction(coefficients=1 0)
          TransformAxis translation2: coordinates=scap2cluster_r_ty axis=(0 1 0) LinearFunction(coefficients=1 0)
          TransformAxis translation3: coordinates=scap2cluster_r_tz axis=(0 0 1) LinearFunction(coefficients=1 0)
    Body humerus_r: mass=2.0519 mass_center=(0.00537 -0.11493 -0.00261) inertia_xx=0.0132 inertia_yy=0.001988
        inertia_zz=0.0132 meshes=humerus_r.vtp
      CustomJoint glenohumeral_r: parent_body=scapula_r location_in_parent=(-0.00955 -0.034 0.009) location=(0 0 0)
        Coordinate shoulder_elv_r: motion_type=rotational default_value=0.1745329 range=(-1.570796 2.53) clamped=false
        Coordinate plane_of_elev_r: motion_type=rotational default_value=0 range=(-1.570796 3.141593) clamped=true
        Coordinate axial_rot_r: motion_type=rotational default_value=0 range=(-3.141593 3.141593) clamped=true
        SpatialTransform: axes_held_at_zero=(translation1 translation2 translation3)
          TransformAxis rotation1: coordinates=shoulder_elv_r axis=(-0.993 -0.0793 0.0879)
              LinearFunction(coefficients=1 0)
          TransformAxis rotation2: coordinates=plane_of_elev_r axis=(0.0828 0.0654 0.9944)
              LinearFunction(coefficients=1 0)
          TransformAxis rotation3: coordinates=axial_rot_r axis=(-0.0846 0.9947 -0.0584)
              LinearFunction(coefficients=1 0)
    Body humerus_cluster_r: mass=0 mass_center=(0 0 0) inertia_xx=0 inertia_yy=0 inertia_zz=0 meshes=
      CustomJoint hum2cluster_r: parent_body=humerus_r location_in_parent=(0 0 0) location=(0 0 0)
        Coordinate hum2cluster_r_rot_x: motion_type=rotational default_value=0 range=(-1.570796 1.570796) clamped=true
        Coordinate hum2cluster_r_rot_y: motion_type=rotational default_value=0 range=(-1.570796 1.570796) clamped=true
        Coordinate hum2cluster_r_rot_z: motion_type=rotational default_value=0 range=(-1.570796 1.570796) clamped=true
        Coordinate hum2cluster_r_tx: motion_type=translational default_value=0 range=(-0.7853982 0.7853982)
            clamped=true
        Coordinate hum2cluster_r_ty: motion_type=translational default_value=0 range=(-0.7853982 0.7853982)
            clamped=true
        Coordinate hum2cluster_r_tz: motion_type=translational default_value=0 range=(-0.7853982 0.7853982)
            clamped=true
        SpatialTransform:
          TransformAxis rotation1: coordinates=hum2cluster_r_rot_x axis=(1 0 0) LinearFunction(coefficients=1 0)
          TransformAxis rotation2: coordinates=hum2cluster_r_rot_y axis=(0 1 0) LinearFunction(coefficients=1 0)
          TransformAxis rotation3: coordinates=hum2cluster_r_rot_z axis=(0 0 1) LinearFunction(coefficients=1 0)
          TransformAxis translation1: coordinates=hum2cluster_r_tx axis=(1 0 0) LinearFunction(coefficients=1 0)
          TransformAxis translation2: coordinates=hum2cluster_r_ty axis=(0 1 0) LinearFunction(coefficients=1 0)
          TransformAxis translation3: coordinates=hum2cluster_r_tz axis=(0 0 1) LinearFunction(coefficients=1 0)
    Body ulna_r: mass=0.5464 mass_center=(-0.00927581 -0.105108 0.0261565) inertia_xx=0.0030585 inertia_yy=0.00045325
        inertia_zz=0.0030585 meshes=ulna_r.vtp
      CustomJoint elbow_r: parent_body=humerus_r location_in_parent=(0.0061 -0.2904 -0.0123) location=(0 0 0)
        Coordinate elbow_flexion_r: motion_type=rotational default_value=0 range=(0 3.141593) clamped=false
        SpatialTransform: axes_held_at_zero=(rotation1 rotation2 translation1 translation2 translation3)
          TransformAxis rotation3: coordinates=elbow_flexion_r axis=(0.04940001 0.03660001 0.9981083)
              LinearFunction(coefficients=1 0)
    Body radius_r: mass=0.5464 mass_center=(0.0154894 -0.104396 0.0138558) inertia_xx=0.0030585 inertia_yy=0.00045325
        inertia_zz=0.0030585 meshes=radius.vtp
      CustomJoint radioulna_r: parent_body=ulna_r location_in_parent=(0.0004 -0.011503 0.019999) location=(0 0 0)
        Coordinate pro_sup_r: motion_type=rotational default_value=-1.570796 range=(-1.570796 1.570796) clamped=false
        SpatialTransform: axes_held_at_zero=(rotation1 rotation3 translation1 translation2 translation3)
          TransformAxis rotation2: coordinates=pro_sup_r axis=(-0.01716099 0.9926656 -0.119668)
              LinearFunction(coefficients=1 0)
    Body hand_r: mass=0.4575 mass_center=(0 -0.068095 0) inertia_xx=0.000892 inertia_yy=0.000547 inertia_zz=0.00134
        meshes=(pisiform_rvs.vtp lunate_rvs.vtp scaphoid_rvs.vtp triquetrum_rvs.vtp hamate_rvs.vtp capitate_rvs.vtp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)
      CustomJoint radius_hand_r: parent_body=radius_r location_in_parent=(0.02 -0.237 0.018) location=(0 0 0)
        Coordinate wrist_flex_r: motion_type=rotational default_value=0 range=(-1.22173 1.22173) clamped=true
        Coordinate wrist_dev_r: motion_type=rotational default_value=0 range=(-0.4363323 0.6108652) clamped=true
        SpatialTransform: axes_held_at_zero=(rotation3 translation1 translation2 translation3)
          TransformAxis rotation1: coordinates=wrist_flex_r axis=(0 0 1) LinearFunction(coefficients=1 0)
          TransformAxis rotation2: coordinates=wrist_dev_r axis=(1 0 0) LinearFunction(coefficients=1 0)
    Body clavicle_l: mass=0.156 mass_center=(-0.02172 0.01007 0.06704) inertia_xx=6.4e-6 inertia_yy=2.63e-5
        inertia_zz=2.43e-5 inertia_xy=-6.7e-6 inertia_xz=-9.5e-6 inertia_yz=2.9e-6 meshes=clavicle_left_source.vtp
      CustomJoint sternoclavicular_l: parent_body=thorax location_in_parent=(0.006325 0.00693 -0.025465)
          location=(0 0 0)
        Coordinate clav_prot_l: motion_type=rotational default_value=0 range=(-0.7853982 0.7853982) clamped=true
        Coordinate clav_elev_l: motion_type=rotational default_value=0 range=(-0.7853982 0.7853982) clamped=true
        SpatialTransform: axes_held_at_zero=(rotation3 translation1 translation2 translation3)
          TransformAxis rotation1: coordinates=clav_prot_l axis=(-0.0153 -0.9892987 -0.1451)
              LinearFunction(coefficients=1 0)
          TransformAxis rotation2: coordinates=clav_elev_l axis=(0.9944725 0 -0.104997)
              LinearFunction(coefficients=1 0)
    Body scapula_l: mass=0.7054 mass_center=(-0.04612 -0.0319 -0.04565) inertia_xx=0.001 inertia_yy=0.001
        inertia_zz=0.001 meshes=scapula_l_source.vtp
      ScapulothoracicJoint scapulothoracic_l: parent_body=thorax location_in_parent=(-0.02 -0.0173 -0.07)
          orientation_in_parent=(0 0.87 0) location=(-0.05982 -0.03904 0.056) orientation=(0.5181 1.1416 -0.2854)
          thoracic_ellipsoid_radii_x_y_z=(-0.07 -0.15 -0.07)
        Coordinate scapula_abduction_l: motion_type=rotational default_value=0 range=(-0.7853982 0.7853982)
            clamped=true
        Coordinate scapula_elevation_l: motion_type=rotational default_value=0 range=(-0.7853982 0.7853982)
            clamped=true
        Coordinate scapula_upward_rot_l: motion_type=rotational default_value=0 range=(-0.7853982 0.7853982)
            clamped=true
        Coordinate scapula_winging_l: motion_type=rotational default_value=0 range=(-0.7853982 0.7853982) clamped=false
    Body scapula_cluster_l: mass=0 mass_center=(0 0 0) inertia_xx=0 inertia_yy=0 inertia_zz=0 meshes=
      CustomJoint scap2cluster_l: parent_body=scapula_l location_in_parent=(0 0 0) location=(0 0 0)
        Coordinate scap2cluster_l_rot_x: motion_type=rotational default_value=0 range=(-1.570796 1.570796) clamped=true
        Coordinate scap2cluster_l_rot_y: motion_type=rotational default_value=0 range=(-1.570796 1.570796) clamped=true
        Coordinate scap2cluster_l_rot_z: motion_type=rotational default_value=0 range=(-1.570796 1.570796) clamped=true
        Coordinate scap2cluster_l_tx: motion_type=translational default_value=0 range=(-0.7853982 0.7853982)
            clamped=true
        Coordinate scap2cluster_l_ty: motion_type=translational default_value=0 range=(-0.7853982 0.7853982)
            clamped=true
        Coordinate scap2cluster_l_tz: motion_type=translational default_value=0 range=(-0.7853982 0.7853982)
            clamped=true
        SpatialTransform:
          TransformAxis rotation1: coordinates=scap2cluster_l_rot_x axis=(1 0 0) LinearFunction(coefficients=1 0)
          TransformAxis rotation2: coordinates=scap2cluster_l_rot_y axis=(0 1 0) LinearFunction(coefficients=1 0)
          TransformAxis rotation3: coordinates=scap2cluster_l_rot_z axis=(0 0 1) LinearFunction(coefficients=1 0)
          TransformAxis translation1: coordinates=scap2cluster_l_tx axis=(1 0 0) LinearFunction(coefficients=1 0)
          TransformAxis translation2: coordinates=scap2cluster_l_ty axis=(0 1 0) LinearFunction(coefficients=1 0)
          TransformAxis translation3: coordinates=scap2cluster_l_tz axis=(0 0 1) LinearFunction(coefficients=1 0)
    Body humerus_l: mass=2.0519 mass_center=(0.00537 -0.11493 -0.00261) inertia_xx=0.0132 inertia_yy=0.001988
        inertia_zz=0.0132 meshes=humerus_left_source.vtp
      CustomJoint glenohumeral_l: parent_body=scapula_l location_in_parent=(-0.00955 -0.034 -0.009) location=(0 0 0)
        Coordinate shoulder_elv_l: motion_type=rotational default_value=0.1745329 range=(-1.570796 2.53) clamped=false
        Coordinate plane_of_elev_l: motion_type=rotational default_value=0 range=(-1.570796 3.141593) clamped=true
        Coordinate axial_rot_l: motion_type=rotational default_value=0 range=(-3.141593 3.141593) clamped=true
        SpatialTransform: axes_held_at_zero=(translation1 translation2 translation3)
          TransformAxis rotation1: coordinates=shoulder_elv_l axis=(0.993 -0.0793 0.0879)
              LinearFunction(coefficients=1 0)
          TransformAxis rotation2: coordinates=plane_of_elev_l axis=(0.0828 0.0654 0.9944)
              LinearFunction(coefficients=1 0)
          TransformAxis rotation3: coordinates=axial_rot_l axis=(-0.0846 0.9947 -0.0584)
              LinearFunction(coefficients=1 0)
    Body humerus_cluster_l: mass=0 mass_center=(0 0 0) inertia_xx=0 inertia_yy=0 inertia_zz=0 meshes=
      CustomJoint hum2cluster_l: parent_body=humerus_l location_in_parent=(0 0 0) location=(0 0 0)
        Coordinate hum2cluster_l_rot_x: motion_type=rotational default_value=0 range=(-1.570796 1.570796) clamped=true
        Coordinate hum2cluster_l_rot_y: motion_type=rotational default_value=0 range=(-1.570796 1.570796) clamped=true
        Coordinate hum2cluster_l_rot_z: motion_type=rotational default_value=0 range=(-1.570796 1.570796) clamped=true
        Coordinate hum2cluster_l_tx: motion_type=translational default_value=0 range=(-0.7853982 0.7853982)
            clamped=true
        Coordinate hum2cluster_l_ty: motion_type=translational default_value=0 range=(-0.7853982 0.7853982)
            clamped=true
        Coordinate hum2cluster_l_tz: motion_type=translational default_value=0 range=(-0.7853982 0.7853982)
            clamped=true
        SpatialTransform:
          TransformAxis rotation1: coordinates=hum2cluster_l_rot_x axis=(1 0 0) LinearFunction(coefficients=1 0)
          TransformAxis rotation2: coordinates=hum2cluster_l_rot_y axis=(0 1 0) LinearFunction(coefficients=1 0)
          TransformAxis rotation3: coordinates=hum2cluster_l_rot_z axis=(0 0 1) LinearFunction(coefficients=1 0)
          TransformAxis translation1: coordinates=hum2cluster_l_tx axis=(1 0 0) LinearFunction(coefficients=1 0)
          TransformAxis translation2: coordinates=hum2cluster_l_ty axis=(0 1 0) LinearFunction(coefficients=1 0)
          TransformAxis translation3: coordinates=hum2cluster_l_tz axis=(0 0 1) LinearFunction(coefficients=1 0)
    Body ulna_l: mass=0.5464 mass_center=(-0.00927581 -0.105108 0.0261565) inertia_xx=0.0030585 inertia_yy=0.00045325
        inertia_zz=0.0030585 meshes=ulna_left_source.vtp
      CustomJoint elbow_l: parent_body=humerus_l location_in_parent=(0.0061 -0.2904 0.0123) location=(0 0 0)
        Coordinate elbow_flexion_l: motion_type=rotational default_value=0 range=(0 3.141593) clamped=false
        SpatialTransform: axes_held_at_zero=(rotation1 rotation2 translation1 translation2 translation3)
          TransformAxis rotation3: coordinates=elbow_flexion_l axis=(0.04940001 0.03660001 0.9981083)
              LinearFunction(coefficients=1 0)
    Body radius_l: mass=0.5464 mass_center=(0.0154894 -0.104396 0.0138558) inertia_xx=0.0030585 inertia_yy=0.00045325
        inertia_zz=0.0030585 meshes=radius_left_source.vtp
      CustomJoint radioulna_l: parent_body=ulna_l location_in_parent=(0.0004 -0.011503 -0.019999) location=(0 0 0)
        Coordinate pro_sup_l: motion_type=rotational default_value=-1.570796 range=(-1.570796 1.570796) clamped=false
        SpatialTransform: axes_held_at_zero=(rotation1 rotation3 translation1 translation2 translation3)
          TransformAxis rotation2: coordinates=pro_sup_l axis=(0.01716099 -0.9926656 -0.119668)
              LinearFunction(coefficients=1 0)
    Body hand_l: mass=0.4575 mass_center=(0 -0.068095 0) inertia_xx=0.000892 inertia_yy=0.000547 inertia_zz=0.00134
        meshes=(pisiform_lvs.vtp lunate_lvs.vtp scaphoid_lvs.vtp triquetrum_lvs.vtp hamate_lvs.vtp capitate_lvs.vtp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)
      CustomJoint radius_hand_l: parent_body=radius_l location_in_parent=(0.02 -0.237 -0.018)
          orientation_in_parent=(0 -1.56 0) location=(0 0 0)
        Coordinate wrist_flex_l: motion_type=rotational default_value=0 range=(-1.22173 1.22173) clamped=true
        Coordinate wrist_dev_l: motion_type=rotational default_value=0 range=(-0.4363323 0.6108652) clamped=true
        SpatialTransform: axes_held_at_zero=(rotation3 translation1 translation2 translation3)
          TransformAxis rotation1: coordinates=wrist_flex_l axis=(0 0 1) LinearFunction(coefficients=1 0)
          TransformAxis rotation2: coordinates=wrist_dev_l axis=(-1 0 0) LinearFunction(coefficients=1 0)
  ConstraintSet:
    PointConstraint AC_r: body_1=clavicle_r body_2=scapula_r location_body_1=(-0.02924 0.02024 0.12005)
        location_body_2=(-0.01357 0.00011 -0.01523)
    PointConstraint AC_l: body_1=clavicle_l body_2=scapula_l location_body_1=(-0.0271447 0.0174986 -0.117401)
        location_body_2=(-0.011839 -0.000462371 0.018542)
  ForceSet:
    CoordinateLimitForce [values shared by the 10 below unless stated]: upper_stiffness=20 [N*m/degree]
        lower_stiffness=20 [N*m/degree] damping=1 transition=10 [degrees]
    CoordinateLimitForce clavicle_rElevationLimits: coordinate=clav_elev_r upper_limit=25 [degrees]
        lower_limit=-20 [degrees]
    CoordinateLimitForce clavicle_rElevationLimits_l: coordinate=clav_elev_l upper_limit=25 lower_limit=-20
    CoordinateLimitForce clavicle_rProtractionLimits: coordinate=clav_prot_r upper_limit=25 lower_limit=-10
    CoordinateLimitForce clavicle_rProtractionLimits_l: coordinate=clav_prot_l upper_limit=25 lower_limit=-10
    CoordinateLimitForce scapula_rRotationLimits: coordinate=scapula_upward_rot_r upper_limit=50 lower_limit=-20
    CoordinateLimitForce scapula_rRotationLimits_l: coordinate=scapula_upward_rot_l upper_limit=50 lower_limit=-20
    CoordinateLimitForce ShoulderRotationLimits: coordinate=shoulder_elv_r upper_limit=180 lower_limit=-85
    CoordinateLimitForce ShoulderRotationLimits_l: coordinate=shoulder_elv_l upper_limit=180 lower_limit=-85
    CoordinateLimitForce ElbowFlexLimit: coordinate=elbow_flexion_r upper_limit=140 lower_limit=0
    CoordinateLimitForce ElbowFlexLimit_l: coordinate=elbow_flexion_l upper_limit=140 lower_limit=0
  MarkerSet:
    Marker MTACGL: scapula_cluster_l (-0.0707 0.0092 0.0518)
    Marker MTACGM: scapula_cluster_l (-0.0904 0.04 0.0949)
    Marker MTACGB: scapula_cluster_l (-0.105 0.0075 0.0709)
    Marker MAN: thorax (0.03 -0.03 0) fixed=true
    Marker XYP: thorax (0.089435 -0.162972 -0.00171844) fixed=true
    Marker C7: thorax (-0.0914299 0.100672 0) fixed=true
    Marker T8: thorax (-0.130291 -0.137217 0)
    Marker PSRG: radius_l (0.0610904 -0.232477 -0.016063) fixed=true
    Marker PSUG: ulna_l (0.00371535 -0.246713 -0.0264205) fixed=true
    Marker ELG: humerus_l (0.00834059 -0.283053 -0.0296933) fixed=true
    Marker EMG: humerus_l (0.0015223 -0.283464 0.0487633) fixed=true
    Marker CLAVG: clavicle_l (0.01 0.01 -0.0611521)
    Marker CLAVD: clavicle_r (0.01 0.01 0.0608003)
    Marker ELD: humerus_r (0.0116063 -0.285161 0.0262905) fixed=true
    Marker EMD: humerus_r (0.00244959 -0.284726 -0.0519279) fixed=true
    Marker PSRD: radius_r (0.0541337 -0.235408 0.00934493) fixed=true
    Marker PSUD: ulna_r (0.0085181 -0.248605 0.0199968) fixed=true
    Marker MC2G: hand_l (-0.00864831 -0.0809111 -0.0190243) fixed=true
    Marker MC5G: hand_l (-0.0124403 -0.0686102 0.0377107) fixed=true
    Marker MC5D: hand_r (-0.0374356 -0.0669939 0.0155345) fixed=true
    Marker MC2D: hand_r (0.0186188 -0.0855774 0.0146871) fixed=true
    Marker ACG: scapula_l (-0.0145381 0.0093049 0.00261815) fixed=true
    Marker ACD: scapula_r (-0.0146272 0.00760655 -0.00160111) fixed=true
    Marker MTABD: radius_r (0.00243331 -0.162109 0.0448466)
    Marker MTABG: radius_l (0.00733116 -0.159612 -0.0493303)
    Marker MTBHAG: humerus_cluster_l (0.0441815 -0.0571962 -0.024492)
    Marker MTBHPG: humerus_cluster_l (-0.0441815 -0.0571962 -0.024492)
    Marker MTBBAG: humerus_cluster_l (0.0441815 -0.137196 -0.024492)
    Marker MTBBPG: humerus_cluster_l (-0.0441815 -0.137196 -0.024492)
    Marker MTBHAD: humerus_cluster_r (0.0425351 -0.0558168 0.0225211)
    Marker MTBHPD: humerus_cluster_r (-0.0373175 -0.0552501 0.0236644)
    Marker MTBBAD: humerus_cluster_r (0.0425351 -0.135817 0.0225211)
    Marker MTBBPD: humerus_cluster_r (-0.0373175 -0.13525 0.0236644)
    Marker MTMG: hand_l (-0.0257962 -0.0550455 0.00246892)
    Marker MTMD: hand_r (-0.00418164 -0.0563772 0.0238318)
    Marker COSTALD: thorax (0.1 -0.21342 0.064994)
    Marker COSTALG: thorax (0.1 -0.21342 -0.064994)
    Marker SCLL: scapula_l (-0.036 -0.00110231 -0.000892387)
    Marker SCLM: scapula_l (-0.0796764 -0.0183973 0.096053)
    Marker SCLB: scapula_l (-0.103038 -0.0990402 0.0985654)
    Marker MTACDL: scapula_cluster_r (-0.0707 0.0092 -0.0518)
    Marker MTACDM: scapula_cluster_r (-0.0904 0.04 -0.0949)
    Marker MTACDB: scapula_cluster_r (-0.105 0.0075 -0.0709)
