# OpenSim document version 30000
Model Generic_Model_Inferior:
  length_units: meters
  force_units: N
  gravity: 0 0 -9.80665
  BodySet:
    Body ground: mass=0 mass_center=(0 0 0) inertia_xx=0 inertia_yy=0 inertia_zz=0
    Body pelvis: mass=9.132044 mass_center=(-0.0839317 0 0) inertia_xx=0.09286151 inertia_yy=0.09286151
        inertia_zz=0.05643592 meshes=(r_pelvis.vtp l_pelvis.vtp sacrum.vtp)
      CustomJoint ground_pelvis: parent_body=ground location_in_parent=(0 0 0) location=(0 0 0)
        Coordinate pelvis_tilt: motion_type=rotational default_value=0 range=(-1.570796 1.570796) clamped=true
        Coordinate pelvis_list: motion_type=rotational default_value=0 range=(-1.570796 1.570796) clamped=true
        Coordinate pelvis_rotation: motion_type=rotational default_value=0 range=(-1.570796 1.570796) clamped=true
        Coordinate pelvis_tx: motion_type=translational default_value=0 range=(-5 5) clamped=true
        Coordinate pelvis_ty: motion_type=translational default_value=0.93 range=(-1 2) clamped=true
        Coordinate pelvis_tz: motion_type=translational default_value=0 range=(-3 3) clamped=true
        SpatialTransform:
          TransformAxis rotation1: coordinates=pelvis_tilt axis=(0 0 1) LinearFunction(coefficients=1 0)
          TransformAxis rotation2: coordinates=pelvis_list axis=(1 0 0) LinearFunction(coefficients=1 0)
          TransformAxis rotation3: coordinates=pelvis_rotation axis=(0 1 0) LinearFunction(coefficients=1 0)
          TransformAxis translation1: coordinates=pelvis_tx axis=(1 0 0) LinearFunction(coefficients=1 0)
          TransformAxis translation2: coordinates=pelvis_ty axis=(0 1 0) LinearFunction(coefficients=1 0)
          TransformAxis translation3: coordinates=pelvis_tz axis=(0 0 1) LinearFunction(coefficients=1 0)
      WrapCylinder Gmax1_at_pelvis_r: xyz_body_rotation=(-0.6 0.45 0) translation=(-0.0914107 -0.104827 0.0648113)
          quadrant=-x radius=0.04449048 length=0.1629516
      WrapCylinder Gmax2_at_pelvis_r: xyz_body_rotation=(-0.75 0.39 0) translation=(-0.0949722 -0.0878851 0.0722486)
          quadrant=all radius=0.04460803 length=0.1080035
      WrapCylinder Gmax3_at_pelvis_r: xyz_body_rotation=(-0.1 0 0) translation=(-0.0985337 -0.0931793 0.0722486)
          quadrant=all radius=0.04492095 length=0.1062444
      WrapCylinder Gmax1_at_pelvis_l: xyz_body_rotation=(0.6 -0.45 0) translation=(-0.0914107 -0.104827 -0.0648113)
          quadrant=-x radius=0.04449048 length=0.1629516
      WrapCylinder Gmax2_at_pelvis_l: xyz_body_rotation=(0.75 -0.39 0) translation=(-0.0949722 -0.0878851 -0.0722486)
          quadrant=all radius=0.04460803 length=0.1080035
      WrapCylinder Gmax3_at_pelvis_l: xyz_body_rotation=(0.1 0 0) translation=(-0.0985337 -0.0931793 -0.0722486)
          quadrant=all radius=0.04492095 length=0.1062444
      WrapCylinder PS_at_brim_r: xyz_body_rotation=(-0.25 -0.27 0.1) translation=(-0.0878493 -0.0635314 0.0696987)
          quadrant=-y radius=0.05594899 length=0.1071682
      WrapCylinder PS_at_brim_l: xyz_body_rotation=(0.25 0.27 0.1) translation=(-0.0878493 -0.0635314 -0.0696987)
          quadrant=-y radius=0.05594899 length=0.1071682
      WrapCylinder IL_at_brim_r: xyz_body_rotation=(-0.32 -0.24 0.9) translation=(-0.0842878 -0.0688256 0.0803235)
          quadrant=-y radius=0.06156561 length=0.106962
      WrapCylinder IL_at_brim_l: xyz_body_rotation=(0.32 0.24 0.9) translation=(-0.0842878 -0.0688256 -0.0803235)
          quadrant=-y radius=0.06156561 length=0.106962
    Body femur_r: mass=7.21243 mass_center=(0 -0.174042 0) inertia_xx=0.1069614 inertia_yy=0.02480191
        inertia_zz=0.1069614 meshes=femur_r.vtp
      CustomJoint hip_r: parent_body=pelvis location_in_parent=(-0.08393168 -0.06999043 0.08871707) location=(0 0 0)
        Coordinate hip_flexion_r: motion_type=rotational default_value=0 range=(-2.094395 2.094395) clamped=true
        Coordinate hip_adduction_r: motion_type=rotational default_value=0 range=(-2.094395 2.094395) clamped=true
        Coordinate hip_rotation_r: motion_type=rotational default_value=0 range=(-2.094395 2.094395) clamped=true
        SpatialTransform: axes_held_at_zero=(translation1 translation2 translation3)
          TransformAxis rotation1: coordinates=hip_flexion_r axis=(0 0 1) LinearFunction(coefficients=1 0)
          TransformAxis rotation2: coordinates=hip_adduction_r axis=(1 0 0) LinearFunction(coefficients=1 0)
          TransformAxis rotation3: coordinates=hip_rotation_r axis=(0 1 0) LinearFunction(coefficients=1 0)
    Body patella_r: mass=0.06684064 mass_center=(0.00169004 0.0265834 0) inertia_xx=2.104007e-6 inertia_yy=9.032675e-6
        inertia_zz=9.032675e-6 meshes=r_patella.vtp
      CustomJoint patellofemoral_r: parent_body=femur_r location_in_parent=(0 0 0) location=(0 0 0)
        Coordinate knee_angle_beta: motion_type=rotational default_value=0 range=(-99999.9 99999.9) clamped=false
        SpatialTransform: axes_held_at_zero=(rotation2 rotation3 translation3)
          TransformAxis rotation1: coordinates=knee_angle_beta axis=(0 0 1)
            SimmSpline f11: x=(0 0.174533 0.349066 0.523599 0.698132 0.872665 1.0472 1.22173 1.39626 1.5708 1.74533 1.91986 2.0944)
                y=(0.00113686 -0.00629212 -0.105582 -0.253683 -0.414245 -0.579047 -0.747244 -0.91799 -1.09044 -1.26379 -1.43763 -1.61186 -1.78634)
          TransformAxis translation1: coordinates=knee_angle_beta axis=(1 0 0)
            MultiplierFunction: scale=0.954602
              SimmSpline f9: x=(0 0.174533 0.349066 0.523599 0.698132 0.872665 1.0472 1.22173 1.39626 1.5708 1.74533 1.91986 2.0944)
                  y=(0.04435 0.040692 0.035581 0.029012 0.021473 0.013523 0.005483 -0.002412 -0.009959 -0.016903 -0.022926 -0.027739 -0.030815)
          TransformAxis translation2: coordinates=knee_angle_beta axis=(0 1 0)
            MultiplierFunction: scale=1.023776
              SimmSpline f10: x=(0 0.174533 0.349066 0.523599 0.698132 0.872665 1.0472 1.22173 1.39626 1.5708 1.74533 1.91986 2.0944)
                  y=(-0.418712 -0.426965 -0.43422 -0.440152 -0.444617 -0.447495 -0.448724 -0.448337 -0.446353 -0.442826 -0.438035 -0.432448 -0.426632)
    Body tibia_r: mass=2.874845 mass_center=(0 -0.216261 0) inertia_xx=0.05157305 inertia_yy=0.003580308
        inertia_zz=0.05157305 meshes=(tibia_r.vtp fibula_r.vtp)
      CustomJoint knee_r: parent_body=femur_r location_in_parent=(0 0 0) location=(0 0 0)
        Coordinate knee_angle_r: motion_type=rotational default_value=0 range=(-2.094395 0.1745329) clamped=true
        SpatialTransform: axes_held_at_zero=(rotation2 rotation3 translation3)
          TransformAxis rotation1: coordinates=knee_angle_r axis=(0 0 1) LinearFunction(coefficients=1 0)
          TransformAxis translation1: coordinates=knee_angle_r axis=(1 0 0)
            MultiplierFunction: scale=0.954602
              SimmSpline: x=(-2.0944 -1.74533 -1.39626 -1.0472 -0.698132 -0.349066 -0.174533 0.197344 0.337395 0.490178 1.52146 2.0944)
                  y=(-0.0032 0.00179 0.00411 0.0041 0.00212 -0.001 -0.0031 -0.005227 -0.005435 -0.005574 -0.005435 -0.00525)
          TransformAxis translation2: coordinates=knee_angle_r axis=(0 1 0)
            MultiplierFunction: scale=1.023776
              SimmSpline: x=(-2.0944 -1.22173 -0.523599 -0.349066 -0.174533 0.159149 2.0944)
                  y=(-0.4226 -0.4082 -0.399 -0.3976 -0.3966 -0.395264 -0.396)
    Body talus_r: mass=0.07754134 mass_center=(0 0 0) inertia_xx=0.001073059 inertia_yy=0.0008722275
        inertia_zz=0.001073059 meshes=talus_rv.vtp
      CustomJoint ankle_r: parent_body=tibia_r location_in_parent=(0 -0.4980821 0) location=(0 0 0)
        Coordinate ankle_angle_r: motion_type=rotational default_value=0 range=(-1.570796 1.570796) clamped=true
        SpatialTransform: axes_held_at_zero=(rotation2 rotation3 translation1 translation2 translation3)
          TransformAxis rotation1: coordinates=ankle_angle_r axis=(-0.1050135 -0.1740224 0.9791263)
              LinearFunction(coefficients=1 0)
    Body calcn_r: mass=0.9692668 mass_center=(0.109302 0.0327905 0) inertia_xx=0.001356841 inertia_yy=0.003642828
        inertia_zz=0.003642828 meshes=foot.vtp
      CustomJoint subtalar_r: parent_body=talus_r location_in_parent=(-0.05330649 -0.0458521 0.009056605)
          location=(0 0 0)
        Coordinate subtalar_angle_r: motion_type=rotational default_value=0 range=(-1.570796 1.570796) clamped=true
            locked=true
        SpatialTransform: axes_held_at_zero=(rotation2 rotation3 translation1 translation2 translation3)
          TransformAxis rotation1: coordinates=subtalar_angle_r axis=(0.7871796 0.6047475 -0.1209495)
              LinearFunction(coefficients=1 0)
    Body toes_r: mass=0.1679545 mass_center=(0.0378184 0.0065581 -0.0200115) inertia_xx=9.691721e-5
        inertia_yy=0.0001874152 inertia_zz=0.0001874152 meshes=bofoot.vtp
      CustomJoint mtp_r: parent_body=calcn_r location_in_parent=(0.1954316 -0.002186036 0.001234992) location=(0 0 0)
        Coordinate mtp_angle_r: motion_type=rotational default_value=0 range=(-1.570796 1.570796) clamped=true
            locked=true
        SpatialTransform: axes_held_at_zero=(rotation2 rotation3 translation1 translation2 translation3)
          TransformAxis rotation1: coordinates=mtp_angle_r axis=(-0.5809544 0 0.8139361)
              LinearFunction(coefficients=1 0)
    Body femur_l: mass=7.21243 mass_center=(0 -0.180067 0) inertia_xx=0.1147971 inertia_yy=0.02715146
        inertia_zz=0.1147971 meshes=femur_l.vtp
      CustomJoint hip_l: parent_body=pelvis location_in_parent=(-0.08393168 -0.06999043 -0.08871707) location=(0 0 0)
        Coordinate hip_flexion_l: motion_type=rotational default_value=0 range=(-2.094395 2.094395) clamped=true
        Coordinate hip_adduction_l: motion_type=rotational default_value=0 range=(-2.094395 2.094395) clamped=true
        Coordinate hip_rotation_l: motion_type=rotational default_value=0 range=(-2.094395 2.094395) clamped=true
        SpatialTransform: axes_held_at_zero=(translation1 translation2 translation3)
          TransformAxis rotation1: coordinates=hip_flexion_l axis=(0 0 1) LinearFunction(coefficients=1 0)
          TransformAxis rotation2: coordinates=hip_adduction_l axis=(-1 0 0) LinearFunction(coefficients=1 0)
          TransformAxis rotation3: coordinates=hip_rotation_l axis=(0 -1 0) LinearFunction(coefficients=1 0)
    Body patella_l: mass=0.06684064 mass_center=(0.00179999 0.0279969 0) inertia_xx=2.360037e-6 inertia_yy=1.023284e-5
        inertia_zz=1.023284e-5 meshes=l_patella.vtp
      CustomJoint patellofemoral_l: parent_body=femur_l location_in_parent=(0 0 0) location=(0 0 0)
        Coordinate knee_angle_l_beta: motion_type=rotational default_value=0 range=(-99999.9 99999.9) clamped=false
        SpatialTransform: axes_held_at_zero=(rotation2 rotation3 translation3)
          TransformAxis rotation1: coordinates=knee_angle_l_beta axis=(0 0 1)
            SimmSpline f25: x=(0 0.174533 0.349066 0.523599 0.698132 0.872665 1.0472 1.22173 1.39626 1.5708 1.74533 1.91986 2.0944)
                y=(0.00113686 -0.00629212 -0.105582 -0.253683 -0.414245 -0.579047 -0.747244 -0.91799 -1.09044 -1.26379 -1.43763 -1.61186 -1.78634)
          TransformAxis translation1: coordinates=knee_angle_l_beta axis=(1 0 0)
            MultiplierFunction: scale=0.998795
              SimmSpline f23: x=(0 0.174533 0.349066 0.523599 0.698132 0.872665 1.0472 1.22173 1.39626 1.5708 1.74533 1.91986 2.0944)
                  y=(0.04435 0.040692 0.035581 0.029012 0.021473 0.013523 0.005483 -0.002412 -0.009959 -0.016903 -0.022926 -0.027739 -0.030815)
          TransformAxis translation2: coordinates=knee_angle_l_beta axis=(0 1 0)
            MultiplierFunction: scale=1.05922
              SimmSpline f24: x=(0 0.174533 0.349066 0.523599 0.698132 0.872665 1.0472 1.22173 1.39626 1.5708 1.74533 1.91986 2.0944)
                  y=(-0.418712 -0.426965 -0.43422 -0.440152 -0.444617 -0.447495 -0.448724 -0.448337 -0.446353 -0.442826 -0.438035 -0.432448 -0.426632)
    Body tibia_l: mass=2.874845 mass_center=(0 -0.210146 0) inertia_xx=0.04901758 inertia_yy=0.004020067
        inertia_zz=0.04901758 meshes=(tibia_l.vtp fibula_l.vtp)
      CustomJoint knee_l: parent_body=femur_l location_in_parent=(0 0 0) location=(0 0 0)
        Coordinate knee_angle_l: motion_type=rotational default_value=0 range=(-2.094395 0.1745329) clamped=true
        SpatialTransform: axes_held_at_zero=(rotation2 rotation3 translation3)
          TransformAxis rotation1: coordinates=knee_angle_l axis=(0 0 1) LinearFunction(coefficients=1 0)
          TransformAxis translation1: coordinates=knee_angle_l axis=(1 0 0)
            MultiplierFunction: scale=0.998795
              SimmSpline: x=(-2.0944 -1.74533 -1.39626 -1.0472 -0.698132 -0.349066 -0.174533 0.197344 0.337395 0.490178 1.52146 2.0944)
                  y=(-0.0032 0.00179 0.00411 0.0041 0.00212 -0.001 -0.0031 -0.005227 -0.005435 -0.005574 -0.005435 -0.00525)
          TransformAxis translation2: coordinates=knee_angle_l axis=(0 1 0)
            MultiplierFunction: scale=1.05922
              SimmSpline: x=(-2.0944 -1.22173 -0.523599 -0.349066 -0.174533 0.159149 2.0944)
                  y=(-0.4226 -0.4082 -0.399 -0.3976 -0.3966 -0.395264 -0.396)
    Body talus_l: mass=0.07754134 mass_center=(0 0 0) inertia_xx=0.0009774166 inertia_yy=0.0008214156
        inertia_zz=0.0009774166 meshes=talus_lv.vtp
      CustomJoint ankle_l: parent_body=tibia_l location_in_parent=(0 -0.4839992 0) location=(0 0 0)
        Coordinate ankle_angle_l: motion_type=rotational default_value=0 range=(-1.047198 1.047198) clamped=true
        SpatialTransform: axes_held_at_zero=(rotation2 rotation3 translation1 translation2 translation3)
          TransformAxis rotation1: coordinates=ankle_angle_l axis=(0.1050135 0.1740224 0.9791263)
              LinearFunction(coefficients=1 0)
    Body calcn_l: mass=0.9692668 mass_center=(0.106306 0.0318919 0) inertia_xx=0.001252436 inertia_yy=0.00343037
        inertia_zz=0.00343037 meshes=l_foot.vtp
      CustomJoint subtalar_l: parent_body=talus_l location_in_parent=(-0.05184559 -0.0445955 -0.008595284)
          location=(0 0 0)
        Coordinate subtalar_angle_l: motion_type=rotational default_value=0 range=(-1.570796 1.570796) clamped=true
            locked=true
        SpatialTransform: axes_held_at_zero=(rotation2 rotation3 translation1 translation2 translation3)
          TransformAxis rotation1: coordinates=subtalar_angle_l axis=(-0.7871796 -0.6047475 -0.1209495)
              LinearFunction(coefficients=1 0)
    Body toes_l: mass=0.1679545 mass_center=(0.036782 0.00637838 0.0189921) inertia_xx=8.94597e-5
        inertia_yy=0.0001761745 inertia_zz=0.0001761745 meshes=l_bofoot.vtp
      CustomJoint mtp_l: parent_body=calcn_l location_in_parent=(0.1900757 -0.002126126 -0.001172084) location=(0 0 0)
        Coordinate mtp_angle_l: motion_type=rotational default_value=0 range=(-1.047198 1.047198) clamped=true
            locked=true
        SpatialTransform: axes_held_at_zero=(rotation2 rotation3 translation1 translation2 translation3)
          TransformAxis rotation1: coordinates=mtp_angle_l axis=(0.5809544 0 0.8139361)
              LinearFunction(coefficients=1 0)
  ConstraintSet:
    CoordinateCouplerConstraint patellofemoral_knee_angle_con: independent_coordinate_names=knee_angle_r
        dependent_coordinate_name=knee_angle_beta scale_factor=1
        coupled_coordinates_function=LinearFunction(coefficients=-1 0)
    CoordinateCouplerConstraint patellofemoral_knee_angle_l_con: independent_coordinate_names=knee_angle_l
        dependent_coordinate_name=knee_angle_l_beta scale_factor=1
        coupled_coordinates_function=LinearFunction(coefficients=-1 0)
  MarkerSet:
    Marker EASD: pelvis (0.0114693 0.0130399 0.132753)
    Marker EASG: pelvis (0.0132302 0.0146477 -0.137337)
    Marker EPSD: pelvis (-0.191917 0.0548005 0.0441933)
    Marker EPSG: pelvis (-0.179355 0.0502688 -0.0470985)
    Marker CMD: femur_r (0.00761381 -0.422606 -0.0468932)
    Marker CLD: femur_r (-0.00258303 -0.424943 0.0442685)
    Marker CMG: femur_l (0.0106695 -0.427207 0.0522992)
    Marker CLG: femur_l (0.00246231 -0.428077 -0.0485339)
    Marker MMD: tibia_r (0.0303775 -0.445859 -0.0338619)
    Marker MMG: tibia_l (0.0252118 -0.433274 0.0342144)
    Marker MLD: tibia_r (0.00616482 -0.474718 0.0488061)
    Marker MLG: tibia_l (0.013045 -0.461614 -0.0576067)
    Marker CALG: talus_l (-0.0699684 -0.0329898 0.0190267)
    Marker CALD: talus_r (-0.0777949 -0.0324182 0.00359243)
    Marker MT1G: talus_l (0.180797 -0.032728 0.00951282)
    Marker MT5D: talus_r (0.107789 -0.0309593 0.0500963)
    Marker MT1D: talus_r (0.151941 -0.0261675 -0.0209043)
    Marker FHAG: femur_l (0.0457423 -0.176036 -0.118653)
    Marker FHPG: femur_l (-0.0270561 -0.187112 -0.11771)
    Marker FBAG: femur_l (0.0509557 -0.266151 -0.102403)
    Marker FBPG: femur_l (-0.0240894 -0.269606 -0.101969)
    Marker FHAD: femur_r (0.0446464 -0.16085 0.0911197)
    Marker FHPD: femur_r (-0.0505159 -0.150861 0.094535)
    Marker FBAD: femur_r (0.0393374 -0.249912 0.0816021)
    Marker FBPD: femur_r (-0.0102688 -0.228013 0.084809)
    Marker MT5G: talus_l (0.168812 -0.037072 -0.0733264)
    Marker MTCALG: talus_l (-0.0525346 0.000323125 0.0144176)
    Marker MTCALD: talus_r (-0.0612536 -5.4987e-5 0.00628009)
    Marker MTBassin: pelvis (-0.0449622 0.113768 0.157943)
    Marker TFIBD: tibia_r (0.00476158 -0.0859125 0.0498361)
    Marker TFIBG: tibia_l (0.0015902 -0.0772158 -0.0537922)
